// SBML level 3 version 2

model biocrnpyler_385263()
  // model units - substance: mole, time: second, volume: litre, area: square_metre, length: metre, extent: mole

  // Compartments:
  compartment default = 1e-6;

  // Species:
  species T7RNAP in default = 0;
  species DNA in default = 0;
  species mRNA_i in default = 0;
  species MGapt in default = 0;
  species mRNA_t in default = 0;
  species ATP in default = 0;
  species GTP in default = 0;
  species CTP in default = 0;
  species UTP in default = 0;
  species PPi in default = 0;
  species PO4 in default = 0;
  species T7RNAP_bound_GTP in default = 0;
  species T7RNAP_bound in default = 0;
  species T7RNAP_bound_GDP_PO4 in default = 0;
  species T7RNAP_bound_mRNA0000 in default = 0;
  species T7RNAP_bound_mRNA0000_GTP in default = 0;
  species T7RNAP_bound_mRNA0001_PPi in default = 0;
  species T7RNAP_bound_mRNA0001 in default = 0;
  species T7RNAP_bound_mRNA0001_GTP in default = 0;
  species T7RNAP_bound_mRNA0002_PPi in default = 0;
  species T7RNAP_bound_mRNA0002 in default = 0;
  species T7RNAP_bound_mRNA0002_ATP in default = 0;
  species T7RNAP_bound_mRNA0003_PPi in default = 0;
  species T7RNAP_bound_mRNA0003 in default = 0;
  species T7RNAP_bound_mRNA0003_UTP in default = 0;
  species T7RNAP_bound_mRNA0004_PPi in default = 0;
  species T7RNAP_bound_mRNA0004 in default = 0;
  species T7RNAP_bound_mRNA0004_CTP in default = 0;
  species T7RNAP_bound_mRNA0005_PPi in default = 0;
  species T7RNAP_bound_mRNA0005 in default = 0;
  species T7RNAP_bound_mRNA0005_CTP in default = 0;
  species T7RNAP_bound_mRNA0006_PPi in default = 0;
  species T7RNAP_bound_mRNA0006 in default = 0;
  species T7RNAP_bound_mRNA0006_CTP in default = 0;
  species T7RNAP_bound_mRNA0007_PPi in default = 0;
  species T7RNAP_bound_mRNA0007 in default = 0;
  species T7RNAP_bound_mRNA0007_GTP in default = 0;
  species T7RNAP_bound_mRNA0008_PPi in default = 0;
  species T7RNAP_bound_mRNA0008 in default = 0;
  species T7RNAP_bound_mRNA0008_ATP in default = 0;
  species T7RNAP_bound_mRNA0009_PPi in default = 0;
  species T7RNAP_bound_mRNA0009 in default = 0;
  species T7RNAP_bound_mRNA0009_CTP in default = 0;
  species T7RNAP_bound_mRNA0010_PPi in default = 0;
  species T7RNAP_bound_mRNA0010 in default = 0;
  species T7RNAP_bound_mRNA0010_UTP in default = 0;
  species T7RNAP_bound_mRNA0011_PPi in default = 0;
  species T7RNAP_bound_mRNA0011 in default = 0;
  species T7RNAP_bound_mRNA0011_GTP in default = 0;
  species T7RNAP_bound_mRNA0012_PPi in default = 0;
  species T7RNAP_bound_mRNA0012 in default = 0;
  species T7RNAP_bound_mRNA0012_GTP in default = 0;
  species T7RNAP_bound_mRNA0013_PPi in default = 0;
  species T7RNAP_bound_mRNA0013 in default = 0;
  species T7RNAP_bound_mRNA0013_CTP in default = 0;
  species T7RNAP_bound_mRNA0014_PPi in default = 0;
  species T7RNAP_bound_mRNA0014 in default = 0;
  species T7RNAP_bound_mRNA0014_GTP in default = 0;
  species T7RNAP_bound_mRNA0015_PPi in default = 0;
  species T7RNAP_bound_mRNA0015 in default = 0;
  species T7RNAP_bound_mRNA0015_ATP in default = 0;
  species T7RNAP_bound_mRNA0016_PPi in default = 0;
  species T7RNAP_bound_mRNA0016 in default = 0;
  species T7RNAP_bound_mRNA0016_GTP in default = 0;
  species T7RNAP_bound_mRNA0017_PPi in default = 0;
  species T7RNAP_bound_mRNA0017 in default = 0;
  species T7RNAP_bound_mRNA0017_ATP in default = 0;
  species T7RNAP_bound_mRNA0018_PPi in default = 0;
  species T7RNAP_bound_mRNA0018 in default = 0;
  species T7RNAP_bound_mRNA0018_GTP in default = 0;
  species T7RNAP_bound_mRNA0019_PPi in default = 0;
  species T7RNAP_bound_mRNA0019 in default = 0;
  species T7RNAP_bound_mRNA0019_CTP in default = 0;
  species T7RNAP_bound_mRNA0020_PPi in default = 0;
  species T7RNAP_bound_mRNA0020 in default = 0;
  species T7RNAP_bound_mRNA0020_CTP in default = 0;
  species T7RNAP_bound_mRNA0021_PPi in default = 0;
  species T7RNAP_bound_mRNA0021 in default = 0;
  species T7RNAP_bound_mRNA0021_ATP in default = 0;
  species T7RNAP_bound_mRNA0022_PPi in default = 0;
  species T7RNAP_bound_mRNA0022 in default = 0;
  species T7RNAP_bound_mRNA0022_GTP in default = 0;
  species T7RNAP_bound_mRNA0023_PPi in default = 0;
  species T7RNAP_bound_mRNA0023 in default = 0;
  species T7RNAP_bound_mRNA0023_GTP in default = 0;
  species T7RNAP_bound_mRNA0024_PPi in default = 0;
  species T7RNAP_bound_mRNA0024 in default = 0;
  species T7RNAP_bound_mRNA0024_UTP in default = 0;
  species T7RNAP_bound_mRNA0025_PPi in default = 0;
  species T7RNAP_bound_mRNA0025 in default = 0;
  species T7RNAP_bound_mRNA0025_ATP in default = 0;
  species T7RNAP_bound_mRNA0026_PPi in default = 0;
  species T7RNAP_bound_mRNA0026 in default = 0;
  species T7RNAP_bound_mRNA0026_ATP in default = 0;
  species T7RNAP_bound_mRNA0027_PPi in default = 0;
  species T7RNAP_bound_mRNA0027 in default = 0;
  species T7RNAP_bound_mRNA0027_CTP in default = 0;
  species T7RNAP_bound_mRNA0028_PPi in default = 0;
  species T7RNAP_bound_mRNA0028 in default = 0;
  species T7RNAP_bound_mRNA0028_GTP in default = 0;
  species T7RNAP_bound_mRNA0029_PPi in default = 0;
  species T7RNAP_bound_mRNA0029 in default = 0;
  species T7RNAP_bound_mRNA0029_ATP in default = 0;
  species T7RNAP_bound_mRNA0030_PPi in default = 0;
  species T7RNAP_bound_mRNA0030 in default = 0;
  species T7RNAP_bound_mRNA0030_ATP in default = 0;
  species T7RNAP_bound_mRNA0031_PPi in default = 0;
  species T7RNAP_bound_mRNA0031 in default = 0;
  species T7RNAP_bound_mRNA0031_UTP in default = 0;
  species T7RNAP_bound_mRNA0032_PPi in default = 0;
  species T7RNAP_bound_mRNA0032 in default = 0;
  species T7RNAP_bound_mRNA0032_GTP in default = 0;
  species T7RNAP_bound_mRNA0033_PPi in default = 0;
  species T7RNAP_bound_mRNA0033 in default = 0;
  species T7RNAP_bound_mRNA0033_GTP in default = 0;
  species T7RNAP_bound_mRNA0034_PPi in default = 0;
  species T7RNAP_bound_mRNA0034 in default = 0;
  species T7RNAP_bound_mRNA0034_ATP in default = 0;
  species T7RNAP_bound_mRNA0035_PPi in default = 0;
  species T7RNAP_bound_mRNA0035 in default = 0;
  species T7RNAP_bound_mRNA0035_UTP in default = 0;
  species T7RNAP_bound_mRNA0036_PPi in default = 0;
  species T7RNAP_bound_mRNA0036 in default = 0;
  species T7RNAP_bound_mRNA0036_CTP in default = 0;
  species T7RNAP_bound_mRNA0037_PPi in default = 0;
  species T7RNAP_bound_mRNA0037 in default = 0;
  species T7RNAP_bound_mRNA0037_UTP in default = 0;
  species T7RNAP_bound_mRNA0038_PPi in default = 0;
  species T7RNAP_bound_mRNA0038 in default = 0;
  species T7RNAP_bound_mRNA0038_CTP in default = 0;
  species T7RNAP_bound_mRNA0039_PPi in default = 0;
  species T7RNAP_bound_mRNA0039 in default = 0;
  species T7RNAP_bound_mRNA0039_GTP in default = 0;
  species T7RNAP_bound_mRNA0040_PPi in default = 0;
  species T7RNAP_bound_mRNA0040 in default = 0;
  species T7RNAP_bound_mRNA0040_ATP in default = 0;
  species T7RNAP_bound_mRNA0041_PPi in default = 0;
  species T7RNAP_bound_mRNA0041 in default = 0;
  species T7RNAP_bound_mRNA0041_GTP in default = 0;
  species T7RNAP_bound_mRNA0042_PPi in default = 0;
  species T7RNAP_bound_mRNA0042 in default = 0;
  species T7RNAP_bound_mRNA0042_CTP in default = 0;
  species T7RNAP_bound_mRNA0043_PPi in default = 0;
  species T7RNAP_bound_mRNA0043 in default = 0;
  species T7RNAP_bound_mRNA0043_CTP in default = 0;
  species T7RNAP_bound_mRNA0044_PPi in default = 0;
  species T7RNAP_bound_mRNA0044 in default = 0;
  species T7RNAP_bound_mRNA0044_UTP in default = 0;
  species T7RNAP_bound_mRNA0045_PPi in default = 0;
  species T7RNAP_bound_mRNA0045 in default = 0;
  species T7RNAP_bound_mRNA0045_UTP in default = 0;
  species T7RNAP_bound_mRNA0046_PPi in default = 0;
  species T7RNAP_bound_mRNA0046 in default = 0;
  species T7RNAP_bound_mRNA0046_ATP in default = 0;
  species T7RNAP_bound_mRNA0047_PPi in default = 0;
  species T7RNAP_bound_mRNA0047 in default = 0;
  species T7RNAP_bound_mRNA0047_GTP in default = 0;
  species T7RNAP_bound_mRNA0048_PPi in default = 0;
  species T7RNAP_bound_mRNA0048 in default = 0;
  species T7RNAP_bound_mRNA0048_GTP in default = 0;
  species T7RNAP_bound_mRNA0049_PPi in default = 0;
  species T7RNAP_bound_mRNA0049 in default = 0;
  species T7RNAP_bound_mRNA0049_ATP in default = 0;
  species T7RNAP_bound_mRNA0050_PPi in default = 0;
  species T7RNAP_bound_mRNA0050 in default = 0;
  species T7RNAP_bound_mRNA0050_GTP in default = 0;
  species T7RNAP_bound_mRNA0051_PPi in default = 0;
  species T7RNAP_bound_mRNA0051 in default = 0;
  species T7RNAP_bound_mRNA0051_ATP in default = 0;
  species T7RNAP_bound_mRNA0052_PPi in default = 0;
  species T7RNAP_bound_mRNA0052 in default = 0;
  species T7RNAP_bound_mRNA0052_UTP in default = 0;
  species T7RNAP_bound_mRNA0053_PPi in default = 0;
  species T7RNAP_bound_mRNA0053 in default = 0;
  species T7RNAP_bound_mRNA0053_CTP in default = 0;
  species T7RNAP_bound_mRNA0054_PPi in default = 0;
  species T7RNAP_bound_mRNA0054 in default = 0;
  species T7RNAP_bound_mRNA0054_CTP in default = 0;
  species T7RNAP_bound_mRNA0055_PPi in default = 0;
  species T7RNAP_bound_mRNA0055 in default = 0;
  species T7RNAP_bound_mRNA0055_GTP in default = 0;
  species T7RNAP_bound_mRNA0056_PPi in default = 0;
  species T7RNAP_bound_mRNA0056 in default = 0;
  species T7RNAP_bound_mRNA0056_GTP in default = 0;
  species T7RNAP_bound_mRNA0057_PPi in default = 0;
  species T7RNAP_bound_mRNA0057 in default = 0;
  species T7RNAP_bound_mRNA0057_CTP in default = 0;
  species T7RNAP_bound_mRNA0058_PPi in default = 0;
  species T7RNAP_bound_mRNA0058 in default = 0;
  species T7RNAP_bound_mRNA0058_UTP in default = 0;
  species T7RNAP_bound_mRNA0059_PPi in default = 0;
  species T7RNAP_bound_mRNA0059 in default = 0;
  species T7RNAP_bound_mRNA0059_GTP in default = 0;
  species T7RNAP_bound_mRNA0060_PPi in default = 0;
  species T7RNAP_bound_mRNA0060 in default = 0;
  species T7RNAP_bound_mRNA0060_CTP in default = 0;
  species T7RNAP_bound_mRNA0061_PPi in default = 0;
  species T7RNAP_bound_mRNA0061 in default = 0;
  species T7RNAP_bound_mRNA0061_UTP in default = 0;
  species T7RNAP_bound_mRNA0062_PPi in default = 0;
  species T7RNAP_bound_mRNA0062 in default = 0;
  species T7RNAP_bound_mRNA0062_ATP in default = 0;
  species T7RNAP_bound_mRNA0063_PPi in default = 0;
  species T7RNAP_bound_mRNA0063 in default = 0;
  species T7RNAP_bound_mRNA0063_ATP in default = 0;
  species T7RNAP_bound_mRNA0064_PPi in default = 0;
  species T7RNAP_bound_mRNA0064 in default = 0;
  species T7RNAP_bound_mRNA0064_CTP in default = 0;
  species T7RNAP_bound_mRNA0065_PPi in default = 0;
  species T7RNAP_bound_mRNA0065 in default = 0;
  species T7RNAP_bound_mRNA0065_ATP in default = 0;
  species T7RNAP_bound_mRNA0066_PPi in default = 0;
  species T7RNAP_bound_mRNA0066 in default = 0;
  species T7RNAP_bound_mRNA0066_ATP in default = 0;
  species T7RNAP_bound_mRNA0067_PPi in default = 0;
  species T7RNAP_bound_mRNA0067 in default = 0;
  species T7RNAP_bound_mRNA0067_ATP in default = 0;
  species T7RNAP_bound_mRNA0068_PPi in default = 0;
  species T7RNAP_bound_mRNA0068 in default = 0;
  species T7RNAP_bound_mRNA0068_GTP in default = 0;
  species T7RNAP_bound_mRNA0069_PPi in default = 0;
  species T7RNAP_bound_mRNA0069 in default = 0;
  species T7RNAP_bound_mRNA0069_CTP in default = 0;
  species T7RNAP_bound_mRNA0070_PPi in default = 0;
  species T7RNAP_bound_mRNA0070 in default = 0;
  species T7RNAP_bound_mRNA0070_CTP in default = 0;
  species T7RNAP_bound_mRNA0071_PPi in default = 0;
  species T7RNAP_bound_mRNA0071 in default = 0;
  species T7RNAP_bound_mRNA0071_CTP in default = 0;
  species T7RNAP_bound_mRNA0072_PPi in default = 0;
  species T7RNAP_bound_mRNA0072 in default = 0;
  species T7RNAP_bound_mRNA0072_GTP in default = 0;
  species T7RNAP_bound_mRNA0073_PPi in default = 0;
  species T7RNAP_bound_mRNA0073 in default = 0;
  species T7RNAP_bound_mRNA0073_ATP in default = 0;
  species T7RNAP_bound_mRNA0074_PPi in default = 0;
  species T7RNAP_bound_mRNA0074 in default = 0;
  species T7RNAP_bound_mRNA0074_ATP in default = 0;
  species T7RNAP_bound_mRNA0075_PPi in default = 0;
  species T7RNAP_bound_mRNA0075 in default = 0;
  species T7RNAP_bound_mRNA0075_ATP in default = 0;
  species T7RNAP_bound_mRNA0076_PPi in default = 0;
  species T7RNAP_bound_mRNA0076 in default = 0;
  species T7RNAP_bound_mRNA0076_GTP in default = 0;
  species T7RNAP_bound_mRNA0077_PPi in default = 0;
  species T7RNAP_bound_mRNA0077 in default = 0;
  species T7RNAP_bound_mRNA0077_GTP in default = 0;
  species T7RNAP_bound_mRNA0078_PPi in default = 0;
  species T7RNAP_bound_mRNA0078 in default = 0;
  species T7RNAP_bound_mRNA0078_ATP in default = 0;
  species T7RNAP_bound_mRNA0079_PPi in default = 0;
  species T7RNAP_bound_mRNA0079 in default = 0;
  species T7RNAP_bound_mRNA0079_ATP in default = 0;
  species T7RNAP_bound_mRNA0080_PPi in default = 0;
  species T7RNAP_bound_mRNA0080 in default = 0;
  species T7RNAP_bound_mRNA0080_GTP in default = 0;
  species T7RNAP_bound_mRNA0081_PPi in default = 0;
  species T7RNAP_bound_mRNA0081 in default = 0;
  species T7RNAP_bound_mRNA0081_CTP in default = 0;
  species T7RNAP_bound_mRNA0082_PPi in default = 0;
  species T7RNAP_bound_mRNA0082 in default = 0;
  species T7RNAP_bound_mRNA0082_UTP in default = 0;
  species T7RNAP_bound_mRNA0083_PPi in default = 0;
  species T7RNAP_bound_mRNA0083 in default = 0;
  species T7RNAP_bound_mRNA0083_GTP in default = 0;
  species T7RNAP_bound_mRNA0084_PPi in default = 0;
  species T7RNAP_bound_mRNA0084 in default = 0;
  species T7RNAP_bound_mRNA0084_ATP in default = 0;
  species T7RNAP_bound_mRNA0085_PPi in default = 0;
  species T7RNAP_bound_mRNA0085 in default = 0;
  species T7RNAP_bound_mRNA0085_GTP in default = 0;
  species T7RNAP_bound_mRNA0086_PPi in default = 0;
  species T7RNAP_bound_mRNA0086 in default = 0;
  species T7RNAP_bound_mRNA0086_UTP in default = 0;
  species T7RNAP_bound_mRNA0087_PPi in default = 0;
  species T7RNAP_bound_mRNA0087 in default = 0;
  species T7RNAP_bound_mRNA0087_UTP in default = 0;
  species T7RNAP_bound_mRNA0088_PPi in default = 0;
  species T7RNAP_bound_mRNA0088 in default = 0;
  species T7RNAP_bound_mRNA0088_GTP in default = 0;
  species T7RNAP_bound_mRNA0089_PPi in default = 0;
  species T7RNAP_bound_mRNA0089 in default = 0;
  species T7RNAP_bound_mRNA0089_GTP in default = 0;
  species T7RNAP_bound_mRNA0090_PPi in default = 0;
  species T7RNAP_bound_mRNA0090 in default = 0;
  species T7RNAP_bound_mRNA0090_CTP in default = 0;
  species T7RNAP_bound_mRNA0091_PPi in default = 0;
  species T7RNAP_bound_mRNA0091 in default = 0;
  species T7RNAP_bound_mRNA0091_UTP in default = 0;
  species T7RNAP_bound_mRNA0092_PPi in default = 0;
  species T7RNAP_bound_mRNA0092 in default = 0;
  species T7RNAP_bound_mRNA0092_GTP in default = 0;
  species T7RNAP_bound_mRNA0093_PPi in default = 0;
  species T7RNAP_bound_mRNA0093 in default = 0;
  species T7RNAP_bound_mRNA0093_CTP in default = 0;
  species T7RNAP_bound_mRNA0094_PPi in default = 0;
  species T7RNAP_bound_mRNA0094 in default = 0;
  species T7RNAP_bound_mRNA0094_UTP in default = 0;
  species T7RNAP_bound_mRNA0095_PPi in default = 0;
  species T7RNAP_bound_mRNA0095 in default = 0;
  species T7RNAP_bound_mRNA0095_GTP in default = 0;
  species T7RNAP_bound_mRNA0096_PPi in default = 0;
  species T7RNAP_bound_mRNA0096 in default = 0;
  species T7RNAP_bound_mRNA0096_CTP in default = 0;
  species T7RNAP_bound_mRNA0097_PPi in default = 0;
  species T7RNAP_bound_mRNA0097 in default = 0;
  species T7RNAP_bound_mRNA0097_CTP in default = 0;
  species T7RNAP_bound_mRNA0098_PPi in default = 0;
  species T7RNAP_bound_mRNA0098 in default = 0;
  species T7RNAP_bound_mRNA0098_ATP in default = 0;
  species T7RNAP_bound_mRNA0099_PPi in default = 0;
  species T7RNAP_bound_mRNA0099 in default = 0;
  species T7RNAP_bound_mRNA0099_CTP in default = 0;
  species T7RNAP_bound_mRNA0100_PPi in default = 0;
  species T7RNAP_bound_mRNA0100 in default = 0;
  species T7RNAP_bound_mRNA0100_CTP in default = 0;
  species T7RNAP_bound_mRNA0101_PPi in default = 0;
  species T7RNAP_bound_mRNA0101 in default = 0;
  species T7RNAP_bound_mRNA0101_GTP in default = 0;
  species T7RNAP_bound_mRNA0102_PPi in default = 0;
  species T7RNAP_bound_mRNA0102 in default = 0;
  species T7RNAP_bound_mRNA0102_CTP in default = 0;
  species T7RNAP_bound_mRNA0103_PPi in default = 0;
  species T7RNAP_bound_mRNA0103 in default = 0;
  species T7RNAP_bound_mRNA0103_UTP in default = 0;
  species T7RNAP_bound_mRNA0104_PPi in default = 0;
  species T7RNAP_bound_mRNA0104 in default = 0;
  species T7RNAP_bound_mRNA0104_GTP in default = 0;
  species T7RNAP_bound_mRNA0105_PPi in default = 0;
  species T7RNAP_bound_mRNA0105 in default = 0;
  species T7RNAP_bound_mRNA0105_ATP in default = 0;
  species T7RNAP_bound_mRNA0106_PPi in default = 0;
  species T7RNAP_bound_mRNA0106 in default = 0;
  species T7RNAP_bound_mRNA0106_GTP in default = 0;
  species T7RNAP_bound_mRNA0107_PPi in default = 0;
  species T7RNAP_bound_mRNA0107 in default = 0;
  species T7RNAP_bound_mRNA0107_CTP in default = 0;
  species T7RNAP_bound_mRNA0108_PPi in default = 0;
  species T7RNAP_bound_mRNA0108 in default = 0;
  species T7RNAP_bound_mRNA0108_ATP in default = 0;
  species T7RNAP_bound_mRNA0109_PPi in default = 0;
  species T7RNAP_bound_mRNA0109 in default = 0;
  species T7RNAP_bound_mRNA0109_ATP in default = 0;
  species T7RNAP_bound_mRNA0110_PPi in default = 0;
  species T7RNAP_bound_mRNA0110 in default = 0;
  species T7RNAP_bound_mRNA0110_UTP in default = 0;
  species T7RNAP_bound_mRNA0111_PPi in default = 0;
  species T7RNAP_bound_mRNA0111 in default = 0;
  species T7RNAP_bound_mRNA0111_ATP in default = 0;
  species T7RNAP_bound_mRNA0112_PPi in default = 0;
  species T7RNAP_bound_mRNA0112 in default = 0;
  species T7RNAP_bound_mRNA0112_ATP in default = 0;
  species T7RNAP_bound_mRNA0113_PPi in default = 0;
  species T7RNAP_bound_mRNA0113 in default = 0;
  species GDP in default = 0;

  // Parameters:
  k_forward = 10.194337;
  k_forward1 = 5.270153;
  k_forward2 = 10.425226;
  k_forward3 = 7.819226;
  k_forward4 = 2.451179;
  k_forward5 = 97.083257;
  k_forward6 = 1335.875;
  k_forward7 = 45.940369;

  // Reactions:
  r0: T7RNAP + DNA + GTP => T7RNAP_bound_GTP; k_forward*T7RNAP*DNA*GTP;
  r1: T7RNAP_bound_GTP => T7RNAP_bound_GDP_PO4; k_forward1*T7RNAP_bound_GTP;
  r2: T7RNAP_bound_GDP_PO4 => T7RNAP_bound + GDP + PO4; k_forward2*T7RNAP_bound_GDP_PO4;
  r3: T7RNAP_bound => T7RNAP_bound_mRNA0000; k_forward3*T7RNAP_bound;
  r4: T7RNAP_bound_mRNA0000 + GTP => T7RNAP_bound_mRNA0000_GTP; k_forward4*T7RNAP_bound_mRNA0000*GTP;
  r5: T7RNAP_bound_mRNA0000_GTP => T7RNAP_bound_mRNA0001_PPi; k_forward5*T7RNAP_bound_mRNA0000_GTP;
  r6: T7RNAP_bound_mRNA0001_PPi => T7RNAP_bound_mRNA0001 + PPi; k_forward6*T7RNAP_bound_mRNA0001_PPi;
  r7: T7RNAP_bound_mRNA0001 + GTP => T7RNAP_bound_mRNA0001_GTP; k_forward4*T7RNAP_bound_mRNA0001*GTP;
  r8: T7RNAP_bound_mRNA0001_GTP => T7RNAP_bound_mRNA0002_PPi; k_forward5*T7RNAP_bound_mRNA0001_GTP;
  r9: T7RNAP_bound_mRNA0002_PPi => T7RNAP_bound_mRNA0002 + PPi; k_forward6*T7RNAP_bound_mRNA0002_PPi;
  r10: T7RNAP_bound_mRNA0002 + ATP => T7RNAP_bound_mRNA0002_ATP; k_forward4*T7RNAP_bound_mRNA0002*ATP;
  r11: T7RNAP_bound_mRNA0002_ATP => T7RNAP_bound_mRNA0003_PPi; k_forward5*T7RNAP_bound_mRNA0002_ATP;
  r12: T7RNAP_bound_mRNA0003_PPi => T7RNAP_bound_mRNA0003 + PPi; k_forward6*T7RNAP_bound_mRNA0003_PPi;
  r13: T7RNAP_bound_mRNA0003 + UTP => T7RNAP_bound_mRNA0003_UTP; k_forward4*T7RNAP_bound_mRNA0003*UTP;
  r14: T7RNAP_bound_mRNA0003_UTP => T7RNAP_bound_mRNA0004_PPi; k_forward5*T7RNAP_bound_mRNA0003_UTP;
  r15: T7RNAP_bound_mRNA0004_PPi => T7RNAP_bound_mRNA0004 + PPi; k_forward6*T7RNAP_bound_mRNA0004_PPi;
  r16: T7RNAP_bound_mRNA0004 + CTP => T7RNAP_bound_mRNA0004_CTP; k_forward4*T7RNAP_bound_mRNA0004*CTP;
  r17: T7RNAP_bound_mRNA0004_CTP => T7RNAP_bound_mRNA0005_PPi; k_forward5*T7RNAP_bound_mRNA0004_CTP;
  r18: T7RNAP_bound_mRNA0005_PPi => T7RNAP_bound_mRNA0005 + PPi; k_forward6*T7RNAP_bound_mRNA0005_PPi;
  r19: T7RNAP_bound_mRNA0005 + CTP => T7RNAP_bound_mRNA0005_CTP; k_forward4*T7RNAP_bound_mRNA0005*CTP;
  r20: T7RNAP_bound_mRNA0005_CTP => T7RNAP_bound_mRNA0006_PPi; k_forward5*T7RNAP_bound_mRNA0005_CTP;
  r21: T7RNAP_bound_mRNA0006_PPi => T7RNAP_bound_mRNA0006 + PPi; k_forward6*T7RNAP_bound_mRNA0006_PPi;
  r22: T7RNAP_bound_mRNA0006 + CTP => T7RNAP_bound_mRNA0006_CTP; k_forward4*T7RNAP_bound_mRNA0006*CTP;
  r23: T7RNAP_bound_mRNA0006_CTP => T7RNAP_bound_mRNA0007_PPi; k_forward5*T7RNAP_bound_mRNA0006_CTP;
  r24: T7RNAP_bound_mRNA0007_PPi => T7RNAP_bound_mRNA0007 + PPi; k_forward6*T7RNAP_bound_mRNA0007_PPi;
  r25: T7RNAP_bound_mRNA0007 + GTP => T7RNAP_bound_mRNA0007_GTP; k_forward4*T7RNAP_bound_mRNA0007*GTP;
  r26: T7RNAP_bound_mRNA0007_GTP => T7RNAP_bound_mRNA0008_PPi; k_forward5*T7RNAP_bound_mRNA0007_GTP;
  r27: T7RNAP_bound_mRNA0008_PPi => T7RNAP_bound_mRNA0008 + PPi; k_forward6*T7RNAP_bound_mRNA0008_PPi;
  r28: T7RNAP_bound_mRNA0008 + ATP => T7RNAP_bound_mRNA0008_ATP; k_forward4*T7RNAP_bound_mRNA0008*ATP;
  r29: T7RNAP_bound_mRNA0008_ATP => T7RNAP_bound_mRNA0009_PPi; k_forward5*T7RNAP_bound_mRNA0008_ATP;
  r30: T7RNAP_bound_mRNA0009_PPi => T7RNAP_bound_mRNA0009 + PPi; k_forward6*T7RNAP_bound_mRNA0009_PPi;
  r31: T7RNAP_bound_mRNA0009 + CTP => T7RNAP_bound_mRNA0009_CTP; k_forward4*T7RNAP_bound_mRNA0009*CTP;
  r32: T7RNAP_bound_mRNA0009_CTP => T7RNAP_bound_mRNA0010_PPi; k_forward5*T7RNAP_bound_mRNA0009_CTP;
  r33: T7RNAP_bound_mRNA0010_PPi => T7RNAP_bound_mRNA0010 + PPi; k_forward6*T7RNAP_bound_mRNA0010_PPi;
  r34: T7RNAP_bound_mRNA0010 + UTP => T7RNAP_bound_mRNA0010_UTP; k_forward4*T7RNAP_bound_mRNA0010*UTP;
  r35: T7RNAP_bound_mRNA0010_UTP => T7RNAP_bound_mRNA0011_PPi; k_forward5*T7RNAP_bound_mRNA0010_UTP;
  r36: T7RNAP_bound_mRNA0011_PPi => T7RNAP_bound_mRNA0011 + PPi; k_forward6*T7RNAP_bound_mRNA0011_PPi;
  r37: T7RNAP_bound_mRNA0011 + GTP => T7RNAP_bound_mRNA0011_GTP; k_forward4*T7RNAP_bound_mRNA0011*GTP;
  r38: T7RNAP_bound_mRNA0011_GTP => T7RNAP_bound_mRNA0012_PPi; k_forward5*T7RNAP_bound_mRNA0011_GTP;
  r39: T7RNAP_bound_mRNA0012_PPi => T7RNAP_bound_mRNA0012 + PPi; k_forward6*T7RNAP_bound_mRNA0012_PPi;
  r40: T7RNAP_bound_mRNA0012 + GTP => T7RNAP_bound_mRNA0012_GTP; k_forward4*T7RNAP_bound_mRNA0012*GTP;
  r41: T7RNAP_bound_mRNA0012_GTP => T7RNAP_bound_mRNA0013_PPi; k_forward5*T7RNAP_bound_mRNA0012_GTP;
  r42: T7RNAP_bound_mRNA0013_PPi => T7RNAP_bound_mRNA0013 + PPi; k_forward6*T7RNAP_bound_mRNA0013_PPi;
  r43: T7RNAP_bound_mRNA0013 + CTP => T7RNAP_bound_mRNA0013_CTP; k_forward4*T7RNAP_bound_mRNA0013*CTP;
  r44: T7RNAP_bound_mRNA0013_CTP => T7RNAP_bound_mRNA0014_PPi; k_forward5*T7RNAP_bound_mRNA0013_CTP;
  r45: T7RNAP_bound_mRNA0014_PPi => T7RNAP_bound_mRNA0014 + PPi; k_forward6*T7RNAP_bound_mRNA0014_PPi;
  r46: T7RNAP_bound_mRNA0014 + GTP => T7RNAP_bound_mRNA0014_GTP; k_forward4*T7RNAP_bound_mRNA0014*GTP;
  r47: T7RNAP_bound_mRNA0014_GTP => T7RNAP_bound_mRNA0015_PPi; k_forward5*T7RNAP_bound_mRNA0014_GTP;
  r48: T7RNAP_bound_mRNA0015_PPi => T7RNAP_bound_mRNA0015 + PPi; k_forward6*T7RNAP_bound_mRNA0015_PPi;
  r49: T7RNAP_bound_mRNA0015 + ATP => T7RNAP_bound_mRNA0015_ATP; k_forward4*T7RNAP_bound_mRNA0015*ATP;
  r50: T7RNAP_bound_mRNA0015_ATP => T7RNAP_bound_mRNA0016_PPi; k_forward5*T7RNAP_bound_mRNA0015_ATP;
  r51: T7RNAP_bound_mRNA0016_PPi => T7RNAP_bound_mRNA0016 + PPi; k_forward6*T7RNAP_bound_mRNA0016_PPi;
  r52: T7RNAP_bound_mRNA0016 + GTP => T7RNAP_bound_mRNA0016_GTP; k_forward4*T7RNAP_bound_mRNA0016*GTP;
  r53: T7RNAP_bound_mRNA0016_GTP => T7RNAP_bound_mRNA0017_PPi; k_forward5*T7RNAP_bound_mRNA0016_GTP;
  r54: T7RNAP_bound_mRNA0017_PPi => T7RNAP_bound_mRNA0017 + PPi; k_forward6*T7RNAP_bound_mRNA0017_PPi;
  r55: T7RNAP_bound_mRNA0017 + ATP => T7RNAP_bound_mRNA0017_ATP; k_forward4*T7RNAP_bound_mRNA0017*ATP;
  r56: T7RNAP_bound_mRNA0017_ATP => T7RNAP_bound_mRNA0018_PPi; k_forward5*T7RNAP_bound_mRNA0017_ATP;
  r57: T7RNAP_bound_mRNA0018_PPi => T7RNAP_bound_mRNA0018 + PPi; k_forward6*T7RNAP_bound_mRNA0018_PPi;
  r58: T7RNAP_bound_mRNA0018 + GTP => T7RNAP_bound_mRNA0018_GTP; k_forward4*T7RNAP_bound_mRNA0018*GTP;
  r59: T7RNAP_bound_mRNA0018_GTP => T7RNAP_bound_mRNA0019_PPi; k_forward5*T7RNAP_bound_mRNA0018_GTP;
  r60: T7RNAP_bound_mRNA0019_PPi => T7RNAP_bound_mRNA0019 + PPi; k_forward6*T7RNAP_bound_mRNA0019_PPi;
  r61: T7RNAP_bound_mRNA0019 + CTP => T7RNAP_bound_mRNA0019_CTP; k_forward4*T7RNAP_bound_mRNA0019*CTP;
  r62: T7RNAP_bound_mRNA0019_CTP => T7RNAP_bound_mRNA0020_PPi; k_forward5*T7RNAP_bound_mRNA0019_CTP;
  r63: T7RNAP_bound_mRNA0020_PPi => T7RNAP_bound_mRNA0020 + PPi; k_forward6*T7RNAP_bound_mRNA0020_PPi;
  r64: T7RNAP_bound_mRNA0020 + CTP => T7RNAP_bound_mRNA0020_CTP; k_forward4*T7RNAP_bound_mRNA0020*CTP;
  r65: T7RNAP_bound_mRNA0020_CTP => T7RNAP_bound_mRNA0021_PPi; k_forward5*T7RNAP_bound_mRNA0020_CTP;
  r66: T7RNAP_bound_mRNA0021_PPi => T7RNAP_bound_mRNA0021 + PPi; k_forward6*T7RNAP_bound_mRNA0021_PPi;
  r67: T7RNAP_bound_mRNA0021 + ATP => T7RNAP_bound_mRNA0021_ATP; k_forward4*T7RNAP_bound_mRNA0021*ATP;
  r68: T7RNAP_bound_mRNA0021_ATP => T7RNAP_bound_mRNA0022_PPi; k_forward5*T7RNAP_bound_mRNA0021_ATP;
  r69: T7RNAP_bound_mRNA0022_PPi => T7RNAP_bound_mRNA0022 + PPi; k_forward6*T7RNAP_bound_mRNA0022_PPi;
  r70: T7RNAP_bound_mRNA0022 + GTP => T7RNAP_bound_mRNA0022_GTP; k_forward4*T7RNAP_bound_mRNA0022*GTP;
  r71: T7RNAP_bound_mRNA0022_GTP => T7RNAP_bound_mRNA0023_PPi; k_forward5*T7RNAP_bound_mRNA0022_GTP;
  r72: T7RNAP_bound_mRNA0023_PPi => T7RNAP_bound_mRNA0023 + PPi; k_forward6*T7RNAP_bound_mRNA0023_PPi;
  r73: T7RNAP_bound_mRNA0023 + GTP => T7RNAP_bound_mRNA0023_GTP; k_forward4*T7RNAP_bound_mRNA0023*GTP;
  r74: T7RNAP_bound_mRNA0023_GTP => T7RNAP_bound_mRNA0024_PPi; k_forward5*T7RNAP_bound_mRNA0023_GTP;
  r75: T7RNAP_bound_mRNA0024_PPi => T7RNAP_bound_mRNA0024 + PPi; k_forward6*T7RNAP_bound_mRNA0024_PPi;
  r76: T7RNAP_bound_mRNA0024 + UTP => T7RNAP_bound_mRNA0024_UTP; k_forward4*T7RNAP_bound_mRNA0024*UTP;
  r77: T7RNAP_bound_mRNA0024_UTP => T7RNAP_bound_mRNA0025_PPi; k_forward5*T7RNAP_bound_mRNA0024_UTP;
  r78: T7RNAP_bound_mRNA0025_PPi => T7RNAP_bound_mRNA0025 + PPi; k_forward6*T7RNAP_bound_mRNA0025_PPi;
  r79: T7RNAP_bound_mRNA0025 + ATP => T7RNAP_bound_mRNA0025_ATP; k_forward4*T7RNAP_bound_mRNA0025*ATP;
  r80: T7RNAP_bound_mRNA0025_ATP => T7RNAP_bound_mRNA0026_PPi; k_forward5*T7RNAP_bound_mRNA0025_ATP;
  r81: T7RNAP_bound_mRNA0026_PPi => T7RNAP_bound_mRNA0026 + PPi; k_forward6*T7RNAP_bound_mRNA0026_PPi;
  r82: T7RNAP_bound_mRNA0026 + ATP => T7RNAP_bound_mRNA0026_ATP; k_forward4*T7RNAP_bound_mRNA0026*ATP;
  r83: T7RNAP_bound_mRNA0026_ATP => T7RNAP_bound_mRNA0027_PPi; k_forward5*T7RNAP_bound_mRNA0026_ATP;
  r84: T7RNAP_bound_mRNA0027_PPi => T7RNAP_bound_mRNA0027 + PPi; k_forward6*T7RNAP_bound_mRNA0027_PPi;
  r85: T7RNAP_bound_mRNA0027 + CTP => T7RNAP_bound_mRNA0027_CTP; k_forward4*T7RNAP_bound_mRNA0027*CTP;
  r86: T7RNAP_bound_mRNA0027_CTP => T7RNAP_bound_mRNA0028_PPi; k_forward5*T7RNAP_bound_mRNA0027_CTP;
  r87: T7RNAP_bound_mRNA0028_PPi => T7RNAP_bound_mRNA0028 + PPi; k_forward6*T7RNAP_bound_mRNA0028_PPi;
  r88: T7RNAP_bound_mRNA0028 + GTP => T7RNAP_bound_mRNA0028_GTP; k_forward4*T7RNAP_bound_mRNA0028*GTP;
  r89: T7RNAP_bound_mRNA0028_GTP => T7RNAP_bound_mRNA0029_PPi; k_forward5*T7RNAP_bound_mRNA0028_GTP;
  r90: T7RNAP_bound_mRNA0029_PPi => T7RNAP_bound_mRNA0029 + PPi; k_forward6*T7RNAP_bound_mRNA0029_PPi;
  r91: T7RNAP_bound_mRNA0029 + ATP => T7RNAP_bound_mRNA0029_ATP; k_forward4*T7RNAP_bound_mRNA0029*ATP;
  r92: T7RNAP_bound_mRNA0029_ATP => T7RNAP_bound_mRNA0030_PPi; k_forward5*T7RNAP_bound_mRNA0029_ATP;
  r93: T7RNAP_bound_mRNA0030_PPi => T7RNAP_bound_mRNA0030 + PPi; k_forward6*T7RNAP_bound_mRNA0030_PPi;
  r94: T7RNAP_bound_mRNA0030 + ATP => T7RNAP_bound_mRNA0030_ATP; k_forward4*T7RNAP_bound_mRNA0030*ATP;
  r95: T7RNAP_bound_mRNA0030_ATP => T7RNAP_bound_mRNA0031_PPi; k_forward5*T7RNAP_bound_mRNA0030_ATP;
  r96: T7RNAP_bound_mRNA0031_PPi => T7RNAP_bound_mRNA0031 + PPi; k_forward6*T7RNAP_bound_mRNA0031_PPi;
  r97: T7RNAP_bound_mRNA0031 + UTP => T7RNAP_bound_mRNA0031_UTP; k_forward4*T7RNAP_bound_mRNA0031*UTP;
  r98: T7RNAP_bound_mRNA0031_UTP => T7RNAP_bound_mRNA0032_PPi; k_forward5*T7RNAP_bound_mRNA0031_UTP;
  r99: T7RNAP_bound_mRNA0032_PPi => T7RNAP_bound_mRNA0032 + PPi; k_forward6*T7RNAP_bound_mRNA0032_PPi;
  r100: T7RNAP_bound_mRNA0032 + GTP => T7RNAP_bound_mRNA0032_GTP; k_forward4*T7RNAP_bound_mRNA0032*GTP;
  r101: T7RNAP_bound_mRNA0032_GTP => T7RNAP_bound_mRNA0033_PPi; k_forward5*T7RNAP_bound_mRNA0032_GTP;
  r102: T7RNAP_bound_mRNA0033_PPi => T7RNAP_bound_mRNA0033 + PPi; k_forward6*T7RNAP_bound_mRNA0033_PPi;
  r103: T7RNAP_bound_mRNA0033 + GTP => T7RNAP_bound_mRNA0033_GTP; k_forward4*T7RNAP_bound_mRNA0033*GTP;
  r104: T7RNAP_bound_mRNA0033_GTP => T7RNAP_bound_mRNA0034_PPi; k_forward5*T7RNAP_bound_mRNA0033_GTP;
  r105: T7RNAP_bound_mRNA0034_PPi => T7RNAP_bound_mRNA0034 + PPi; k_forward6*T7RNAP_bound_mRNA0034_PPi;
  r106: T7RNAP_bound_mRNA0034 + ATP => T7RNAP_bound_mRNA0034_ATP; k_forward4*T7RNAP_bound_mRNA0034*ATP;
  r107: T7RNAP_bound_mRNA0034_ATP => T7RNAP_bound_mRNA0035_PPi; k_forward5*T7RNAP_bound_mRNA0034_ATP;
  r108: T7RNAP_bound_mRNA0035_PPi => T7RNAP_bound_mRNA0035 + PPi; k_forward6*T7RNAP_bound_mRNA0035_PPi;
  r109: T7RNAP_bound_mRNA0035 + UTP => T7RNAP_bound_mRNA0035_UTP; k_forward4*T7RNAP_bound_mRNA0035*UTP;
  r110: T7RNAP_bound_mRNA0035_UTP => T7RNAP_bound_mRNA0036_PPi; k_forward5*T7RNAP_bound_mRNA0035_UTP;
  r111: T7RNAP_bound_mRNA0036_PPi => T7RNAP_bound_mRNA0036 + PPi; k_forward6*T7RNAP_bound_mRNA0036_PPi;
  r112: T7RNAP_bound_mRNA0036 + CTP => T7RNAP_bound_mRNA0036_CTP; k_forward4*T7RNAP_bound_mRNA0036*CTP;
  r113: T7RNAP_bound_mRNA0036_CTP => T7RNAP_bound_mRNA0037_PPi; k_forward5*T7RNAP_bound_mRNA0036_CTP;
  r114: T7RNAP_bound_mRNA0037_PPi => T7RNAP_bound_mRNA0037 + PPi; k_forward6*T7RNAP_bound_mRNA0037_PPi;
  r115: T7RNAP_bound_mRNA0037 + UTP => T7RNAP_bound_mRNA0037_UTP; k_forward4*T7RNAP_bound_mRNA0037*UTP;
  r116: T7RNAP_bound_mRNA0037_UTP => T7RNAP_bound_mRNA0038_PPi; k_forward5*T7RNAP_bound_mRNA0037_UTP;
  r117: T7RNAP_bound_mRNA0038_PPi => T7RNAP_bound_mRNA0038 + PPi; k_forward6*T7RNAP_bound_mRNA0038_PPi;
  r118: T7RNAP_bound_mRNA0038 + CTP => T7RNAP_bound_mRNA0038_CTP; k_forward4*T7RNAP_bound_mRNA0038*CTP;
  r119: T7RNAP_bound_mRNA0038_CTP => T7RNAP_bound_mRNA0039_PPi; k_forward5*T7RNAP_bound_mRNA0038_CTP;
  r120: T7RNAP_bound_mRNA0039_PPi => T7RNAP_bound_mRNA0039 + PPi + MGapt; k_forward6*T7RNAP_bound_mRNA0039_PPi;
  r121: T7RNAP_bound_mRNA0039 + GTP => T7RNAP_bound_mRNA0039_GTP; k_forward4*T7RNAP_bound_mRNA0039*GTP;
  r122: T7RNAP_bound_mRNA0039_GTP => T7RNAP_bound_mRNA0040_PPi; k_forward5*T7RNAP_bound_mRNA0039_GTP;
  r123: T7RNAP_bound_mRNA0040_PPi => T7RNAP_bound_mRNA0040 + PPi; k_forward6*T7RNAP_bound_mRNA0040_PPi;
  r124: T7RNAP_bound_mRNA0040 + ATP => T7RNAP_bound_mRNA0040_ATP; k_forward4*T7RNAP_bound_mRNA0040*ATP;
  r125: T7RNAP_bound_mRNA0040_ATP => T7RNAP_bound_mRNA0041_PPi; k_forward5*T7RNAP_bound_mRNA0040_ATP;
  r126: T7RNAP_bound_mRNA0041_PPi => T7RNAP_bound_mRNA0041 + PPi; k_forward6*T7RNAP_bound_mRNA0041_PPi;
  r127: T7RNAP_bound_mRNA0041 + GTP => T7RNAP_bound_mRNA0041_GTP; k_forward4*T7RNAP_bound_mRNA0041*GTP;
  r128: T7RNAP_bound_mRNA0041_GTP => T7RNAP_bound_mRNA0042_PPi; k_forward5*T7RNAP_bound_mRNA0041_GTP;
  r129: T7RNAP_bound_mRNA0042_PPi => T7RNAP_bound_mRNA0042 + PPi; k_forward6*T7RNAP_bound_mRNA0042_PPi;
  r130: T7RNAP_bound_mRNA0042 + CTP => T7RNAP_bound_mRNA0042_CTP; k_forward4*T7RNAP_bound_mRNA0042*CTP;
  r131: T7RNAP_bound_mRNA0042_CTP => T7RNAP_bound_mRNA0043_PPi; k_forward5*T7RNAP_bound_mRNA0042_CTP;
  r132: T7RNAP_bound_mRNA0043_PPi => T7RNAP_bound_mRNA0043 + PPi; k_forward6*T7RNAP_bound_mRNA0043_PPi;
  r133: T7RNAP_bound_mRNA0043 + CTP => T7RNAP_bound_mRNA0043_CTP; k_forward4*T7RNAP_bound_mRNA0043*CTP;
  r134: T7RNAP_bound_mRNA0043_CTP => T7RNAP_bound_mRNA0044_PPi; k_forward5*T7RNAP_bound_mRNA0043_CTP;
  r135: T7RNAP_bound_mRNA0044_PPi => T7RNAP_bound_mRNA0044 + PPi; k_forward6*T7RNAP_bound_mRNA0044_PPi;
  r136: T7RNAP_bound_mRNA0044 + UTP => T7RNAP_bound_mRNA0044_UTP; k_forward4*T7RNAP_bound_mRNA0044*UTP;
  r137: T7RNAP_bound_mRNA0044_UTP => T7RNAP_bound_mRNA0045_PPi; k_forward5*T7RNAP_bound_mRNA0044_UTP;
  r138: T7RNAP_bound_mRNA0045_PPi => T7RNAP_bound_mRNA0045 + PPi; k_forward6*T7RNAP_bound_mRNA0045_PPi;
  r139: T7RNAP_bound_mRNA0045 + UTP => T7RNAP_bound_mRNA0045_UTP; k_forward4*T7RNAP_bound_mRNA0045*UTP;
  r140: T7RNAP_bound_mRNA0045_UTP => T7RNAP_bound_mRNA0046_PPi; k_forward5*T7RNAP_bound_mRNA0045_UTP;
  r141: T7RNAP_bound_mRNA0046_PPi => T7RNAP_bound_mRNA0046 + PPi; k_forward6*T7RNAP_bound_mRNA0046_PPi;
  r142: T7RNAP_bound_mRNA0046 + ATP => T7RNAP_bound_mRNA0046_ATP; k_forward4*T7RNAP_bound_mRNA0046*ATP;
  r143: T7RNAP_bound_mRNA0046_ATP => T7RNAP_bound_mRNA0047_PPi; k_forward5*T7RNAP_bound_mRNA0046_ATP;
  r144: T7RNAP_bound_mRNA0047_PPi => T7RNAP_bound_mRNA0047 + PPi; k_forward6*T7RNAP_bound_mRNA0047_PPi;
  r145: T7RNAP_bound_mRNA0047 + GTP => T7RNAP_bound_mRNA0047_GTP; k_forward4*T7RNAP_bound_mRNA0047*GTP;
  r146: T7RNAP_bound_mRNA0047_GTP => T7RNAP_bound_mRNA0048_PPi; k_forward5*T7RNAP_bound_mRNA0047_GTP;
  r147: T7RNAP_bound_mRNA0048_PPi => T7RNAP_bound_mRNA0048 + PPi; k_forward6*T7RNAP_bound_mRNA0048_PPi;
  r148: T7RNAP_bound_mRNA0048 + GTP => T7RNAP_bound_mRNA0048_GTP; k_forward4*T7RNAP_bound_mRNA0048*GTP;
  r149: T7RNAP_bound_mRNA0048_GTP => T7RNAP_bound_mRNA0049_PPi; k_forward5*T7RNAP_bound_mRNA0048_GTP;
  r150: T7RNAP_bound_mRNA0049_PPi => T7RNAP_bound_mRNA0049 + PPi; k_forward6*T7RNAP_bound_mRNA0049_PPi;
  r151: T7RNAP_bound_mRNA0049 + ATP => T7RNAP_bound_mRNA0049_ATP; k_forward4*T7RNAP_bound_mRNA0049*ATP;
  r152: T7RNAP_bound_mRNA0049_ATP => T7RNAP_bound_mRNA0050_PPi; k_forward5*T7RNAP_bound_mRNA0049_ATP;
  r153: T7RNAP_bound_mRNA0050_PPi => T7RNAP_bound_mRNA0050 + PPi; k_forward6*T7RNAP_bound_mRNA0050_PPi;
  r154: T7RNAP_bound_mRNA0050 + GTP => T7RNAP_bound_mRNA0050_GTP; k_forward4*T7RNAP_bound_mRNA0050*GTP;
  r155: T7RNAP_bound_mRNA0050_GTP => T7RNAP_bound_mRNA0051_PPi; k_forward5*T7RNAP_bound_mRNA0050_GTP;
  r156: T7RNAP_bound_mRNA0051_PPi => T7RNAP_bound_mRNA0051 + PPi; k_forward6*T7RNAP_bound_mRNA0051_PPi;
  r157: T7RNAP_bound_mRNA0051 + ATP => T7RNAP_bound_mRNA0051_ATP; k_forward4*T7RNAP_bound_mRNA0051*ATP;
  r158: T7RNAP_bound_mRNA0051_ATP => T7RNAP_bound_mRNA0052_PPi; k_forward5*T7RNAP_bound_mRNA0051_ATP;
  r159: T7RNAP_bound_mRNA0052_PPi => T7RNAP_bound_mRNA0052 + PPi; k_forward6*T7RNAP_bound_mRNA0052_PPi;
  r160: T7RNAP_bound_mRNA0052 + UTP => T7RNAP_bound_mRNA0052_UTP; k_forward4*T7RNAP_bound_mRNA0052*UTP;
  r161: T7RNAP_bound_mRNA0052_UTP => T7RNAP_bound_mRNA0053_PPi; k_forward5*T7RNAP_bound_mRNA0052_UTP;
  r162: T7RNAP_bound_mRNA0053_PPi => T7RNAP_bound_mRNA0053 + PPi; k_forward6*T7RNAP_bound_mRNA0053_PPi;
  r163: T7RNAP_bound_mRNA0053 + CTP => T7RNAP_bound_mRNA0053_CTP; k_forward4*T7RNAP_bound_mRNA0053*CTP;
  r164: T7RNAP_bound_mRNA0053_CTP => T7RNAP_bound_mRNA0054_PPi; k_forward5*T7RNAP_bound_mRNA0053_CTP;
  r165: T7RNAP_bound_mRNA0054_PPi => T7RNAP_bound_mRNA0054 + PPi; k_forward6*T7RNAP_bound_mRNA0054_PPi;
  r166: T7RNAP_bound_mRNA0054 + CTP => T7RNAP_bound_mRNA0054_CTP; k_forward4*T7RNAP_bound_mRNA0054*CTP;
  r167: T7RNAP_bound_mRNA0054_CTP => T7RNAP_bound_mRNA0055_PPi; k_forward5*T7RNAP_bound_mRNA0054_CTP;
  r168: T7RNAP_bound_mRNA0055_PPi => T7RNAP_bound_mRNA0055 + PPi; k_forward6*T7RNAP_bound_mRNA0055_PPi;
  r169: T7RNAP_bound_mRNA0055 + GTP => T7RNAP_bound_mRNA0055_GTP; k_forward4*T7RNAP_bound_mRNA0055*GTP;
  r170: T7RNAP_bound_mRNA0055_GTP => T7RNAP_bound_mRNA0056_PPi; k_forward5*T7RNAP_bound_mRNA0055_GTP;
  r171: T7RNAP_bound_mRNA0056_PPi => T7RNAP_bound_mRNA0056 + PPi; k_forward6*T7RNAP_bound_mRNA0056_PPi;
  r172: T7RNAP_bound_mRNA0056 + GTP => T7RNAP_bound_mRNA0056_GTP; k_forward4*T7RNAP_bound_mRNA0056*GTP;
  r173: T7RNAP_bound_mRNA0056_GTP => T7RNAP_bound_mRNA0057_PPi; k_forward5*T7RNAP_bound_mRNA0056_GTP;
  r174: T7RNAP_bound_mRNA0057_PPi => T7RNAP_bound_mRNA0057 + PPi; k_forward6*T7RNAP_bound_mRNA0057_PPi;
  r175: T7RNAP_bound_mRNA0057 + CTP => T7RNAP_bound_mRNA0057_CTP; k_forward4*T7RNAP_bound_mRNA0057*CTP;
  r176: T7RNAP_bound_mRNA0057_CTP => T7RNAP_bound_mRNA0058_PPi; k_forward5*T7RNAP_bound_mRNA0057_CTP;
  r177: T7RNAP_bound_mRNA0058_PPi => T7RNAP_bound_mRNA0058 + PPi; k_forward6*T7RNAP_bound_mRNA0058_PPi;
  r178: T7RNAP_bound_mRNA0058 + UTP => T7RNAP_bound_mRNA0058_UTP; k_forward4*T7RNAP_bound_mRNA0058*UTP;
  r179: T7RNAP_bound_mRNA0058_UTP => T7RNAP_bound_mRNA0059_PPi; k_forward5*T7RNAP_bound_mRNA0058_UTP;
  r180: T7RNAP_bound_mRNA0059_PPi => T7RNAP_bound_mRNA0059 + PPi; k_forward6*T7RNAP_bound_mRNA0059_PPi;
  r181: T7RNAP_bound_mRNA0059 + GTP => T7RNAP_bound_mRNA0059_GTP; k_forward4*T7RNAP_bound_mRNA0059*GTP;
  r182: T7RNAP_bound_mRNA0059_GTP => T7RNAP_bound_mRNA0060_PPi; k_forward5*T7RNAP_bound_mRNA0059_GTP;
  r183: T7RNAP_bound_mRNA0060_PPi => T7RNAP_bound_mRNA0060 + PPi; k_forward6*T7RNAP_bound_mRNA0060_PPi;
  r184: T7RNAP_bound_mRNA0060 + CTP => T7RNAP_bound_mRNA0060_CTP; k_forward4*T7RNAP_bound_mRNA0060*CTP;
  r185: T7RNAP_bound_mRNA0060_CTP => T7RNAP_bound_mRNA0061_PPi; k_forward5*T7RNAP_bound_mRNA0060_CTP;
  r186: T7RNAP_bound_mRNA0061_PPi => T7RNAP_bound_mRNA0061 + PPi; k_forward6*T7RNAP_bound_mRNA0061_PPi;
  r187: T7RNAP_bound_mRNA0061 + UTP => T7RNAP_bound_mRNA0061_UTP; k_forward4*T7RNAP_bound_mRNA0061*UTP;
  r188: T7RNAP_bound_mRNA0061_UTP => T7RNAP_bound_mRNA0062_PPi; k_forward5*T7RNAP_bound_mRNA0061_UTP;
  r189: T7RNAP_bound_mRNA0062_PPi => T7RNAP_bound_mRNA0062 + PPi; k_forward6*T7RNAP_bound_mRNA0062_PPi;
  r190: T7RNAP_bound_mRNA0062 + ATP => T7RNAP_bound_mRNA0062_ATP; k_forward4*T7RNAP_bound_mRNA0062*ATP;
  r191: T7RNAP_bound_mRNA0062_ATP => T7RNAP_bound_mRNA0063_PPi; k_forward5*T7RNAP_bound_mRNA0062_ATP;
  r192: T7RNAP_bound_mRNA0063_PPi => T7RNAP_bound_mRNA0063 + PPi; k_forward6*T7RNAP_bound_mRNA0063_PPi;
  r193: T7RNAP_bound_mRNA0063 + ATP => T7RNAP_bound_mRNA0063_ATP; k_forward4*T7RNAP_bound_mRNA0063*ATP;
  r194: T7RNAP_bound_mRNA0063_ATP => T7RNAP_bound_mRNA0064_PPi; k_forward5*T7RNAP_bound_mRNA0063_ATP;
  r195: T7RNAP_bound_mRNA0064_PPi => T7RNAP_bound_mRNA0064 + PPi; k_forward6*T7RNAP_bound_mRNA0064_PPi;
  r196: T7RNAP_bound_mRNA0064 + CTP => T7RNAP_bound_mRNA0064_CTP; k_forward4*T7RNAP_bound_mRNA0064*CTP;
  r197: T7RNAP_bound_mRNA0064_CTP => T7RNAP_bound_mRNA0065_PPi; k_forward5*T7RNAP_bound_mRNA0064_CTP;
  r198: T7RNAP_bound_mRNA0065_PPi => T7RNAP_bound_mRNA0065 + PPi; k_forward6*T7RNAP_bound_mRNA0065_PPi;
  r199: T7RNAP_bound_mRNA0065 + ATP => T7RNAP_bound_mRNA0065_ATP; k_forward4*T7RNAP_bound_mRNA0065*ATP;
  r200: T7RNAP_bound_mRNA0065_ATP => T7RNAP_bound_mRNA0066_PPi; k_forward5*T7RNAP_bound_mRNA0065_ATP;
  r201: T7RNAP_bound_mRNA0066_PPi => T7RNAP_bound_mRNA0066 + PPi; k_forward6*T7RNAP_bound_mRNA0066_PPi;
  r202: T7RNAP_bound_mRNA0066 + ATP => T7RNAP_bound_mRNA0066_ATP; k_forward4*T7RNAP_bound_mRNA0066*ATP;
  r203: T7RNAP_bound_mRNA0066_ATP => T7RNAP_bound_mRNA0067_PPi; k_forward5*T7RNAP_bound_mRNA0066_ATP;
  r204: T7RNAP_bound_mRNA0067_PPi => T7RNAP_bound_mRNA0067 + PPi; k_forward6*T7RNAP_bound_mRNA0067_PPi;
  r205: T7RNAP_bound_mRNA0067 + ATP => T7RNAP_bound_mRNA0067_ATP; k_forward4*T7RNAP_bound_mRNA0067*ATP;
  r206: T7RNAP_bound_mRNA0067_ATP => T7RNAP_bound_mRNA0068_PPi; k_forward5*T7RNAP_bound_mRNA0067_ATP;
  r207: T7RNAP_bound_mRNA0068_PPi => T7RNAP_bound_mRNA0068 + PPi; k_forward6*T7RNAP_bound_mRNA0068_PPi;
  r208: T7RNAP_bound_mRNA0068 + GTP => T7RNAP_bound_mRNA0068_GTP; k_forward4*T7RNAP_bound_mRNA0068*GTP;
  r209: T7RNAP_bound_mRNA0068_GTP => T7RNAP_bound_mRNA0069_PPi; k_forward5*T7RNAP_bound_mRNA0068_GTP;
  r210: T7RNAP_bound_mRNA0069_PPi => T7RNAP_bound_mRNA0069 + PPi; k_forward6*T7RNAP_bound_mRNA0069_PPi;
  r211: T7RNAP_bound_mRNA0069 + CTP => T7RNAP_bound_mRNA0069_CTP; k_forward4*T7RNAP_bound_mRNA0069*CTP;
  r212: T7RNAP_bound_mRNA0069_CTP => T7RNAP_bound_mRNA0070_PPi; k_forward5*T7RNAP_bound_mRNA0069_CTP;
  r213: T7RNAP_bound_mRNA0070_PPi => T7RNAP_bound_mRNA0070 + PPi; k_forward6*T7RNAP_bound_mRNA0070_PPi;
  r214: T7RNAP_bound_mRNA0070 + CTP => T7RNAP_bound_mRNA0070_CTP; k_forward4*T7RNAP_bound_mRNA0070*CTP;
  r215: T7RNAP_bound_mRNA0070_CTP => T7RNAP_bound_mRNA0071_PPi; k_forward5*T7RNAP_bound_mRNA0070_CTP;
  r216: T7RNAP_bound_mRNA0071_PPi => T7RNAP_bound_mRNA0071 + PPi; k_forward6*T7RNAP_bound_mRNA0071_PPi;
  r217: T7RNAP_bound_mRNA0071 + CTP => T7RNAP_bound_mRNA0071_CTP; k_forward4*T7RNAP_bound_mRNA0071*CTP;
  r218: T7RNAP_bound_mRNA0071_CTP => T7RNAP_bound_mRNA0072_PPi; k_forward5*T7RNAP_bound_mRNA0071_CTP;
  r219: T7RNAP_bound_mRNA0072_PPi => T7RNAP_bound_mRNA0072 + PPi; k_forward6*T7RNAP_bound_mRNA0072_PPi;
  r220: T7RNAP_bound_mRNA0072 + GTP => T7RNAP_bound_mRNA0072_GTP; k_forward4*T7RNAP_bound_mRNA0072*GTP;
  r221: T7RNAP_bound_mRNA0072_GTP => T7RNAP_bound_mRNA0073_PPi; k_forward5*T7RNAP_bound_mRNA0072_GTP;
  r222: T7RNAP_bound_mRNA0073_PPi => T7RNAP_bound_mRNA0073 + PPi; k_forward6*T7RNAP_bound_mRNA0073_PPi;
  r223: T7RNAP_bound_mRNA0073 + ATP => T7RNAP_bound_mRNA0073_ATP; k_forward4*T7RNAP_bound_mRNA0073*ATP;
  r224: T7RNAP_bound_mRNA0073_ATP => T7RNAP_bound_mRNA0074_PPi; k_forward5*T7RNAP_bound_mRNA0073_ATP;
  r225: T7RNAP_bound_mRNA0074_PPi => T7RNAP_bound_mRNA0074 + PPi; k_forward6*T7RNAP_bound_mRNA0074_PPi;
  r226: T7RNAP_bound_mRNA0074 + ATP => T7RNAP_bound_mRNA0074_ATP; k_forward4*T7RNAP_bound_mRNA0074*ATP;
  r227: T7RNAP_bound_mRNA0074_ATP => T7RNAP_bound_mRNA0075_PPi; k_forward5*T7RNAP_bound_mRNA0074_ATP;
  r228: T7RNAP_bound_mRNA0075_PPi => T7RNAP_bound_mRNA0075 + PPi; k_forward6*T7RNAP_bound_mRNA0075_PPi;
  r229: T7RNAP_bound_mRNA0075 + ATP => T7RNAP_bound_mRNA0075_ATP; k_forward4*T7RNAP_bound_mRNA0075*ATP;
  r230: T7RNAP_bound_mRNA0075_ATP => T7RNAP_bound_mRNA0076_PPi; k_forward5*T7RNAP_bound_mRNA0075_ATP;
  r231: T7RNAP_bound_mRNA0076_PPi => T7RNAP_bound_mRNA0076 + PPi; k_forward6*T7RNAP_bound_mRNA0076_PPi;
  r232: T7RNAP_bound_mRNA0076 + GTP => T7RNAP_bound_mRNA0076_GTP; k_forward4*T7RNAP_bound_mRNA0076*GTP;
  r233: T7RNAP_bound_mRNA0076_GTP => T7RNAP_bound_mRNA0077_PPi; k_forward5*T7RNAP_bound_mRNA0076_GTP;
  r234: T7RNAP_bound_mRNA0077_PPi => T7RNAP_bound_mRNA0077 + PPi; k_forward6*T7RNAP_bound_mRNA0077_PPi;
  r235: T7RNAP_bound_mRNA0077 + GTP => T7RNAP_bound_mRNA0077_GTP; k_forward4*T7RNAP_bound_mRNA0077*GTP;
  r236: T7RNAP_bound_mRNA0077_GTP => T7RNAP_bound_mRNA0078_PPi; k_forward5*T7RNAP_bound_mRNA0077_GTP;
  r237: T7RNAP_bound_mRNA0078_PPi => T7RNAP_bound_mRNA0078 + PPi; k_forward6*T7RNAP_bound_mRNA0078_PPi;
  r238: T7RNAP_bound_mRNA0078 + ATP => T7RNAP_bound_mRNA0078_ATP; k_forward4*T7RNAP_bound_mRNA0078*ATP;
  r239: T7RNAP_bound_mRNA0078_ATP => T7RNAP_bound_mRNA0079_PPi; k_forward5*T7RNAP_bound_mRNA0078_ATP;
  r240: T7RNAP_bound_mRNA0079_PPi => T7RNAP_bound_mRNA0079 + PPi; k_forward6*T7RNAP_bound_mRNA0079_PPi;
  r241: T7RNAP_bound_mRNA0079 + ATP => T7RNAP_bound_mRNA0079_ATP; k_forward4*T7RNAP_bound_mRNA0079*ATP;
  r242: T7RNAP_bound_mRNA0079_ATP => T7RNAP_bound_mRNA0080_PPi; k_forward5*T7RNAP_bound_mRNA0079_ATP;
  r243: T7RNAP_bound_mRNA0080_PPi => T7RNAP_bound_mRNA0080 + PPi; k_forward6*T7RNAP_bound_mRNA0080_PPi;
  r244: T7RNAP_bound_mRNA0080 + GTP => T7RNAP_bound_mRNA0080_GTP; k_forward4*T7RNAP_bound_mRNA0080*GTP;
  r245: T7RNAP_bound_mRNA0080_GTP => T7RNAP_bound_mRNA0081_PPi; k_forward5*T7RNAP_bound_mRNA0080_GTP;
  r246: T7RNAP_bound_mRNA0081_PPi => T7RNAP_bound_mRNA0081 + PPi; k_forward6*T7RNAP_bound_mRNA0081_PPi;
  r247: T7RNAP_bound_mRNA0081 + CTP => T7RNAP_bound_mRNA0081_CTP; k_forward4*T7RNAP_bound_mRNA0081*CTP;
  r248: T7RNAP_bound_mRNA0081_CTP => T7RNAP_bound_mRNA0082_PPi; k_forward5*T7RNAP_bound_mRNA0081_CTP;
  r249: T7RNAP_bound_mRNA0082_PPi => T7RNAP_bound_mRNA0082 + PPi; k_forward6*T7RNAP_bound_mRNA0082_PPi;
  r250: T7RNAP_bound_mRNA0082 + UTP => T7RNAP_bound_mRNA0082_UTP; k_forward4*T7RNAP_bound_mRNA0082*UTP;
  r251: T7RNAP_bound_mRNA0082_UTP => T7RNAP_bound_mRNA0083_PPi; k_forward5*T7RNAP_bound_mRNA0082_UTP;
  r252: T7RNAP_bound_mRNA0083_PPi => T7RNAP_bound_mRNA0083 + PPi; k_forward6*T7RNAP_bound_mRNA0083_PPi;
  r253: T7RNAP_bound_mRNA0083 + GTP => T7RNAP_bound_mRNA0083_GTP; k_forward4*T7RNAP_bound_mRNA0083*GTP;
  r254: T7RNAP_bound_mRNA0083_GTP => T7RNAP_bound_mRNA0084_PPi; k_forward5*T7RNAP_bound_mRNA0083_GTP;
  r255: T7RNAP_bound_mRNA0084_PPi => T7RNAP_bound_mRNA0084 + PPi; k_forward6*T7RNAP_bound_mRNA0084_PPi;
  r256: T7RNAP_bound_mRNA0084 + ATP => T7RNAP_bound_mRNA0084_ATP; k_forward4*T7RNAP_bound_mRNA0084*ATP;
  r257: T7RNAP_bound_mRNA0084_ATP => T7RNAP_bound_mRNA0085_PPi; k_forward5*T7RNAP_bound_mRNA0084_ATP;
  r258: T7RNAP_bound_mRNA0085_PPi => T7RNAP_bound_mRNA0085 + PPi; k_forward6*T7RNAP_bound_mRNA0085_PPi;
  r259: T7RNAP_bound_mRNA0085 + GTP => T7RNAP_bound_mRNA0085_GTP; k_forward4*T7RNAP_bound_mRNA0085*GTP;
  r260: T7RNAP_bound_mRNA0085_GTP => T7RNAP_bound_mRNA0086_PPi; k_forward5*T7RNAP_bound_mRNA0085_GTP;
  r261: T7RNAP_bound_mRNA0086_PPi => T7RNAP_bound_mRNA0086 + PPi; k_forward6*T7RNAP_bound_mRNA0086_PPi;
  r262: T7RNAP_bound_mRNA0086 + UTP => T7RNAP_bound_mRNA0086_UTP; k_forward4*T7RNAP_bound_mRNA0086*UTP;
  r263: T7RNAP_bound_mRNA0086_UTP => T7RNAP_bound_mRNA0087_PPi; k_forward5*T7RNAP_bound_mRNA0086_UTP;
  r264: T7RNAP_bound_mRNA0087_PPi => T7RNAP_bound_mRNA0087 + PPi; k_forward6*T7RNAP_bound_mRNA0087_PPi;
  r265: T7RNAP_bound_mRNA0087 + UTP => T7RNAP_bound_mRNA0087_UTP; k_forward4*T7RNAP_bound_mRNA0087*UTP;
  r266: T7RNAP_bound_mRNA0087_UTP => T7RNAP_bound_mRNA0088_PPi; k_forward5*T7RNAP_bound_mRNA0087_UTP;
  r267: T7RNAP_bound_mRNA0088_PPi => T7RNAP_bound_mRNA0088 + PPi; k_forward6*T7RNAP_bound_mRNA0088_PPi;
  r268: T7RNAP_bound_mRNA0088 + GTP => T7RNAP_bound_mRNA0088_GTP; k_forward4*T7RNAP_bound_mRNA0088*GTP;
  r269: T7RNAP_bound_mRNA0088_GTP => T7RNAP_bound_mRNA0089_PPi; k_forward5*T7RNAP_bound_mRNA0088_GTP;
  r270: T7RNAP_bound_mRNA0089_PPi => T7RNAP_bound_mRNA0089 + PPi; k_forward6*T7RNAP_bound_mRNA0089_PPi;
  r271: T7RNAP_bound_mRNA0089 + GTP => T7RNAP_bound_mRNA0089_GTP; k_forward4*T7RNAP_bound_mRNA0089*GTP;
  r272: T7RNAP_bound_mRNA0089_GTP => T7RNAP_bound_mRNA0090_PPi; k_forward5*T7RNAP_bound_mRNA0089_GTP;
  r273: T7RNAP_bound_mRNA0090_PPi => T7RNAP_bound_mRNA0090 + PPi; k_forward6*T7RNAP_bound_mRNA0090_PPi;
  r274: T7RNAP_bound_mRNA0090 + CTP => T7RNAP_bound_mRNA0090_CTP; k_forward4*T7RNAP_bound_mRNA0090*CTP;
  r275: T7RNAP_bound_mRNA0090_CTP => T7RNAP_bound_mRNA0091_PPi; k_forward5*T7RNAP_bound_mRNA0090_CTP;
  r276: T7RNAP_bound_mRNA0091_PPi => T7RNAP_bound_mRNA0091 + PPi; k_forward6*T7RNAP_bound_mRNA0091_PPi;
  r277: T7RNAP_bound_mRNA0091 + UTP => T7RNAP_bound_mRNA0091_UTP; k_forward4*T7RNAP_bound_mRNA0091*UTP;
  r278: T7RNAP_bound_mRNA0091_UTP => T7RNAP_bound_mRNA0092_PPi; k_forward5*T7RNAP_bound_mRNA0091_UTP;
  r279: T7RNAP_bound_mRNA0092_PPi => T7RNAP_bound_mRNA0092 + PPi; k_forward6*T7RNAP_bound_mRNA0092_PPi;
  r280: T7RNAP_bound_mRNA0092 + GTP => T7RNAP_bound_mRNA0092_GTP; k_forward4*T7RNAP_bound_mRNA0092*GTP;
  r281: T7RNAP_bound_mRNA0092_GTP => T7RNAP_bound_mRNA0093_PPi; k_forward5*T7RNAP_bound_mRNA0092_GTP;
  r282: T7RNAP_bound_mRNA0093_PPi => T7RNAP_bound_mRNA0093 + PPi; k_forward6*T7RNAP_bound_mRNA0093_PPi;
  r283: T7RNAP_bound_mRNA0093 + CTP => T7RNAP_bound_mRNA0093_CTP; k_forward4*T7RNAP_bound_mRNA0093*CTP;
  r284: T7RNAP_bound_mRNA0093_CTP => T7RNAP_bound_mRNA0094_PPi; k_forward5*T7RNAP_bound_mRNA0093_CTP;
  r285: T7RNAP_bound_mRNA0094_PPi => T7RNAP_bound_mRNA0094 + PPi; k_forward6*T7RNAP_bound_mRNA0094_PPi;
  r286: T7RNAP_bound_mRNA0094 + UTP => T7RNAP_bound_mRNA0094_UTP; k_forward4*T7RNAP_bound_mRNA0094*UTP;
  r287: T7RNAP_bound_mRNA0094_UTP => T7RNAP_bound_mRNA0095_PPi; k_forward5*T7RNAP_bound_mRNA0094_UTP;
  r288: T7RNAP_bound_mRNA0095_PPi => T7RNAP_bound_mRNA0095 + PPi; k_forward6*T7RNAP_bound_mRNA0095_PPi;
  r289: T7RNAP_bound_mRNA0095 + GTP => T7RNAP_bound_mRNA0095_GTP; k_forward4*T7RNAP_bound_mRNA0095*GTP;
  r290: T7RNAP_bound_mRNA0095_GTP => T7RNAP_bound_mRNA0096_PPi; k_forward5*T7RNAP_bound_mRNA0095_GTP;
  r291: T7RNAP_bound_mRNA0096_PPi => T7RNAP_bound_mRNA0096 + PPi; k_forward6*T7RNAP_bound_mRNA0096_PPi;
  r292: T7RNAP_bound_mRNA0096 + CTP => T7RNAP_bound_mRNA0096_CTP; k_forward4*T7RNAP_bound_mRNA0096*CTP;
  r293: T7RNAP_bound_mRNA0096_CTP => T7RNAP_bound_mRNA0097_PPi; k_forward5*T7RNAP_bound_mRNA0096_CTP;
  r294: T7RNAP_bound_mRNA0097_PPi => T7RNAP_bound_mRNA0097 + PPi; k_forward6*T7RNAP_bound_mRNA0097_PPi;
  r295: T7RNAP_bound_mRNA0097 + CTP => T7RNAP_bound_mRNA0097_CTP; k_forward4*T7RNAP_bound_mRNA0097*CTP;
  r296: T7RNAP_bound_mRNA0097_CTP => T7RNAP_bound_mRNA0098_PPi; k_forward5*T7RNAP_bound_mRNA0097_CTP;
  r297: T7RNAP_bound_mRNA0098_PPi => T7RNAP_bound_mRNA0098 + PPi; k_forward6*T7RNAP_bound_mRNA0098_PPi;
  r298: T7RNAP_bound_mRNA0098 + ATP => T7RNAP_bound_mRNA0098_ATP; k_forward4*T7RNAP_bound_mRNA0098*ATP;
  r299: T7RNAP_bound_mRNA0098_ATP => T7RNAP_bound_mRNA0099_PPi; k_forward5*T7RNAP_bound_mRNA0098_ATP;
  r300: T7RNAP_bound_mRNA0099_PPi => T7RNAP_bound_mRNA0099 + PPi; k_forward6*T7RNAP_bound_mRNA0099_PPi;
  r301: T7RNAP_bound_mRNA0099 + CTP => T7RNAP_bound_mRNA0099_CTP; k_forward4*T7RNAP_bound_mRNA0099*CTP;
  r302: T7RNAP_bound_mRNA0099_CTP => T7RNAP_bound_mRNA0100_PPi; k_forward5*T7RNAP_bound_mRNA0099_CTP;
  r303: T7RNAP_bound_mRNA0100_PPi => T7RNAP_bound_mRNA0100 + PPi; k_forward6*T7RNAP_bound_mRNA0100_PPi;
  r304: T7RNAP_bound_mRNA0100 + CTP => T7RNAP_bound_mRNA0100_CTP; k_forward4*T7RNAP_bound_mRNA0100*CTP;
  r305: T7RNAP_bound_mRNA0100_CTP => T7RNAP_bound_mRNA0101_PPi; k_forward5*T7RNAP_bound_mRNA0100_CTP;
  r306: T7RNAP_bound_mRNA0101_PPi => T7RNAP_bound_mRNA0101 + PPi; k_forward6*T7RNAP_bound_mRNA0101_PPi;
  r307: T7RNAP_bound_mRNA0101 + GTP => T7RNAP_bound_mRNA0101_GTP; k_forward4*T7RNAP_bound_mRNA0101*GTP;
  r308: T7RNAP_bound_mRNA0101_GTP => T7RNAP_bound_mRNA0102_PPi; k_forward5*T7RNAP_bound_mRNA0101_GTP;
  r309: T7RNAP_bound_mRNA0102_PPi => T7RNAP_bound_mRNA0102 + PPi; k_forward6*T7RNAP_bound_mRNA0102_PPi;
  r310: T7RNAP_bound_mRNA0102 + CTP => T7RNAP_bound_mRNA0102_CTP; k_forward4*T7RNAP_bound_mRNA0102*CTP;
  r311: T7RNAP_bound_mRNA0102_CTP => T7RNAP_bound_mRNA0103_PPi; k_forward5*T7RNAP_bound_mRNA0102_CTP;
  r312: T7RNAP_bound_mRNA0103_PPi => T7RNAP_bound_mRNA0103 + PPi; k_forward6*T7RNAP_bound_mRNA0103_PPi;
  r313: T7RNAP_bound_mRNA0103 + UTP => T7RNAP_bound_mRNA0103_UTP; k_forward4*T7RNAP_bound_mRNA0103*UTP;
  r314: T7RNAP_bound_mRNA0103_UTP => T7RNAP_bound_mRNA0104_PPi; k_forward5*T7RNAP_bound_mRNA0103_UTP;
  r315: T7RNAP_bound_mRNA0104_PPi => T7RNAP_bound_mRNA0104 + PPi; k_forward6*T7RNAP_bound_mRNA0104_PPi;
  r316: T7RNAP_bound_mRNA0104 + GTP => T7RNAP_bound_mRNA0104_GTP; k_forward4*T7RNAP_bound_mRNA0104*GTP;
  r317: T7RNAP_bound_mRNA0104_GTP => T7RNAP_bound_mRNA0105_PPi; k_forward5*T7RNAP_bound_mRNA0104_GTP;
  r318: T7RNAP_bound_mRNA0105_PPi => T7RNAP_bound_mRNA0105 + PPi; k_forward6*T7RNAP_bound_mRNA0105_PPi;
  r319: T7RNAP_bound_mRNA0105 + ATP => T7RNAP_bound_mRNA0105_ATP; k_forward4*T7RNAP_bound_mRNA0105*ATP;
  r320: T7RNAP_bound_mRNA0105_ATP => T7RNAP_bound_mRNA0106_PPi; k_forward5*T7RNAP_bound_mRNA0105_ATP;
  r321: T7RNAP_bound_mRNA0106_PPi => T7RNAP_bound_mRNA0106 + PPi; k_forward6*T7RNAP_bound_mRNA0106_PPi;
  r322: T7RNAP_bound_mRNA0106 + GTP => T7RNAP_bound_mRNA0106_GTP; k_forward4*T7RNAP_bound_mRNA0106*GTP;
  r323: T7RNAP_bound_mRNA0106_GTP => T7RNAP_bound_mRNA0107_PPi; k_forward5*T7RNAP_bound_mRNA0106_GTP;
  r324: T7RNAP_bound_mRNA0107_PPi => T7RNAP_bound_mRNA0107 + PPi; k_forward6*T7RNAP_bound_mRNA0107_PPi;
  r325: T7RNAP_bound_mRNA0107 + CTP => T7RNAP_bound_mRNA0107_CTP; k_forward4*T7RNAP_bound_mRNA0107*CTP;
  r326: T7RNAP_bound_mRNA0107_CTP => T7RNAP_bound_mRNA0108_PPi; k_forward5*T7RNAP_bound_mRNA0107_CTP;
  r327: T7RNAP_bound_mRNA0108_PPi => T7RNAP_bound_mRNA0108 + PPi; k_forward6*T7RNAP_bound_mRNA0108_PPi;
  r328: T7RNAP_bound_mRNA0108 + ATP => T7RNAP_bound_mRNA0108_ATP; k_forward4*T7RNAP_bound_mRNA0108*ATP;
  r329: T7RNAP_bound_mRNA0108_ATP => T7RNAP_bound_mRNA0109_PPi; k_forward5*T7RNAP_bound_mRNA0108_ATP;
  r330: T7RNAP_bound_mRNA0109_PPi => T7RNAP_bound_mRNA0109 + PPi; k_forward6*T7RNAP_bound_mRNA0109_PPi;
  r331: T7RNAP_bound_mRNA0109 + ATP => T7RNAP_bound_mRNA0109_ATP; k_forward4*T7RNAP_bound_mRNA0109*ATP;
  r332: T7RNAP_bound_mRNA0109_ATP => T7RNAP_bound_mRNA0110_PPi; k_forward5*T7RNAP_bound_mRNA0109_ATP;
  r333: T7RNAP_bound_mRNA0110_PPi => T7RNAP_bound_mRNA0110 + PPi; k_forward6*T7RNAP_bound_mRNA0110_PPi;
  r334: T7RNAP_bound_mRNA0110 + UTP => T7RNAP_bound_mRNA0110_UTP; k_forward4*T7RNAP_bound_mRNA0110*UTP;
  r335: T7RNAP_bound_mRNA0110_UTP => T7RNAP_bound_mRNA0111_PPi; k_forward5*T7RNAP_bound_mRNA0110_UTP;
  r336: T7RNAP_bound_mRNA0111_PPi => T7RNAP_bound_mRNA0111 + PPi; k_forward6*T7RNAP_bound_mRNA0111_PPi;
  r337: T7RNAP_bound_mRNA0111 + ATP => T7RNAP_bound_mRNA0111_ATP; k_forward4*T7RNAP_bound_mRNA0111*ATP;
  r338: T7RNAP_bound_mRNA0111_ATP => T7RNAP_bound_mRNA0112_PPi; k_forward5*T7RNAP_bound_mRNA0111_ATP;
  r339: T7RNAP_bound_mRNA0112_PPi => T7RNAP_bound_mRNA0112 + PPi; k_forward6*T7RNAP_bound_mRNA0112_PPi;
  r340: T7RNAP_bound_mRNA0112 + ATP => T7RNAP_bound_mRNA0112_ATP; k_forward4*T7RNAP_bound_mRNA0112*ATP;
  r341: T7RNAP_bound_mRNA0112_ATP => T7RNAP_bound_mRNA0113_PPi; k_forward5*T7RNAP_bound_mRNA0112_ATP;
  r342: T7RNAP_bound_mRNA0113_PPi => T7RNAP_bound_mRNA0113 + PPi; k_forward6*T7RNAP_bound_mRNA0113_PPi;
  r343: T7RNAP_bound_mRNA0113 => T7RNAP + DNA + mRNA_i + mRNA_t; k_forward7*T7RNAP_bound_mRNA0113;

  // Unit definitions:
  unit square_metre = metre^2;
end
