// SBML level 3 version 2

model biocrnpyler_971123()
  // model units - substance: mole, time: second, volume: litre, area: square_metre, length: metre, extent: mole

  // Compartments:
  compartment default = 1e-6;

  // Species:
  species T7RNAP in default = 0;
  species DNA in default = 0;
  species mRNA_i in default = 0;
  species MGapt in default = 0;
  species mRNA_t in default = 0;
  species ATP in default = 0;
  species GTP in default = 0;
  species CTP in default = 0;
  species UTP in default = 0;
  species PPi in default = 0;
  species PO4 in default = 0;
  species T7RNAP_bound_GTP in default = 0;
  species T7RNAP_bound in default = 0;
  species T7RNAP_bound_GDP_PO4 in default = 0;
  species T7RNAP_bound_mRNA0000 in default = 0;
  species T7RNAP_bound_mRNA0000_CTP in default = 0;
  species T7RNAP_bound_mRNA0001_PPi in default = 0;
  species T7RNAP_bound_mRNA0001 in default = 0;
  species T7RNAP_bound_mRNA0001_CTP in default = 0;
  species T7RNAP_bound_mRNA0002_PPi in default = 0;
  species T7RNAP_bound_mRNA0002 in default = 0;
  species T7RNAP_bound_mRNA0002_UTP in default = 0;
  species T7RNAP_bound_mRNA0003_PPi in default = 0;
  species T7RNAP_bound_mRNA0003 in default = 0;
  species T7RNAP_bound_mRNA0003_ATP in default = 0;
  species T7RNAP_bound_mRNA0004_PPi in default = 0;
  species T7RNAP_bound_mRNA0004 in default = 0;
  species T7RNAP_bound_mRNA0004_GTP in default = 0;
  species T7RNAP_bound_mRNA0005_PPi in default = 0;
  species T7RNAP_bound_mRNA0005 in default = 0;
  species T7RNAP_bound_mRNA0005_GTP in default = 0;
  species T7RNAP_bound_mRNA0006_PPi in default = 0;
  species T7RNAP_bound_mRNA0006 in default = 0;
  species T7RNAP_bound_mRNA0006_GTP in default = 0;
  species T7RNAP_bound_mRNA0007_PPi in default = 0;
  species T7RNAP_bound_mRNA0007 in default = 0;
  species T7RNAP_bound_mRNA0007_CTP in default = 0;
  species T7RNAP_bound_mRNA0008_PPi in default = 0;
  species T7RNAP_bound_mRNA0008 in default = 0;
  species T7RNAP_bound_mRNA0008_UTP in default = 0;
  species T7RNAP_bound_mRNA0009_PPi in default = 0;
  species T7RNAP_bound_mRNA0009 in default = 0;
  species T7RNAP_bound_mRNA0009_GTP in default = 0;
  species T7RNAP_bound_mRNA0010_PPi in default = 0;
  species T7RNAP_bound_mRNA0010 in default = 0;
  species T7RNAP_bound_mRNA0010_ATP in default = 0;
  species T7RNAP_bound_mRNA0011_PPi in default = 0;
  species T7RNAP_bound_mRNA0011 in default = 0;
  species T7RNAP_bound_mRNA0011_CTP in default = 0;
  species T7RNAP_bound_mRNA0012_PPi in default = 0;
  species T7RNAP_bound_mRNA0012 in default = 0;
  species T7RNAP_bound_mRNA0012_CTP in default = 0;
  species T7RNAP_bound_mRNA0013_PPi in default = 0;
  species T7RNAP_bound_mRNA0013 in default = 0;
  species T7RNAP_bound_mRNA0013_GTP in default = 0;
  species T7RNAP_bound_mRNA0014_PPi in default = 0;
  species T7RNAP_bound_mRNA0014 in default = 0;
  species T7RNAP_bound_mRNA0014_CTP in default = 0;
  species T7RNAP_bound_mRNA0015_PPi in default = 0;
  species T7RNAP_bound_mRNA0015 in default = 0;
  species T7RNAP_bound_mRNA0015_UTP in default = 0;
  species T7RNAP_bound_mRNA0016_PPi in default = 0;
  species T7RNAP_bound_mRNA0016 in default = 0;
  species T7RNAP_bound_mRNA0016_CTP in default = 0;
  species T7RNAP_bound_mRNA0017_PPi in default = 0;
  species T7RNAP_bound_mRNA0017 in default = 0;
  species T7RNAP_bound_mRNA0017_UTP in default = 0;
  species T7RNAP_bound_mRNA0018_PPi in default = 0;
  species T7RNAP_bound_mRNA0018 in default = 0;
  species T7RNAP_bound_mRNA0018_CTP in default = 0;
  species T7RNAP_bound_mRNA0019_PPi in default = 0;
  species T7RNAP_bound_mRNA0019 in default = 0;
  species T7RNAP_bound_mRNA0019_GTP in default = 0;
  species T7RNAP_bound_mRNA0020_PPi in default = 0;
  species T7RNAP_bound_mRNA0020 in default = 0;
  species T7RNAP_bound_mRNA0020_GTP in default = 0;
  species T7RNAP_bound_mRNA0021_PPi in default = 0;
  species T7RNAP_bound_mRNA0021 in default = 0;
  species T7RNAP_bound_mRNA0021_UTP in default = 0;
  species T7RNAP_bound_mRNA0022_PPi in default = 0;
  species T7RNAP_bound_mRNA0022 in default = 0;
  species T7RNAP_bound_mRNA0022_CTP in default = 0;
  species T7RNAP_bound_mRNA0023_PPi in default = 0;
  species T7RNAP_bound_mRNA0023 in default = 0;
  species T7RNAP_bound_mRNA0023_CTP in default = 0;
  species T7RNAP_bound_mRNA0024_PPi in default = 0;
  species T7RNAP_bound_mRNA0024 in default = 0;
  species T7RNAP_bound_mRNA0024_ATP in default = 0;
  species T7RNAP_bound_mRNA0025_PPi in default = 0;
  species T7RNAP_bound_mRNA0025 in default = 0;
  species T7RNAP_bound_mRNA0025_UTP in default = 0;
  species T7RNAP_bound_mRNA0026_PPi in default = 0;
  species T7RNAP_bound_mRNA0026 in default = 0;
  species T7RNAP_bound_mRNA0026_UTP in default = 0;
  species T7RNAP_bound_mRNA0027_PPi in default = 0;
  species T7RNAP_bound_mRNA0027 in default = 0;
  species T7RNAP_bound_mRNA0027_GTP in default = 0;
  species T7RNAP_bound_mRNA0028_PPi in default = 0;
  species T7RNAP_bound_mRNA0028 in default = 0;
  species T7RNAP_bound_mRNA0028_CTP in default = 0;
  species T7RNAP_bound_mRNA0029_PPi in default = 0;
  species T7RNAP_bound_mRNA0029 in default = 0;
  species T7RNAP_bound_mRNA0029_UTP in default = 0;
  species T7RNAP_bound_mRNA0030_PPi in default = 0;
  species T7RNAP_bound_mRNA0030 in default = 0;
  species T7RNAP_bound_mRNA0030_UTP in default = 0;
  species T7RNAP_bound_mRNA0031_PPi in default = 0;
  species T7RNAP_bound_mRNA0031 in default = 0;
  species T7RNAP_bound_mRNA0031_ATP in default = 0;
  species T7RNAP_bound_mRNA0032_PPi in default = 0;
  species T7RNAP_bound_mRNA0032 in default = 0;
  species T7RNAP_bound_mRNA0032_CTP in default = 0;
  species T7RNAP_bound_mRNA0033_PPi in default = 0;
  species T7RNAP_bound_mRNA0033 in default = 0;
  species T7RNAP_bound_mRNA0033_CTP in default = 0;
  species T7RNAP_bound_mRNA0034_PPi in default = 0;
  species T7RNAP_bound_mRNA0034 in default = 0;
  species T7RNAP_bound_mRNA0034_UTP in default = 0;
  species T7RNAP_bound_mRNA0035_PPi in default = 0;
  species T7RNAP_bound_mRNA0035 in default = 0;
  species T7RNAP_bound_mRNA0035_ATP in default = 0;
  species T7RNAP_bound_mRNA0036_PPi in default = 0;
  species T7RNAP_bound_mRNA0036 in default = 0;
  species T7RNAP_bound_mRNA0036_GTP in default = 0;
  species T7RNAP_bound_mRNA0037_PPi in default = 0;
  species T7RNAP_bound_mRNA0037 in default = 0;
  species T7RNAP_bound_mRNA0037_ATP in default = 0;
  species T7RNAP_bound_mRNA0038_PPi in default = 0;
  species T7RNAP_bound_mRNA0038 in default = 0;
  species T7RNAP_bound_mRNA0038_GTP in default = 0;
  species T7RNAP_bound_mRNA0039_PPi in default = 0;
  species T7RNAP_bound_mRNA0039 in default = 0;
  species T7RNAP_bound_mRNA0039_CTP in default = 0;
  species T7RNAP_bound_mRNA0040_PPi in default = 0;
  species T7RNAP_bound_mRNA0040 in default = 0;
  species T7RNAP_bound_mRNA0040_UTP in default = 0;
  species T7RNAP_bound_mRNA0041_PPi in default = 0;
  species T7RNAP_bound_mRNA0041 in default = 0;
  species T7RNAP_bound_mRNA0041_CTP in default = 0;
  species T7RNAP_bound_mRNA0042_PPi in default = 0;
  species T7RNAP_bound_mRNA0042 in default = 0;
  species T7RNAP_bound_mRNA0042_GTP in default = 0;
  species T7RNAP_bound_mRNA0043_PPi in default = 0;
  species T7RNAP_bound_mRNA0043 in default = 0;
  species T7RNAP_bound_mRNA0043_GTP in default = 0;
  species T7RNAP_bound_mRNA0044_PPi in default = 0;
  species T7RNAP_bound_mRNA0044 in default = 0;
  species T7RNAP_bound_mRNA0044_ATP in default = 0;
  species T7RNAP_bound_mRNA0045_PPi in default = 0;
  species T7RNAP_bound_mRNA0045 in default = 0;
  species T7RNAP_bound_mRNA0045_ATP in default = 0;
  species T7RNAP_bound_mRNA0046_PPi in default = 0;
  species T7RNAP_bound_mRNA0046 in default = 0;
  species T7RNAP_bound_mRNA0046_UTP in default = 0;
  species T7RNAP_bound_mRNA0047_PPi in default = 0;
  species T7RNAP_bound_mRNA0047 in default = 0;
  species T7RNAP_bound_mRNA0047_CTP in default = 0;
  species T7RNAP_bound_mRNA0048_PPi in default = 0;
  species T7RNAP_bound_mRNA0048 in default = 0;
  species T7RNAP_bound_mRNA0048_CTP in default = 0;
  species T7RNAP_bound_mRNA0049_PPi in default = 0;
  species T7RNAP_bound_mRNA0049 in default = 0;
  species T7RNAP_bound_mRNA0049_UTP in default = 0;
  species T7RNAP_bound_mRNA0050_PPi in default = 0;
  species T7RNAP_bound_mRNA0050 in default = 0;
  species T7RNAP_bound_mRNA0050_CTP in default = 0;
  species T7RNAP_bound_mRNA0051_PPi in default = 0;
  species T7RNAP_bound_mRNA0051 in default = 0;
  species T7RNAP_bound_mRNA0051_UTP in default = 0;
  species T7RNAP_bound_mRNA0052_PPi in default = 0;
  species T7RNAP_bound_mRNA0052 in default = 0;
  species T7RNAP_bound_mRNA0052_ATP in default = 0;
  species T7RNAP_bound_mRNA0053_PPi in default = 0;
  species T7RNAP_bound_mRNA0053 in default = 0;
  species T7RNAP_bound_mRNA0053_GTP in default = 0;
  species T7RNAP_bound_mRNA0054_PPi in default = 0;
  species T7RNAP_bound_mRNA0054 in default = 0;
  species T7RNAP_bound_mRNA0054_GTP in default = 0;
  species T7RNAP_bound_mRNA0055_PPi in default = 0;
  species T7RNAP_bound_mRNA0055 in default = 0;
  species T7RNAP_bound_mRNA0055_CTP in default = 0;
  species T7RNAP_bound_mRNA0056_PPi in default = 0;
  species T7RNAP_bound_mRNA0056 in default = 0;
  species T7RNAP_bound_mRNA0056_CTP in default = 0;
  species T7RNAP_bound_mRNA0057_PPi in default = 0;
  species T7RNAP_bound_mRNA0057 in default = 0;
  species T7RNAP_bound_mRNA0057_GTP in default = 0;
  species T7RNAP_bound_mRNA0058_PPi in default = 0;
  species T7RNAP_bound_mRNA0058 in default = 0;
  species T7RNAP_bound_mRNA0058_ATP in default = 0;
  species T7RNAP_bound_mRNA0059_PPi in default = 0;
  species T7RNAP_bound_mRNA0059 in default = 0;
  species T7RNAP_bound_mRNA0059_CTP in default = 0;
  species T7RNAP_bound_mRNA0060_PPi in default = 0;
  species T7RNAP_bound_mRNA0060 in default = 0;
  species T7RNAP_bound_mRNA0060_GTP in default = 0;
  species T7RNAP_bound_mRNA0061_PPi in default = 0;
  species T7RNAP_bound_mRNA0061 in default = 0;
  species T7RNAP_bound_mRNA0061_ATP in default = 0;
  species T7RNAP_bound_mRNA0062_PPi in default = 0;
  species T7RNAP_bound_mRNA0062 in default = 0;
  species T7RNAP_bound_mRNA0062_UTP in default = 0;
  species T7RNAP_bound_mRNA0063_PPi in default = 0;
  species T7RNAP_bound_mRNA0063 in default = 0;
  species T7RNAP_bound_mRNA0063_UTP in default = 0;
  species T7RNAP_bound_mRNA0064_PPi in default = 0;
  species T7RNAP_bound_mRNA0064 in default = 0;
  species T7RNAP_bound_mRNA0064_GTP in default = 0;
  species T7RNAP_bound_mRNA0065_PPi in default = 0;
  species T7RNAP_bound_mRNA0065 in default = 0;
  species T7RNAP_bound_mRNA0065_UTP in default = 0;
  species T7RNAP_bound_mRNA0066_PPi in default = 0;
  species T7RNAP_bound_mRNA0066 in default = 0;
  species T7RNAP_bound_mRNA0066_UTP in default = 0;
  species T7RNAP_bound_mRNA0067_PPi in default = 0;
  species T7RNAP_bound_mRNA0067 in default = 0;
  species T7RNAP_bound_mRNA0067_UTP in default = 0;
  species T7RNAP_bound_mRNA0068_PPi in default = 0;
  species T7RNAP_bound_mRNA0068 in default = 0;
  species T7RNAP_bound_mRNA0068_CTP in default = 0;
  species T7RNAP_bound_mRNA0069_PPi in default = 0;
  species T7RNAP_bound_mRNA0069 in default = 0;
  species T7RNAP_bound_mRNA0069_GTP in default = 0;
  species T7RNAP_bound_mRNA0070_PPi in default = 0;
  species T7RNAP_bound_mRNA0070 in default = 0;
  species T7RNAP_bound_mRNA0070_GTP in default = 0;
  species T7RNAP_bound_mRNA0071_PPi in default = 0;
  species T7RNAP_bound_mRNA0071 in default = 0;
  species T7RNAP_bound_mRNA0071_GTP in default = 0;
  species T7RNAP_bound_mRNA0072_PPi in default = 0;
  species T7RNAP_bound_mRNA0072 in default = 0;
  species T7RNAP_bound_mRNA0072_CTP in default = 0;
  species T7RNAP_bound_mRNA0073_PPi in default = 0;
  species T7RNAP_bound_mRNA0073 in default = 0;
  species T7RNAP_bound_mRNA0073_UTP in default = 0;
  species T7RNAP_bound_mRNA0074_PPi in default = 0;
  species T7RNAP_bound_mRNA0074 in default = 0;
  species T7RNAP_bound_mRNA0074_UTP in default = 0;
  species T7RNAP_bound_mRNA0075_PPi in default = 0;
  species T7RNAP_bound_mRNA0075 in default = 0;
  species T7RNAP_bound_mRNA0075_UTP in default = 0;
  species T7RNAP_bound_mRNA0076_PPi in default = 0;
  species T7RNAP_bound_mRNA0076 in default = 0;
  species T7RNAP_bound_mRNA0076_CTP in default = 0;
  species T7RNAP_bound_mRNA0077_PPi in default = 0;
  species T7RNAP_bound_mRNA0077 in default = 0;
  species T7RNAP_bound_mRNA0077_CTP in default = 0;
  species T7RNAP_bound_mRNA0078_PPi in default = 0;
  species T7RNAP_bound_mRNA0078 in default = 0;
  species T7RNAP_bound_mRNA0078_UTP in default = 0;
  species T7RNAP_bound_mRNA0079_PPi in default = 0;
  species T7RNAP_bound_mRNA0079 in default = 0;
  species T7RNAP_bound_mRNA0079_UTP in default = 0;
  species T7RNAP_bound_mRNA0080_PPi in default = 0;
  species T7RNAP_bound_mRNA0080 in default = 0;
  species T7RNAP_bound_mRNA0080_CTP in default = 0;
  species T7RNAP_bound_mRNA0081_PPi in default = 0;
  species T7RNAP_bound_mRNA0081 in default = 0;
  species T7RNAP_bound_mRNA0081_GTP in default = 0;
  species T7RNAP_bound_mRNA0082_PPi in default = 0;
  species T7RNAP_bound_mRNA0082 in default = 0;
  species T7RNAP_bound_mRNA0082_ATP in default = 0;
  species T7RNAP_bound_mRNA0083_PPi in default = 0;
  species T7RNAP_bound_mRNA0083 in default = 0;
  species T7RNAP_bound_mRNA0083_CTP in default = 0;
  species T7RNAP_bound_mRNA0084_PPi in default = 0;
  species T7RNAP_bound_mRNA0084 in default = 0;
  species T7RNAP_bound_mRNA0084_UTP in default = 0;
  species T7RNAP_bound_mRNA0085_PPi in default = 0;
  species T7RNAP_bound_mRNA0085 in default = 0;
  species T7RNAP_bound_mRNA0085_CTP in default = 0;
  species T7RNAP_bound_mRNA0086_PPi in default = 0;
  species T7RNAP_bound_mRNA0086 in default = 0;
  species T7RNAP_bound_mRNA0086_ATP in default = 0;
  species T7RNAP_bound_mRNA0087_PPi in default = 0;
  species T7RNAP_bound_mRNA0087 in default = 0;
  species T7RNAP_bound_mRNA0087_ATP in default = 0;
  species T7RNAP_bound_mRNA0088_PPi in default = 0;
  species T7RNAP_bound_mRNA0088 in default = 0;
  species T7RNAP_bound_mRNA0088_CTP in default = 0;
  species T7RNAP_bound_mRNA0089_PPi in default = 0;
  species T7RNAP_bound_mRNA0089 in default = 0;
  species T7RNAP_bound_mRNA0089_CTP in default = 0;
  species T7RNAP_bound_mRNA0090_PPi in default = 0;
  species T7RNAP_bound_mRNA0090 in default = 0;
  species T7RNAP_bound_mRNA0090_GTP in default = 0;
  species T7RNAP_bound_mRNA0091_PPi in default = 0;
  species T7RNAP_bound_mRNA0091 in default = 0;
  species T7RNAP_bound_mRNA0091_ATP in default = 0;
  species T7RNAP_bound_mRNA0092_PPi in default = 0;
  species T7RNAP_bound_mRNA0092 in default = 0;
  species T7RNAP_bound_mRNA0092_CTP in default = 0;
  species T7RNAP_bound_mRNA0093_PPi in default = 0;
  species T7RNAP_bound_mRNA0093 in default = 0;
  species T7RNAP_bound_mRNA0093_GTP in default = 0;
  species T7RNAP_bound_mRNA0094_PPi in default = 0;
  species T7RNAP_bound_mRNA0094 in default = 0;
  species T7RNAP_bound_mRNA0094_ATP in default = 0;
  species T7RNAP_bound_mRNA0095_PPi in default = 0;
  species T7RNAP_bound_mRNA0095 in default = 0;
  species T7RNAP_bound_mRNA0095_CTP in default = 0;
  species T7RNAP_bound_mRNA0096_PPi in default = 0;
  species T7RNAP_bound_mRNA0096 in default = 0;
  species T7RNAP_bound_mRNA0096_GTP in default = 0;
  species T7RNAP_bound_mRNA0097_PPi in default = 0;
  species T7RNAP_bound_mRNA0097 in default = 0;
  species T7RNAP_bound_mRNA0097_GTP in default = 0;
  species T7RNAP_bound_mRNA0098_PPi in default = 0;
  species T7RNAP_bound_mRNA0098 in default = 0;
  species T7RNAP_bound_mRNA0098_UTP in default = 0;
  species T7RNAP_bound_mRNA0099_PPi in default = 0;
  species T7RNAP_bound_mRNA0099 in default = 0;
  species T7RNAP_bound_mRNA0099_GTP in default = 0;
  species T7RNAP_bound_mRNA0100_PPi in default = 0;
  species T7RNAP_bound_mRNA0100 in default = 0;
  species T7RNAP_bound_mRNA0100_GTP in default = 0;
  species T7RNAP_bound_mRNA0101_PPi in default = 0;
  species T7RNAP_bound_mRNA0101 in default = 0;
  species T7RNAP_bound_mRNA0101_CTP in default = 0;
  species T7RNAP_bound_mRNA0102_PPi in default = 0;
  species T7RNAP_bound_mRNA0102 in default = 0;
  species T7RNAP_bound_mRNA0102_GTP in default = 0;
  species T7RNAP_bound_mRNA0103_PPi in default = 0;
  species T7RNAP_bound_mRNA0103 in default = 0;
  species T7RNAP_bound_mRNA0103_ATP in default = 0;
  species T7RNAP_bound_mRNA0104_PPi in default = 0;
  species T7RNAP_bound_mRNA0104 in default = 0;
  species T7RNAP_bound_mRNA0104_CTP in default = 0;
  species T7RNAP_bound_mRNA0105_PPi in default = 0;
  species T7RNAP_bound_mRNA0105 in default = 0;
  species T7RNAP_bound_mRNA0105_UTP in default = 0;
  species T7RNAP_bound_mRNA0106_PPi in default = 0;
  species T7RNAP_bound_mRNA0106 in default = 0;
  species T7RNAP_bound_mRNA0106_CTP in default = 0;
  species T7RNAP_bound_mRNA0107_PPi in default = 0;
  species T7RNAP_bound_mRNA0107 in default = 0;
  species T7RNAP_bound_mRNA0107_GTP in default = 0;
  species T7RNAP_bound_mRNA0108_PPi in default = 0;
  species T7RNAP_bound_mRNA0108 in default = 0;
  species T7RNAP_bound_mRNA0108_UTP in default = 0;
  species T7RNAP_bound_mRNA0109_PPi in default = 0;
  species T7RNAP_bound_mRNA0109 in default = 0;
  species T7RNAP_bound_mRNA0109_UTP in default = 0;
  species T7RNAP_bound_mRNA0110_PPi in default = 0;
  species T7RNAP_bound_mRNA0110 in default = 0;
  species T7RNAP_bound_mRNA0110_ATP in default = 0;
  species T7RNAP_bound_mRNA0111_PPi in default = 0;
  species T7RNAP_bound_mRNA0111 in default = 0;
  species T7RNAP_bound_mRNA0111_UTP in default = 0;
  species T7RNAP_bound_mRNA0112_PPi in default = 0;
  species T7RNAP_bound_mRNA0112 in default = 0;
  species T7RNAP_bound_mRNA0112_UTP in default = 0;
  species T7RNAP_bound_mRNA0113_PPi in default = 0;
  species T7RNAP_bound_mRNA0113 in default = 0;
  species GDP in default = 0;

  // Parameters:
  k_forward = 6.1;
  k_forward1 = 2.93;
  k_forward2 = 7.82;
  k_forward3 = 5.23;
  k_forward4 = 1.47;
  k_forward5 = 23.59;
  k_forward6 = 948.25;
  k_forward7 = 32.38;

  // Reactions:
  r0: T7RNAP + DNA + GTP => T7RNAP_bound_GTP; k_forward*T7RNAP*DNA*GTP;
  r1: T7RNAP_bound_GTP => T7RNAP_bound_GDP_PO4; k_forward1*T7RNAP_bound_GTP;
  r2: T7RNAP_bound_GDP_PO4 => T7RNAP_bound + GDP + PO4; k_forward2*T7RNAP_bound_GDP_PO4;
  r3: T7RNAP_bound => T7RNAP_bound_mRNA0000; k_forward3*T7RNAP_bound;
  r4: T7RNAP_bound_mRNA0000 + CTP => T7RNAP_bound_mRNA0000_CTP; k_forward4*T7RNAP_bound_mRNA0000*CTP;
  r5: T7RNAP_bound_mRNA0000_CTP => T7RNAP_bound_mRNA0001_PPi; k_forward5*T7RNAP_bound_mRNA0000_CTP;
  r6: T7RNAP_bound_mRNA0001_PPi => T7RNAP_bound_mRNA0001 + PPi; k_forward6*T7RNAP_bound_mRNA0001_PPi;
  r7: T7RNAP_bound_mRNA0001 + CTP => T7RNAP_bound_mRNA0001_CTP; k_forward4*T7RNAP_bound_mRNA0001*CTP;
  r8: T7RNAP_bound_mRNA0001_CTP => T7RNAP_bound_mRNA0002_PPi; k_forward5*T7RNAP_bound_mRNA0001_CTP;
  r9: T7RNAP_bound_mRNA0002_PPi => T7RNAP_bound_mRNA0002 + PPi; k_forward6*T7RNAP_bound_mRNA0002_PPi;
  r10: T7RNAP_bound_mRNA0002 + UTP => T7RNAP_bound_mRNA0002_UTP; k_forward4*T7RNAP_bound_mRNA0002*UTP;
  r11: T7RNAP_bound_mRNA0002_UTP => T7RNAP_bound_mRNA0003_PPi; k_forward5*T7RNAP_bound_mRNA0002_UTP;
  r12: T7RNAP_bound_mRNA0003_PPi => T7RNAP_bound_mRNA0003 + PPi; k_forward6*T7RNAP_bound_mRNA0003_PPi;
  r13: T7RNAP_bound_mRNA0003 + ATP => T7RNAP_bound_mRNA0003_ATP; k_forward4*T7RNAP_bound_mRNA0003*ATP;
  r14: T7RNAP_bound_mRNA0003_ATP => T7RNAP_bound_mRNA0004_PPi; k_forward5*T7RNAP_bound_mRNA0003_ATP;
  r15: T7RNAP_bound_mRNA0004_PPi => T7RNAP_bound_mRNA0004 + PPi; k_forward6*T7RNAP_bound_mRNA0004_PPi;
  r16: T7RNAP_bound_mRNA0004 + GTP => T7RNAP_bound_mRNA0004_GTP; k_forward4*T7RNAP_bound_mRNA0004*GTP;
  r17: T7RNAP_bound_mRNA0004_GTP => T7RNAP_bound_mRNA0005_PPi; k_forward5*T7RNAP_bound_mRNA0004_GTP;
  r18: T7RNAP_bound_mRNA0005_PPi => T7RNAP_bound_mRNA0005 + PPi; k_forward6*T7RNAP_bound_mRNA0005_PPi;
  r19: T7RNAP_bound_mRNA0005 + GTP => T7RNAP_bound_mRNA0005_GTP; k_forward4*T7RNAP_bound_mRNA0005*GTP;
  r20: T7RNAP_bound_mRNA0005_GTP => T7RNAP_bound_mRNA0006_PPi; k_forward5*T7RNAP_bound_mRNA0005_GTP;
  r21: T7RNAP_bound_mRNA0006_PPi => T7RNAP_bound_mRNA0006 + PPi; k_forward6*T7RNAP_bound_mRNA0006_PPi;
  r22: T7RNAP_bound_mRNA0006 + GTP => T7RNAP_bound_mRNA0006_GTP; k_forward4*T7RNAP_bound_mRNA0006*GTP;
  r23: T7RNAP_bound_mRNA0006_GTP => T7RNAP_bound_mRNA0007_PPi; k_forward5*T7RNAP_bound_mRNA0006_GTP;
  r24: T7RNAP_bound_mRNA0007_PPi => T7RNAP_bound_mRNA0007 + PPi; k_forward6*T7RNAP_bound_mRNA0007_PPi;
  r25: T7RNAP_bound_mRNA0007 + CTP => T7RNAP_bound_mRNA0007_CTP; k_forward4*T7RNAP_bound_mRNA0007*CTP;
  r26: T7RNAP_bound_mRNA0007_CTP => T7RNAP_bound_mRNA0008_PPi; k_forward5*T7RNAP_bound_mRNA0007_CTP;
  r27: T7RNAP_bound_mRNA0008_PPi => T7RNAP_bound_mRNA0008 + PPi; k_forward6*T7RNAP_bound_mRNA0008_PPi;
  r28: T7RNAP_bound_mRNA0008 + UTP => T7RNAP_bound_mRNA0008_UTP; k_forward4*T7RNAP_bound_mRNA0008*UTP;
  r29: T7RNAP_bound_mRNA0008_UTP => T7RNAP_bound_mRNA0009_PPi; k_forward5*T7RNAP_bound_mRNA0008_UTP;
  r30: T7RNAP_bound_mRNA0009_PPi => T7RNAP_bound_mRNA0009 + PPi; k_forward6*T7RNAP_bound_mRNA0009_PPi;
  r31: T7RNAP_bound_mRNA0009 + GTP => T7RNAP_bound_mRNA0009_GTP; k_forward4*T7RNAP_bound_mRNA0009*GTP;
  r32: T7RNAP_bound_mRNA0009_GTP => T7RNAP_bound_mRNA0010_PPi; k_forward5*T7RNAP_bound_mRNA0009_GTP;
  r33: T7RNAP_bound_mRNA0010_PPi => T7RNAP_bound_mRNA0010 + PPi; k_forward6*T7RNAP_bound_mRNA0010_PPi;
  r34: T7RNAP_bound_mRNA0010 + ATP => T7RNAP_bound_mRNA0010_ATP; k_forward4*T7RNAP_bound_mRNA0010*ATP;
  r35: T7RNAP_bound_mRNA0010_ATP => T7RNAP_bound_mRNA0011_PPi; k_forward5*T7RNAP_bound_mRNA0010_ATP;
  r36: T7RNAP_bound_mRNA0011_PPi => T7RNAP_bound_mRNA0011 + PPi; k_forward6*T7RNAP_bound_mRNA0011_PPi;
  r37: T7RNAP_bound_mRNA0011 + CTP => T7RNAP_bound_mRNA0011_CTP; k_forward4*T7RNAP_bound_mRNA0011*CTP;
  r38: T7RNAP_bound_mRNA0011_CTP => T7RNAP_bound_mRNA0012_PPi; k_forward5*T7RNAP_bound_mRNA0011_CTP;
  r39: T7RNAP_bound_mRNA0012_PPi => T7RNAP_bound_mRNA0012 + PPi; k_forward6*T7RNAP_bound_mRNA0012_PPi;
  r40: T7RNAP_bound_mRNA0012 + CTP => T7RNAP_bound_mRNA0012_CTP; k_forward4*T7RNAP_bound_mRNA0012*CTP;
  r41: T7RNAP_bound_mRNA0012_CTP => T7RNAP_bound_mRNA0013_PPi; k_forward5*T7RNAP_bound_mRNA0012_CTP;
  r42: T7RNAP_bound_mRNA0013_PPi => T7RNAP_bound_mRNA0013 + PPi; k_forward6*T7RNAP_bound_mRNA0013_PPi;
  r43: T7RNAP_bound_mRNA0013 + GTP => T7RNAP_bound_mRNA0013_GTP; k_forward4*T7RNAP_bound_mRNA0013*GTP;
  r44: T7RNAP_bound_mRNA0013_GTP => T7RNAP_bound_mRNA0014_PPi; k_forward5*T7RNAP_bound_mRNA0013_GTP;
  r45: T7RNAP_bound_mRNA0014_PPi => T7RNAP_bound_mRNA0014 + PPi; k_forward6*T7RNAP_bound_mRNA0014_PPi;
  r46: T7RNAP_bound_mRNA0014 + CTP => T7RNAP_bound_mRNA0014_CTP; k_forward4*T7RNAP_bound_mRNA0014*CTP;
  r47: T7RNAP_bound_mRNA0014_CTP => T7RNAP_bound_mRNA0015_PPi; k_forward5*T7RNAP_bound_mRNA0014_CTP;
  r48: T7RNAP_bound_mRNA0015_PPi => T7RNAP_bound_mRNA0015 + PPi; k_forward6*T7RNAP_bound_mRNA0015_PPi;
  r49: T7RNAP_bound_mRNA0015 + UTP => T7RNAP_bound_mRNA0015_UTP; k_forward4*T7RNAP_bound_mRNA0015*UTP;
  r50: T7RNAP_bound_mRNA0015_UTP => T7RNAP_bound_mRNA0016_PPi; k_forward5*T7RNAP_bound_mRNA0015_UTP;
  r51: T7RNAP_bound_mRNA0016_PPi => T7RNAP_bound_mRNA0016 + PPi; k_forward6*T7RNAP_bound_mRNA0016_PPi;
  r52: T7RNAP_bound_mRNA0016 + CTP => T7RNAP_bound_mRNA0016_CTP; k_forward4*T7RNAP_bound_mRNA0016*CTP;
  r53: T7RNAP_bound_mRNA0016_CTP => T7RNAP_bound_mRNA0017_PPi; k_forward5*T7RNAP_bound_mRNA0016_CTP;
  r54: T7RNAP_bound_mRNA0017_PPi => T7RNAP_bound_mRNA0017 + PPi; k_forward6*T7RNAP_bound_mRNA0017_PPi;
  r55: T7RNAP_bound_mRNA0017 + UTP => T7RNAP_bound_mRNA0017_UTP; k_forward4*T7RNAP_bound_mRNA0017*UTP;
  r56: T7RNAP_bound_mRNA0017_UTP => T7RNAP_bound_mRNA0018_PPi; k_forward5*T7RNAP_bound_mRNA0017_UTP;
  r57: T7RNAP_bound_mRNA0018_PPi => T7RNAP_bound_mRNA0018 + PPi; k_forward6*T7RNAP_bound_mRNA0018_PPi;
  r58: T7RNAP_bound_mRNA0018 + CTP => T7RNAP_bound_mRNA0018_CTP; k_forward4*T7RNAP_bound_mRNA0018*CTP;
  r59: T7RNAP_bound_mRNA0018_CTP => T7RNAP_bound_mRNA0019_PPi; k_forward5*T7RNAP_bound_mRNA0018_CTP;
  r60: T7RNAP_bound_mRNA0019_PPi => T7RNAP_bound_mRNA0019 + PPi; k_forward6*T7RNAP_bound_mRNA0019_PPi;
  r61: T7RNAP_bound_mRNA0019 + GTP => T7RNAP_bound_mRNA0019_GTP; k_forward4*T7RNAP_bound_mRNA0019*GTP;
  r62: T7RNAP_bound_mRNA0019_GTP => T7RNAP_bound_mRNA0020_PPi; k_forward5*T7RNAP_bound_mRNA0019_GTP;
  r63: T7RNAP_bound_mRNA0020_PPi => T7RNAP_bound_mRNA0020 + PPi; k_forward6*T7RNAP_bound_mRNA0020_PPi;
  r64: T7RNAP_bound_mRNA0020 + GTP => T7RNAP_bound_mRNA0020_GTP; k_forward4*T7RNAP_bound_mRNA0020*GTP;
  r65: T7RNAP_bound_mRNA0020_GTP => T7RNAP_bound_mRNA0021_PPi; k_forward5*T7RNAP_bound_mRNA0020_GTP;
  r66: T7RNAP_bound_mRNA0021_PPi => T7RNAP_bound_mRNA0021 + PPi; k_forward6*T7RNAP_bound_mRNA0021_PPi;
  r67: T7RNAP_bound_mRNA0021 + UTP => T7RNAP_bound_mRNA0021_UTP; k_forward4*T7RNAP_bound_mRNA0021*UTP;
  r68: T7RNAP_bound_mRNA0021_UTP => T7RNAP_bound_mRNA0022_PPi; k_forward5*T7RNAP_bound_mRNA0021_UTP;
  r69: T7RNAP_bound_mRNA0022_PPi => T7RNAP_bound_mRNA0022 + PPi; k_forward6*T7RNAP_bound_mRNA0022_PPi;
  r70: T7RNAP_bound_mRNA0022 + CTP => T7RNAP_bound_mRNA0022_CTP; k_forward4*T7RNAP_bound_mRNA0022*CTP;
  r71: T7RNAP_bound_mRNA0022_CTP => T7RNAP_bound_mRNA0023_PPi; k_forward5*T7RNAP_bound_mRNA0022_CTP;
  r72: T7RNAP_bound_mRNA0023_PPi => T7RNAP_bound_mRNA0023 + PPi; k_forward6*T7RNAP_bound_mRNA0023_PPi;
  r73: T7RNAP_bound_mRNA0023 + CTP => T7RNAP_bound_mRNA0023_CTP; k_forward4*T7RNAP_bound_mRNA0023*CTP;
  r74: T7RNAP_bound_mRNA0023_CTP => T7RNAP_bound_mRNA0024_PPi; k_forward5*T7RNAP_bound_mRNA0023_CTP;
  r75: T7RNAP_bound_mRNA0024_PPi => T7RNAP_bound_mRNA0024 + PPi; k_forward6*T7RNAP_bound_mRNA0024_PPi;
  r76: T7RNAP_bound_mRNA0024 + ATP => T7RNAP_bound_mRNA0024_ATP; k_forward4*T7RNAP_bound_mRNA0024*ATP;
  r77: T7RNAP_bound_mRNA0024_ATP => T7RNAP_bound_mRNA0025_PPi; k_forward5*T7RNAP_bound_mRNA0024_ATP;
  r78: T7RNAP_bound_mRNA0025_PPi => T7RNAP_bound_mRNA0025 + PPi; k_forward6*T7RNAP_bound_mRNA0025_PPi;
  r79: T7RNAP_bound_mRNA0025 + UTP => T7RNAP_bound_mRNA0025_UTP; k_forward4*T7RNAP_bound_mRNA0025*UTP;
  r80: T7RNAP_bound_mRNA0025_UTP => T7RNAP_bound_mRNA0026_PPi; k_forward5*T7RNAP_bound_mRNA0025_UTP;
  r81: T7RNAP_bound_mRNA0026_PPi => T7RNAP_bound_mRNA0026 + PPi; k_forward6*T7RNAP_bound_mRNA0026_PPi;
  r82: T7RNAP_bound_mRNA0026 + UTP => T7RNAP_bound_mRNA0026_UTP; k_forward4*T7RNAP_bound_mRNA0026*UTP;
  r83: T7RNAP_bound_mRNA0026_UTP => T7RNAP_bound_mRNA0027_PPi; k_forward5*T7RNAP_bound_mRNA0026_UTP;
  r84: T7RNAP_bound_mRNA0027_PPi => T7RNAP_bound_mRNA0027 + PPi; k_forward6*T7RNAP_bound_mRNA0027_PPi;
  r85: T7RNAP_bound_mRNA0027 + GTP => T7RNAP_bound_mRNA0027_GTP; k_forward4*T7RNAP_bound_mRNA0027*GTP;
  r86: T7RNAP_bound_mRNA0027_GTP => T7RNAP_bound_mRNA0028_PPi; k_forward5*T7RNAP_bound_mRNA0027_GTP;
  r87: T7RNAP_bound_mRNA0028_PPi => T7RNAP_bound_mRNA0028 + PPi; k_forward6*T7RNAP_bound_mRNA0028_PPi;
  r88: T7RNAP_bound_mRNA0028 + CTP => T7RNAP_bound_mRNA0028_CTP; k_forward4*T7RNAP_bound_mRNA0028*CTP;
  r89: T7RNAP_bound_mRNA0028_CTP => T7RNAP_bound_mRNA0029_PPi; k_forward5*T7RNAP_bound_mRNA0028_CTP;
  r90: T7RNAP_bound_mRNA0029_PPi => T7RNAP_bound_mRNA0029 + PPi; k_forward6*T7RNAP_bound_mRNA0029_PPi;
  r91: T7RNAP_bound_mRNA0029 + UTP => T7RNAP_bound_mRNA0029_UTP; k_forward4*T7RNAP_bound_mRNA0029*UTP;
  r92: T7RNAP_bound_mRNA0029_UTP => T7RNAP_bound_mRNA0030_PPi; k_forward5*T7RNAP_bound_mRNA0029_UTP;
  r93: T7RNAP_bound_mRNA0030_PPi => T7RNAP_bound_mRNA0030 + PPi; k_forward6*T7RNAP_bound_mRNA0030_PPi;
  r94: T7RNAP_bound_mRNA0030 + UTP => T7RNAP_bound_mRNA0030_UTP; k_forward4*T7RNAP_bound_mRNA0030*UTP;
  r95: T7RNAP_bound_mRNA0030_UTP => T7RNAP_bound_mRNA0031_PPi; k_forward5*T7RNAP_bound_mRNA0030_UTP;
  r96: T7RNAP_bound_mRNA0031_PPi => T7RNAP_bound_mRNA0031 + PPi; k_forward6*T7RNAP_bound_mRNA0031_PPi;
  r97: T7RNAP_bound_mRNA0031 + ATP => T7RNAP_bound_mRNA0031_ATP; k_forward4*T7RNAP_bound_mRNA0031*ATP;
  r98: T7RNAP_bound_mRNA0031_ATP => T7RNAP_bound_mRNA0032_PPi; k_forward5*T7RNAP_bound_mRNA0031_ATP;
  r99: T7RNAP_bound_mRNA0032_PPi => T7RNAP_bound_mRNA0032 + PPi; k_forward6*T7RNAP_bound_mRNA0032_PPi;
  r100: T7RNAP_bound_mRNA0032 + CTP => T7RNAP_bound_mRNA0032_CTP; k_forward4*T7RNAP_bound_mRNA0032*CTP;
  r101: T7RNAP_bound_mRNA0032_CTP => T7RNAP_bound_mRNA0033_PPi; k_forward5*T7RNAP_bound_mRNA0032_CTP;
  r102: T7RNAP_bound_mRNA0033_PPi => T7RNAP_bound_mRNA0033 + PPi; k_forward6*T7RNAP_bound_mRNA0033_PPi;
  r103: T7RNAP_bound_mRNA0033 + CTP => T7RNAP_bound_mRNA0033_CTP; k_forward4*T7RNAP_bound_mRNA0033*CTP;
  r104: T7RNAP_bound_mRNA0033_CTP => T7RNAP_bound_mRNA0034_PPi; k_forward5*T7RNAP_bound_mRNA0033_CTP;
  r105: T7RNAP_bound_mRNA0034_PPi => T7RNAP_bound_mRNA0034 + PPi; k_forward6*T7RNAP_bound_mRNA0034_PPi;
  r106: T7RNAP_bound_mRNA0034 + UTP => T7RNAP_bound_mRNA0034_UTP; k_forward4*T7RNAP_bound_mRNA0034*UTP;
  r107: T7RNAP_bound_mRNA0034_UTP => T7RNAP_bound_mRNA0035_PPi; k_forward5*T7RNAP_bound_mRNA0034_UTP;
  r108: T7RNAP_bound_mRNA0035_PPi => T7RNAP_bound_mRNA0035 + PPi; k_forward6*T7RNAP_bound_mRNA0035_PPi;
  r109: T7RNAP_bound_mRNA0035 + ATP => T7RNAP_bound_mRNA0035_ATP; k_forward4*T7RNAP_bound_mRNA0035*ATP;
  r110: T7RNAP_bound_mRNA0035_ATP => T7RNAP_bound_mRNA0036_PPi; k_forward5*T7RNAP_bound_mRNA0035_ATP;
  r111: T7RNAP_bound_mRNA0036_PPi => T7RNAP_bound_mRNA0036 + PPi; k_forward6*T7RNAP_bound_mRNA0036_PPi;
  r112: T7RNAP_bound_mRNA0036 + GTP => T7RNAP_bound_mRNA0036_GTP; k_forward4*T7RNAP_bound_mRNA0036*GTP;
  r113: T7RNAP_bound_mRNA0036_GTP => T7RNAP_bound_mRNA0037_PPi; k_forward5*T7RNAP_bound_mRNA0036_GTP;
  r114: T7RNAP_bound_mRNA0037_PPi => T7RNAP_bound_mRNA0037 + PPi; k_forward6*T7RNAP_bound_mRNA0037_PPi;
  r115: T7RNAP_bound_mRNA0037 + ATP => T7RNAP_bound_mRNA0037_ATP; k_forward4*T7RNAP_bound_mRNA0037*ATP;
  r116: T7RNAP_bound_mRNA0037_ATP => T7RNAP_bound_mRNA0038_PPi; k_forward5*T7RNAP_bound_mRNA0037_ATP;
  r117: T7RNAP_bound_mRNA0038_PPi => T7RNAP_bound_mRNA0038 + PPi; k_forward6*T7RNAP_bound_mRNA0038_PPi;
  r118: T7RNAP_bound_mRNA0038 + GTP => T7RNAP_bound_mRNA0038_GTP; k_forward4*T7RNAP_bound_mRNA0038*GTP;
  r119: T7RNAP_bound_mRNA0038_GTP => T7RNAP_bound_mRNA0039_PPi; k_forward5*T7RNAP_bound_mRNA0038_GTP;
  r120: T7RNAP_bound_mRNA0039_PPi => T7RNAP_bound_mRNA0039 + PPi + MGapt; k_forward6*T7RNAP_bound_mRNA0039_PPi;
  r121: T7RNAP_bound_mRNA0039 + CTP => T7RNAP_bound_mRNA0039_CTP; k_forward4*T7RNAP_bound_mRNA0039*CTP;
  r122: T7RNAP_bound_mRNA0039_CTP => T7RNAP_bound_mRNA0040_PPi; k_forward5*T7RNAP_bound_mRNA0039_CTP;
  r123: T7RNAP_bound_mRNA0040_PPi => T7RNAP_bound_mRNA0040 + PPi; k_forward6*T7RNAP_bound_mRNA0040_PPi;
  r124: T7RNAP_bound_mRNA0040 + UTP => T7RNAP_bound_mRNA0040_UTP; k_forward4*T7RNAP_bound_mRNA0040*UTP;
  r125: T7RNAP_bound_mRNA0040_UTP => T7RNAP_bound_mRNA0041_PPi; k_forward5*T7RNAP_bound_mRNA0040_UTP;
  r126: T7RNAP_bound_mRNA0041_PPi => T7RNAP_bound_mRNA0041 + PPi; k_forward6*T7RNAP_bound_mRNA0041_PPi;
  r127: T7RNAP_bound_mRNA0041 + CTP => T7RNAP_bound_mRNA0041_CTP; k_forward4*T7RNAP_bound_mRNA0041*CTP;
  r128: T7RNAP_bound_mRNA0041_CTP => T7RNAP_bound_mRNA0042_PPi; k_forward5*T7RNAP_bound_mRNA0041_CTP;
  r129: T7RNAP_bound_mRNA0042_PPi => T7RNAP_bound_mRNA0042 + PPi; k_forward6*T7RNAP_bound_mRNA0042_PPi;
  r130: T7RNAP_bound_mRNA0042 + GTP => T7RNAP_bound_mRNA0042_GTP; k_forward4*T7RNAP_bound_mRNA0042*GTP;
  r131: T7RNAP_bound_mRNA0042_GTP => T7RNAP_bound_mRNA0043_PPi; k_forward5*T7RNAP_bound_mRNA0042_GTP;
  r132: T7RNAP_bound_mRNA0043_PPi => T7RNAP_bound_mRNA0043 + PPi; k_forward6*T7RNAP_bound_mRNA0043_PPi;
  r133: T7RNAP_bound_mRNA0043 + GTP => T7RNAP_bound_mRNA0043_GTP; k_forward4*T7RNAP_bound_mRNA0043*GTP;
  r134: T7RNAP_bound_mRNA0043_GTP => T7RNAP_bound_mRNA0044_PPi; k_forward5*T7RNAP_bound_mRNA0043_GTP;
  r135: T7RNAP_bound_mRNA0044_PPi => T7RNAP_bound_mRNA0044 + PPi; k_forward6*T7RNAP_bound_mRNA0044_PPi;
  r136: T7RNAP_bound_mRNA0044 + ATP => T7RNAP_bound_mRNA0044_ATP; k_forward4*T7RNAP_bound_mRNA0044*ATP;
  r137: T7RNAP_bound_mRNA0044_ATP => T7RNAP_bound_mRNA0045_PPi; k_forward5*T7RNAP_bound_mRNA0044_ATP;
  r138: T7RNAP_bound_mRNA0045_PPi => T7RNAP_bound_mRNA0045 + PPi; k_forward6*T7RNAP_bound_mRNA0045_PPi;
  r139: T7RNAP_bound_mRNA0045 + ATP => T7RNAP_bound_mRNA0045_ATP; k_forward4*T7RNAP_bound_mRNA0045*ATP;
  r140: T7RNAP_bound_mRNA0045_ATP => T7RNAP_bound_mRNA0046_PPi; k_forward5*T7RNAP_bound_mRNA0045_ATP;
  r141: T7RNAP_bound_mRNA0046_PPi => T7RNAP_bound_mRNA0046 + PPi; k_forward6*T7RNAP_bound_mRNA0046_PPi;
  r142: T7RNAP_bound_mRNA0046 + UTP => T7RNAP_bound_mRNA0046_UTP; k_forward4*T7RNAP_bound_mRNA0046*UTP;
  r143: T7RNAP_bound_mRNA0046_UTP => T7RNAP_bound_mRNA0047_PPi; k_forward5*T7RNAP_bound_mRNA0046_UTP;
  r144: T7RNAP_bound_mRNA0047_PPi => T7RNAP_bound_mRNA0047 + PPi; k_forward6*T7RNAP_bound_mRNA0047_PPi;
  r145: T7RNAP_bound_mRNA0047 + CTP => T7RNAP_bound_mRNA0047_CTP; k_forward4*T7RNAP_bound_mRNA0047*CTP;
  r146: T7RNAP_bound_mRNA0047_CTP => T7RNAP_bound_mRNA0048_PPi; k_forward5*T7RNAP_bound_mRNA0047_CTP;
  r147: T7RNAP_bound_mRNA0048_PPi => T7RNAP_bound_mRNA0048 + PPi; k_forward6*T7RNAP_bound_mRNA0048_PPi;
  r148: T7RNAP_bound_mRNA0048 + CTP => T7RNAP_bound_mRNA0048_CTP; k_forward4*T7RNAP_bound_mRNA0048*CTP;
  r149: T7RNAP_bound_mRNA0048_CTP => T7RNAP_bound_mRNA0049_PPi; k_forward5*T7RNAP_bound_mRNA0048_CTP;
  r150: T7RNAP_bound_mRNA0049_PPi => T7RNAP_bound_mRNA0049 + PPi; k_forward6*T7RNAP_bound_mRNA0049_PPi;
  r151: T7RNAP_bound_mRNA0049 + UTP => T7RNAP_bound_mRNA0049_UTP; k_forward4*T7RNAP_bound_mRNA0049*UTP;
  r152: T7RNAP_bound_mRNA0049_UTP => T7RNAP_bound_mRNA0050_PPi; k_forward5*T7RNAP_bound_mRNA0049_UTP;
  r153: T7RNAP_bound_mRNA0050_PPi => T7RNAP_bound_mRNA0050 + PPi; k_forward6*T7RNAP_bound_mRNA0050_PPi;
  r154: T7RNAP_bound_mRNA0050 + CTP => T7RNAP_bound_mRNA0050_CTP; k_forward4*T7RNAP_bound_mRNA0050*CTP;
  r155: T7RNAP_bound_mRNA0050_CTP => T7RNAP_bound_mRNA0051_PPi; k_forward5*T7RNAP_bound_mRNA0050_CTP;
  r156: T7RNAP_bound_mRNA0051_PPi => T7RNAP_bound_mRNA0051 + PPi; k_forward6*T7RNAP_bound_mRNA0051_PPi;
  r157: T7RNAP_bound_mRNA0051 + UTP => T7RNAP_bound_mRNA0051_UTP; k_forward4*T7RNAP_bound_mRNA0051*UTP;
  r158: T7RNAP_bound_mRNA0051_UTP => T7RNAP_bound_mRNA0052_PPi; k_forward5*T7RNAP_bound_mRNA0051_UTP;
  r159: T7RNAP_bound_mRNA0052_PPi => T7RNAP_bound_mRNA0052 + PPi; k_forward6*T7RNAP_bound_mRNA0052_PPi;
  r160: T7RNAP_bound_mRNA0052 + ATP => T7RNAP_bound_mRNA0052_ATP; k_forward4*T7RNAP_bound_mRNA0052*ATP;
  r161: T7RNAP_bound_mRNA0052_ATP => T7RNAP_bound_mRNA0053_PPi; k_forward5*T7RNAP_bound_mRNA0052_ATP;
  r162: T7RNAP_bound_mRNA0053_PPi => T7RNAP_bound_mRNA0053 + PPi; k_forward6*T7RNAP_bound_mRNA0053_PPi;
  r163: T7RNAP_bound_mRNA0053 + GTP => T7RNAP_bound_mRNA0053_GTP; k_forward4*T7RNAP_bound_mRNA0053*GTP;
  r164: T7RNAP_bound_mRNA0053_GTP => T7RNAP_bound_mRNA0054_PPi; k_forward5*T7RNAP_bound_mRNA0053_GTP;
  r165: T7RNAP_bound_mRNA0054_PPi => T7RNAP_bound_mRNA0054 + PPi; k_forward6*T7RNAP_bound_mRNA0054_PPi;
  r166: T7RNAP_bound_mRNA0054 + GTP => T7RNAP_bound_mRNA0054_GTP; k_forward4*T7RNAP_bound_mRNA0054*GTP;
  r167: T7RNAP_bound_mRNA0054_GTP => T7RNAP_bound_mRNA0055_PPi; k_forward5*T7RNAP_bound_mRNA0054_GTP;
  r168: T7RNAP_bound_mRNA0055_PPi => T7RNAP_bound_mRNA0055 + PPi; k_forward6*T7RNAP_bound_mRNA0055_PPi;
  r169: T7RNAP_bound_mRNA0055 + CTP => T7RNAP_bound_mRNA0055_CTP; k_forward4*T7RNAP_bound_mRNA0055*CTP;
  r170: T7RNAP_bound_mRNA0055_CTP => T7RNAP_bound_mRNA0056_PPi; k_forward5*T7RNAP_bound_mRNA0055_CTP;
  r171: T7RNAP_bound_mRNA0056_PPi => T7RNAP_bound_mRNA0056 + PPi; k_forward6*T7RNAP_bound_mRNA0056_PPi;
  r172: T7RNAP_bound_mRNA0056 + CTP => T7RNAP_bound_mRNA0056_CTP; k_forward4*T7RNAP_bound_mRNA0056*CTP;
  r173: T7RNAP_bound_mRNA0056_CTP => T7RNAP_bound_mRNA0057_PPi; k_forward5*T7RNAP_bound_mRNA0056_CTP;
  r174: T7RNAP_bound_mRNA0057_PPi => T7RNAP_bound_mRNA0057 + PPi; k_forward6*T7RNAP_bound_mRNA0057_PPi;
  r175: T7RNAP_bound_mRNA0057 + GTP => T7RNAP_bound_mRNA0057_GTP; k_forward4*T7RNAP_bound_mRNA0057*GTP;
  r176: T7RNAP_bound_mRNA0057_GTP => T7RNAP_bound_mRNA0058_PPi; k_forward5*T7RNAP_bound_mRNA0057_GTP;
  r177: T7RNAP_bound_mRNA0058_PPi => T7RNAP_bound_mRNA0058 + PPi; k_forward6*T7RNAP_bound_mRNA0058_PPi;
  r178: T7RNAP_bound_mRNA0058 + ATP => T7RNAP_bound_mRNA0058_ATP; k_forward4*T7RNAP_bound_mRNA0058*ATP;
  r179: T7RNAP_bound_mRNA0058_ATP => T7RNAP_bound_mRNA0059_PPi; k_forward5*T7RNAP_bound_mRNA0058_ATP;
  r180: T7RNAP_bound_mRNA0059_PPi => T7RNAP_bound_mRNA0059 + PPi; k_forward6*T7RNAP_bound_mRNA0059_PPi;
  r181: T7RNAP_bound_mRNA0059 + CTP => T7RNAP_bound_mRNA0059_CTP; k_forward4*T7RNAP_bound_mRNA0059*CTP;
  r182: T7RNAP_bound_mRNA0059_CTP => T7RNAP_bound_mRNA0060_PPi; k_forward5*T7RNAP_bound_mRNA0059_CTP;
  r183: T7RNAP_bound_mRNA0060_PPi => T7RNAP_bound_mRNA0060 + PPi; k_forward6*T7RNAP_bound_mRNA0060_PPi;
  r184: T7RNAP_bound_mRNA0060 + GTP => T7RNAP_bound_mRNA0060_GTP; k_forward4*T7RNAP_bound_mRNA0060*GTP;
  r185: T7RNAP_bound_mRNA0060_GTP => T7RNAP_bound_mRNA0061_PPi; k_forward5*T7RNAP_bound_mRNA0060_GTP;
  r186: T7RNAP_bound_mRNA0061_PPi => T7RNAP_bound_mRNA0061 + PPi; k_forward6*T7RNAP_bound_mRNA0061_PPi;
  r187: T7RNAP_bound_mRNA0061 + ATP => T7RNAP_bound_mRNA0061_ATP; k_forward4*T7RNAP_bound_mRNA0061*ATP;
  r188: T7RNAP_bound_mRNA0061_ATP => T7RNAP_bound_mRNA0062_PPi; k_forward5*T7RNAP_bound_mRNA0061_ATP;
  r189: T7RNAP_bound_mRNA0062_PPi => T7RNAP_bound_mRNA0062 + PPi; k_forward6*T7RNAP_bound_mRNA0062_PPi;
  r190: T7RNAP_bound_mRNA0062 + UTP => T7RNAP_bound_mRNA0062_UTP; k_forward4*T7RNAP_bound_mRNA0062*UTP;
  r191: T7RNAP_bound_mRNA0062_UTP => T7RNAP_bound_mRNA0063_PPi; k_forward5*T7RNAP_bound_mRNA0062_UTP;
  r192: T7RNAP_bound_mRNA0063_PPi => T7RNAP_bound_mRNA0063 + PPi; k_forward6*T7RNAP_bound_mRNA0063_PPi;
  r193: T7RNAP_bound_mRNA0063 + UTP => T7RNAP_bound_mRNA0063_UTP; k_forward4*T7RNAP_bound_mRNA0063*UTP;
  r194: T7RNAP_bound_mRNA0063_UTP => T7RNAP_bound_mRNA0064_PPi; k_forward5*T7RNAP_bound_mRNA0063_UTP;
  r195: T7RNAP_bound_mRNA0064_PPi => T7RNAP_bound_mRNA0064 + PPi; k_forward6*T7RNAP_bound_mRNA0064_PPi;
  r196: T7RNAP_bound_mRNA0064 + GTP => T7RNAP_bound_mRNA0064_GTP; k_forward4*T7RNAP_bound_mRNA0064*GTP;
  r197: T7RNAP_bound_mRNA0064_GTP => T7RNAP_bound_mRNA0065_PPi; k_forward5*T7RNAP_bound_mRNA0064_GTP;
  r198: T7RNAP_bound_mRNA0065_PPi => T7RNAP_bound_mRNA0065 + PPi; k_forward6*T7RNAP_bound_mRNA0065_PPi;
  r199: T7RNAP_bound_mRNA0065 + UTP => T7RNAP_bound_mRNA0065_UTP; k_forward4*T7RNAP_bound_mRNA0065*UTP;
  r200: T7RNAP_bound_mRNA0065_UTP => T7RNAP_bound_mRNA0066_PPi; k_forward5*T7RNAP_bound_mRNA0065_UTP;
  r201: T7RNAP_bound_mRNA0066_PPi => T7RNAP_bound_mRNA0066 + PPi; k_forward6*T7RNAP_bound_mRNA0066_PPi;
  r202: T7RNAP_bound_mRNA0066 + UTP => T7RNAP_bound_mRNA0066_UTP; k_forward4*T7RNAP_bound_mRNA0066*UTP;
  r203: T7RNAP_bound_mRNA0066_UTP => T7RNAP_bound_mRNA0067_PPi; k_forward5*T7RNAP_bound_mRNA0066_UTP;
  r204: T7RNAP_bound_mRNA0067_PPi => T7RNAP_bound_mRNA0067 + PPi; k_forward6*T7RNAP_bound_mRNA0067_PPi;
  r205: T7RNAP_bound_mRNA0067 + UTP => T7RNAP_bound_mRNA0067_UTP; k_forward4*T7RNAP_bound_mRNA0067*UTP;
  r206: T7RNAP_bound_mRNA0067_UTP => T7RNAP_bound_mRNA0068_PPi; k_forward5*T7RNAP_bound_mRNA0067_UTP;
  r207: T7RNAP_bound_mRNA0068_PPi => T7RNAP_bound_mRNA0068 + PPi; k_forward6*T7RNAP_bound_mRNA0068_PPi;
  r208: T7RNAP_bound_mRNA0068 + CTP => T7RNAP_bound_mRNA0068_CTP; k_forward4*T7RNAP_bound_mRNA0068*CTP;
  r209: T7RNAP_bound_mRNA0068_CTP => T7RNAP_bound_mRNA0069_PPi; k_forward5*T7RNAP_bound_mRNA0068_CTP;
  r210: T7RNAP_bound_mRNA0069_PPi => T7RNAP_bound_mRNA0069 + PPi; k_forward6*T7RNAP_bound_mRNA0069_PPi;
  r211: T7RNAP_bound_mRNA0069 + GTP => T7RNAP_bound_mRNA0069_GTP; k_forward4*T7RNAP_bound_mRNA0069*GTP;
  r212: T7RNAP_bound_mRNA0069_GTP => T7RNAP_bound_mRNA0070_PPi; k_forward5*T7RNAP_bound_mRNA0069_GTP;
  r213: T7RNAP_bound_mRNA0070_PPi => T7RNAP_bound_mRNA0070 + PPi; k_forward6*T7RNAP_bound_mRNA0070_PPi;
  r214: T7RNAP_bound_mRNA0070 + GTP => T7RNAP_bound_mRNA0070_GTP; k_forward4*T7RNAP_bound_mRNA0070*GTP;
  r215: T7RNAP_bound_mRNA0070_GTP => T7RNAP_bound_mRNA0071_PPi; k_forward5*T7RNAP_bound_mRNA0070_GTP;
  r216: T7RNAP_bound_mRNA0071_PPi => T7RNAP_bound_mRNA0071 + PPi; k_forward6*T7RNAP_bound_mRNA0071_PPi;
  r217: T7RNAP_bound_mRNA0071 + GTP => T7RNAP_bound_mRNA0071_GTP; k_forward4*T7RNAP_bound_mRNA0071*GTP;
  r218: T7RNAP_bound_mRNA0071_GTP => T7RNAP_bound_mRNA0072_PPi; k_forward5*T7RNAP_bound_mRNA0071_GTP;
  r219: T7RNAP_bound_mRNA0072_PPi => T7RNAP_bound_mRNA0072 + PPi; k_forward6*T7RNAP_bound_mRNA0072_PPi;
  r220: T7RNAP_bound_mRNA0072 + CTP => T7RNAP_bound_mRNA0072_CTP; k_forward4*T7RNAP_bound_mRNA0072*CTP;
  r221: T7RNAP_bound_mRNA0072_CTP => T7RNAP_bound_mRNA0073_PPi; k_forward5*T7RNAP_bound_mRNA0072_CTP;
  r222: T7RNAP_bound_mRNA0073_PPi => T7RNAP_bound_mRNA0073 + PPi; k_forward6*T7RNAP_bound_mRNA0073_PPi;
  r223: T7RNAP_bound_mRNA0073 + UTP => T7RNAP_bound_mRNA0073_UTP; k_forward4*T7RNAP_bound_mRNA0073*UTP;
  r224: T7RNAP_bound_mRNA0073_UTP => T7RNAP_bound_mRNA0074_PPi; k_forward5*T7RNAP_bound_mRNA0073_UTP;
  r225: T7RNAP_bound_mRNA0074_PPi => T7RNAP_bound_mRNA0074 + PPi; k_forward6*T7RNAP_bound_mRNA0074_PPi;
  r226: T7RNAP_bound_mRNA0074 + UTP => T7RNAP_bound_mRNA0074_UTP; k_forward4*T7RNAP_bound_mRNA0074*UTP;
  r227: T7RNAP_bound_mRNA0074_UTP => T7RNAP_bound_mRNA0075_PPi; k_forward5*T7RNAP_bound_mRNA0074_UTP;
  r228: T7RNAP_bound_mRNA0075_PPi => T7RNAP_bound_mRNA0075 + PPi; k_forward6*T7RNAP_bound_mRNA0075_PPi;
  r229: T7RNAP_bound_mRNA0075 + UTP => T7RNAP_bound_mRNA0075_UTP; k_forward4*T7RNAP_bound_mRNA0075*UTP;
  r230: T7RNAP_bound_mRNA0075_UTP => T7RNAP_bound_mRNA0076_PPi; k_forward5*T7RNAP_bound_mRNA0075_UTP;
  r231: T7RNAP_bound_mRNA0076_PPi => T7RNAP_bound_mRNA0076 + PPi; k_forward6*T7RNAP_bound_mRNA0076_PPi;
  r232: T7RNAP_bound_mRNA0076 + CTP => T7RNAP_bound_mRNA0076_CTP; k_forward4*T7RNAP_bound_mRNA0076*CTP;
  r233: T7RNAP_bound_mRNA0076_CTP => T7RNAP_bound_mRNA0077_PPi; k_forward5*T7RNAP_bound_mRNA0076_CTP;
  r234: T7RNAP_bound_mRNA0077_PPi => T7RNAP_bound_mRNA0077 + PPi; k_forward6*T7RNAP_bound_mRNA0077_PPi;
  r235: T7RNAP_bound_mRNA0077 + CTP => T7RNAP_bound_mRNA0077_CTP; k_forward4*T7RNAP_bound_mRNA0077*CTP;
  r236: T7RNAP_bound_mRNA0077_CTP => T7RNAP_bound_mRNA0078_PPi; k_forward5*T7RNAP_bound_mRNA0077_CTP;
  r237: T7RNAP_bound_mRNA0078_PPi => T7RNAP_bound_mRNA0078 + PPi; k_forward6*T7RNAP_bound_mRNA0078_PPi;
  r238: T7RNAP_bound_mRNA0078 + UTP => T7RNAP_bound_mRNA0078_UTP; k_forward4*T7RNAP_bound_mRNA0078*UTP;
  r239: T7RNAP_bound_mRNA0078_UTP => T7RNAP_bound_mRNA0079_PPi; k_forward5*T7RNAP_bound_mRNA0078_UTP;
  r240: T7RNAP_bound_mRNA0079_PPi => T7RNAP_bound_mRNA0079 + PPi; k_forward6*T7RNAP_bound_mRNA0079_PPi;
  r241: T7RNAP_bound_mRNA0079 + UTP => T7RNAP_bound_mRNA0079_UTP; k_forward4*T7RNAP_bound_mRNA0079*UTP;
  r242: T7RNAP_bound_mRNA0079_UTP => T7RNAP_bound_mRNA0080_PPi; k_forward5*T7RNAP_bound_mRNA0079_UTP;
  r243: T7RNAP_bound_mRNA0080_PPi => T7RNAP_bound_mRNA0080 + PPi; k_forward6*T7RNAP_bound_mRNA0080_PPi;
  r244: T7RNAP_bound_mRNA0080 + CTP => T7RNAP_bound_mRNA0080_CTP; k_forward4*T7RNAP_bound_mRNA0080*CTP;
  r245: T7RNAP_bound_mRNA0080_CTP => T7RNAP_bound_mRNA0081_PPi; k_forward5*T7RNAP_bound_mRNA0080_CTP;
  r246: T7RNAP_bound_mRNA0081_PPi => T7RNAP_bound_mRNA0081 + PPi; k_forward6*T7RNAP_bound_mRNA0081_PPi;
  r247: T7RNAP_bound_mRNA0081 + GTP => T7RNAP_bound_mRNA0081_GTP; k_forward4*T7RNAP_bound_mRNA0081*GTP;
  r248: T7RNAP_bound_mRNA0081_GTP => T7RNAP_bound_mRNA0082_PPi; k_forward5*T7RNAP_bound_mRNA0081_GTP;
  r249: T7RNAP_bound_mRNA0082_PPi => T7RNAP_bound_mRNA0082 + PPi; k_forward6*T7RNAP_bound_mRNA0082_PPi;
  r250: T7RNAP_bound_mRNA0082 + ATP => T7RNAP_bound_mRNA0082_ATP; k_forward4*T7RNAP_bound_mRNA0082*ATP;
  r251: T7RNAP_bound_mRNA0082_ATP => T7RNAP_bound_mRNA0083_PPi; k_forward5*T7RNAP_bound_mRNA0082_ATP;
  r252: T7RNAP_bound_mRNA0083_PPi => T7RNAP_bound_mRNA0083 + PPi; k_forward6*T7RNAP_bound_mRNA0083_PPi;
  r253: T7RNAP_bound_mRNA0083 + CTP => T7RNAP_bound_mRNA0083_CTP; k_forward4*T7RNAP_bound_mRNA0083*CTP;
  r254: T7RNAP_bound_mRNA0083_CTP => T7RNAP_bound_mRNA0084_PPi; k_forward5*T7RNAP_bound_mRNA0083_CTP;
  r255: T7RNAP_bound_mRNA0084_PPi => T7RNAP_bound_mRNA0084 + PPi; k_forward6*T7RNAP_bound_mRNA0084_PPi;
  r256: T7RNAP_bound_mRNA0084 + UTP => T7RNAP_bound_mRNA0084_UTP; k_forward4*T7RNAP_bound_mRNA0084*UTP;
  r257: T7RNAP_bound_mRNA0084_UTP => T7RNAP_bound_mRNA0085_PPi; k_forward5*T7RNAP_bound_mRNA0084_UTP;
  r258: T7RNAP_bound_mRNA0085_PPi => T7RNAP_bound_mRNA0085 + PPi; k_forward6*T7RNAP_bound_mRNA0085_PPi;
  r259: T7RNAP_bound_mRNA0085 + CTP => T7RNAP_bound_mRNA0085_CTP; k_forward4*T7RNAP_bound_mRNA0085*CTP;
  r260: T7RNAP_bound_mRNA0085_CTP => T7RNAP_bound_mRNA0086_PPi; k_forward5*T7RNAP_bound_mRNA0085_CTP;
  r261: T7RNAP_bound_mRNA0086_PPi => T7RNAP_bound_mRNA0086 + PPi; k_forward6*T7RNAP_bound_mRNA0086_PPi;
  r262: T7RNAP_bound_mRNA0086 + ATP => T7RNAP_bound_mRNA0086_ATP; k_forward4*T7RNAP_bound_mRNA0086*ATP;
  r263: T7RNAP_bound_mRNA0086_ATP => T7RNAP_bound_mRNA0087_PPi; k_forward5*T7RNAP_bound_mRNA0086_ATP;
  r264: T7RNAP_bound_mRNA0087_PPi => T7RNAP_bound_mRNA0087 + PPi; k_forward6*T7RNAP_bound_mRNA0087_PPi;
  r265: T7RNAP_bound_mRNA0087 + ATP => T7RNAP_bound_mRNA0087_ATP; k_forward4*T7RNAP_bound_mRNA0087*ATP;
  r266: T7RNAP_bound_mRNA0087_ATP => T7RNAP_bound_mRNA0088_PPi; k_forward5*T7RNAP_bound_mRNA0087_ATP;
  r267: T7RNAP_bound_mRNA0088_PPi => T7RNAP_bound_mRNA0088 + PPi; k_forward6*T7RNAP_bound_mRNA0088_PPi;
  r268: T7RNAP_bound_mRNA0088 + CTP => T7RNAP_bound_mRNA0088_CTP; k_forward4*T7RNAP_bound_mRNA0088*CTP;
  r269: T7RNAP_bound_mRNA0088_CTP => T7RNAP_bound_mRNA0089_PPi; k_forward5*T7RNAP_bound_mRNA0088_CTP;
  r270: T7RNAP_bound_mRNA0089_PPi => T7RNAP_bound_mRNA0089 + PPi; k_forward6*T7RNAP_bound_mRNA0089_PPi;
  r271: T7RNAP_bound_mRNA0089 + CTP => T7RNAP_bound_mRNA0089_CTP; k_forward4*T7RNAP_bound_mRNA0089*CTP;
  r272: T7RNAP_bound_mRNA0089_CTP => T7RNAP_bound_mRNA0090_PPi; k_forward5*T7RNAP_bound_mRNA0089_CTP;
  r273: T7RNAP_bound_mRNA0090_PPi => T7RNAP_bound_mRNA0090 + PPi; k_forward6*T7RNAP_bound_mRNA0090_PPi;
  r274: T7RNAP_bound_mRNA0090 + GTP => T7RNAP_bound_mRNA0090_GTP; k_forward4*T7RNAP_bound_mRNA0090*GTP;
  r275: T7RNAP_bound_mRNA0090_GTP => T7RNAP_bound_mRNA0091_PPi; k_forward5*T7RNAP_bound_mRNA0090_GTP;
  r276: T7RNAP_bound_mRNA0091_PPi => T7RNAP_bound_mRNA0091 + PPi; k_forward6*T7RNAP_bound_mRNA0091_PPi;
  r277: T7RNAP_bound_mRNA0091 + ATP => T7RNAP_bound_mRNA0091_ATP; k_forward4*T7RNAP_bound_mRNA0091*ATP;
  r278: T7RNAP_bound_mRNA0091_ATP => T7RNAP_bound_mRNA0092_PPi; k_forward5*T7RNAP_bound_mRNA0091_ATP;
  r279: T7RNAP_bound_mRNA0092_PPi => T7RNAP_bound_mRNA0092 + PPi; k_forward6*T7RNAP_bound_mRNA0092_PPi;
  r280: T7RNAP_bound_mRNA0092 + CTP => T7RNAP_bound_mRNA0092_CTP; k_forward4*T7RNAP_bound_mRNA0092*CTP;
  r281: T7RNAP_bound_mRNA0092_CTP => T7RNAP_bound_mRNA0093_PPi; k_forward5*T7RNAP_bound_mRNA0092_CTP;
  r282: T7RNAP_bound_mRNA0093_PPi => T7RNAP_bound_mRNA0093 + PPi; k_forward6*T7RNAP_bound_mRNA0093_PPi;
  r283: T7RNAP_bound_mRNA0093 + GTP => T7RNAP_bound_mRNA0093_GTP; k_forward4*T7RNAP_bound_mRNA0093*GTP;
  r284: T7RNAP_bound_mRNA0093_GTP => T7RNAP_bound_mRNA0094_PPi; k_forward5*T7RNAP_bound_mRNA0093_GTP;
  r285: T7RNAP_bound_mRNA0094_PPi => T7RNAP_bound_mRNA0094 + PPi; k_forward6*T7RNAP_bound_mRNA0094_PPi;
  r286: T7RNAP_bound_mRNA0094 + ATP => T7RNAP_bound_mRNA0094_ATP; k_forward4*T7RNAP_bound_mRNA0094*ATP;
  r287: T7RNAP_bound_mRNA0094_ATP => T7RNAP_bound_mRNA0095_PPi; k_forward5*T7RNAP_bound_mRNA0094_ATP;
  r288: T7RNAP_bound_mRNA0095_PPi => T7RNAP_bound_mRNA0095 + PPi; k_forward6*T7RNAP_bound_mRNA0095_PPi;
  r289: T7RNAP_bound_mRNA0095 + CTP => T7RNAP_bound_mRNA0095_CTP; k_forward4*T7RNAP_bound_mRNA0095*CTP;
  r290: T7RNAP_bound_mRNA0095_CTP => T7RNAP_bound_mRNA0096_PPi; k_forward5*T7RNAP_bound_mRNA0095_CTP;
  r291: T7RNAP_bound_mRNA0096_PPi => T7RNAP_bound_mRNA0096 + PPi; k_forward6*T7RNAP_bound_mRNA0096_PPi;
  r292: T7RNAP_bound_mRNA0096 + GTP => T7RNAP_bound_mRNA0096_GTP; k_forward4*T7RNAP_bound_mRNA0096*GTP;
  r293: T7RNAP_bound_mRNA0096_GTP => T7RNAP_bound_mRNA0097_PPi; k_forward5*T7RNAP_bound_mRNA0096_GTP;
  r294: T7RNAP_bound_mRNA0097_PPi => T7RNAP_bound_mRNA0097 + PPi; k_forward6*T7RNAP_bound_mRNA0097_PPi;
  r295: T7RNAP_bound_mRNA0097 + GTP => T7RNAP_bound_mRNA0097_GTP; k_forward4*T7RNAP_bound_mRNA0097*GTP;
  r296: T7RNAP_bound_mRNA0097_GTP => T7RNAP_bound_mRNA0098_PPi; k_forward5*T7RNAP_bound_mRNA0097_GTP;
  r297: T7RNAP_bound_mRNA0098_PPi => T7RNAP_bound_mRNA0098 + PPi; k_forward6*T7RNAP_bound_mRNA0098_PPi;
  r298: T7RNAP_bound_mRNA0098 + UTP => T7RNAP_bound_mRNA0098_UTP; k_forward4*T7RNAP_bound_mRNA0098*UTP;
  r299: T7RNAP_bound_mRNA0098_UTP => T7RNAP_bound_mRNA0099_PPi; k_forward5*T7RNAP_bound_mRNA0098_UTP;
  r300: T7RNAP_bound_mRNA0099_PPi => T7RNAP_bound_mRNA0099 + PPi; k_forward6*T7RNAP_bound_mRNA0099_PPi;
  r301: T7RNAP_bound_mRNA0099 + GTP => T7RNAP_bound_mRNA0099_GTP; k_forward4*T7RNAP_bound_mRNA0099*GTP;
  r302: T7RNAP_bound_mRNA0099_GTP => T7RNAP_bound_mRNA0100_PPi; k_forward5*T7RNAP_bound_mRNA0099_GTP;
  r303: T7RNAP_bound_mRNA0100_PPi => T7RNAP_bound_mRNA0100 + PPi; k_forward6*T7RNAP_bound_mRNA0100_PPi;
  r304: T7RNAP_bound_mRNA0100 + GTP => T7RNAP_bound_mRNA0100_GTP; k_forward4*T7RNAP_bound_mRNA0100*GTP;
  r305: T7RNAP_bound_mRNA0100_GTP => T7RNAP_bound_mRNA0101_PPi; k_forward5*T7RNAP_bound_mRNA0100_GTP;
  r306: T7RNAP_bound_mRNA0101_PPi => T7RNAP_bound_mRNA0101 + PPi; k_forward6*T7RNAP_bound_mRNA0101_PPi;
  r307: T7RNAP_bound_mRNA0101 + CTP => T7RNAP_bound_mRNA0101_CTP; k_forward4*T7RNAP_bound_mRNA0101*CTP;
  r308: T7RNAP_bound_mRNA0101_CTP => T7RNAP_bound_mRNA0102_PPi; k_forward5*T7RNAP_bound_mRNA0101_CTP;
  r309: T7RNAP_bound_mRNA0102_PPi => T7RNAP_bound_mRNA0102 + PPi; k_forward6*T7RNAP_bound_mRNA0102_PPi;
  r310: T7RNAP_bound_mRNA0102 + GTP => T7RNAP_bound_mRNA0102_GTP; k_forward4*T7RNAP_bound_mRNA0102*GTP;
  r311: T7RNAP_bound_mRNA0102_GTP => T7RNAP_bound_mRNA0103_PPi; k_forward5*T7RNAP_bound_mRNA0102_GTP;
  r312: T7RNAP_bound_mRNA0103_PPi => T7RNAP_bound_mRNA0103 + PPi; k_forward6*T7RNAP_bound_mRNA0103_PPi;
  r313: T7RNAP_bound_mRNA0103 + ATP => T7RNAP_bound_mRNA0103_ATP; k_forward4*T7RNAP_bound_mRNA0103*ATP;
  r314: T7RNAP_bound_mRNA0103_ATP => T7RNAP_bound_mRNA0104_PPi; k_forward5*T7RNAP_bound_mRNA0103_ATP;
  r315: T7RNAP_bound_mRNA0104_PPi => T7RNAP_bound_mRNA0104 + PPi; k_forward6*T7RNAP_bound_mRNA0104_PPi;
  r316: T7RNAP_bound_mRNA0104 + CTP => T7RNAP_bound_mRNA0104_CTP; k_forward4*T7RNAP_bound_mRNA0104*CTP;
  r317: T7RNAP_bound_mRNA0104_CTP => T7RNAP_bound_mRNA0105_PPi; k_forward5*T7RNAP_bound_mRNA0104_CTP;
  r318: T7RNAP_bound_mRNA0105_PPi => T7RNAP_bound_mRNA0105 + PPi; k_forward6*T7RNAP_bound_mRNA0105_PPi;
  r319: T7RNAP_bound_mRNA0105 + UTP => T7RNAP_bound_mRNA0105_UTP; k_forward4*T7RNAP_bound_mRNA0105*UTP;
  r320: T7RNAP_bound_mRNA0105_UTP => T7RNAP_bound_mRNA0106_PPi; k_forward5*T7RNAP_bound_mRNA0105_UTP;
  r321: T7RNAP_bound_mRNA0106_PPi => T7RNAP_bound_mRNA0106 + PPi; k_forward6*T7RNAP_bound_mRNA0106_PPi;
  r322: T7RNAP_bound_mRNA0106 + CTP => T7RNAP_bound_mRNA0106_CTP; k_forward4*T7RNAP_bound_mRNA0106*CTP;
  r323: T7RNAP_bound_mRNA0106_CTP => T7RNAP_bound_mRNA0107_PPi; k_forward5*T7RNAP_bound_mRNA0106_CTP;
  r324: T7RNAP_bound_mRNA0107_PPi => T7RNAP_bound_mRNA0107 + PPi; k_forward6*T7RNAP_bound_mRNA0107_PPi;
  r325: T7RNAP_bound_mRNA0107 + GTP => T7RNAP_bound_mRNA0107_GTP; k_forward4*T7RNAP_bound_mRNA0107*GTP;
  r326: T7RNAP_bound_mRNA0107_GTP => T7RNAP_bound_mRNA0108_PPi; k_forward5*T7RNAP_bound_mRNA0107_GTP;
  r327: T7RNAP_bound_mRNA0108_PPi => T7RNAP_bound_mRNA0108 + PPi; k_forward6*T7RNAP_bound_mRNA0108_PPi;
  r328: T7RNAP_bound_mRNA0108 + UTP => T7RNAP_bound_mRNA0108_UTP; k_forward4*T7RNAP_bound_mRNA0108*UTP;
  r329: T7RNAP_bound_mRNA0108_UTP => T7RNAP_bound_mRNA0109_PPi; k_forward5*T7RNAP_bound_mRNA0108_UTP;
  r330: T7RNAP_bound_mRNA0109_PPi => T7RNAP_bound_mRNA0109 + PPi; k_forward6*T7RNAP_bound_mRNA0109_PPi;
  r331: T7RNAP_bound_mRNA0109 + UTP => T7RNAP_bound_mRNA0109_UTP; k_forward4*T7RNAP_bound_mRNA0109*UTP;
  r332: T7RNAP_bound_mRNA0109_UTP => T7RNAP_bound_mRNA0110_PPi; k_forward5*T7RNAP_bound_mRNA0109_UTP;
  r333: T7RNAP_bound_mRNA0110_PPi => T7RNAP_bound_mRNA0110 + PPi; k_forward6*T7RNAP_bound_mRNA0110_PPi;
  r334: T7RNAP_bound_mRNA0110 + ATP => T7RNAP_bound_mRNA0110_ATP; k_forward4*T7RNAP_bound_mRNA0110*ATP;
  r335: T7RNAP_bound_mRNA0110_ATP => T7RNAP_bound_mRNA0111_PPi; k_forward5*T7RNAP_bound_mRNA0110_ATP;
  r336: T7RNAP_bound_mRNA0111_PPi => T7RNAP_bound_mRNA0111 + PPi; k_forward6*T7RNAP_bound_mRNA0111_PPi;
  r337: T7RNAP_bound_mRNA0111 + UTP => T7RNAP_bound_mRNA0111_UTP; k_forward4*T7RNAP_bound_mRNA0111*UTP;
  r338: T7RNAP_bound_mRNA0111_UTP => T7RNAP_bound_mRNA0112_PPi; k_forward5*T7RNAP_bound_mRNA0111_UTP;
  r339: T7RNAP_bound_mRNA0112_PPi => T7RNAP_bound_mRNA0112 + PPi; k_forward6*T7RNAP_bound_mRNA0112_PPi;
  r340: T7RNAP_bound_mRNA0112 + UTP => T7RNAP_bound_mRNA0112_UTP; k_forward4*T7RNAP_bound_mRNA0112*UTP;
  r341: T7RNAP_bound_mRNA0112_UTP => T7RNAP_bound_mRNA0113_PPi; k_forward5*T7RNAP_bound_mRNA0112_UTP;
  r342: T7RNAP_bound_mRNA0113_PPi => T7RNAP_bound_mRNA0113 + PPi; k_forward6*T7RNAP_bound_mRNA0113_PPi;
  r343: T7RNAP_bound_mRNA0113 => T7RNAP + DNA + mRNA_i + mRNA_t; k_forward7*T7RNAP_bound_mRNA0113;

  // Unit definitions:
  unit square_metre = metre^2;
end
