// SBML level 3 version 2

model biocrnpyler_466328()
  // model units - substance: mole, time: second, volume: litre, area: square_metre, length: metre, extent: mole

  // Compartments:
  compartment default = 1e-6;

  // Species:
  species RNAPa in default = 0;
  species DNA in default = 0;
  species mRNA in default = 0;
  species RNAPa_bound_GTP in default = 0;
  species RNAPa_bound in default = 0;
  species ATP in default = 0;
  species GTP in default = 0;
  species CTP in default = 0;
  species UTP in default = 0;
  species GDP in default = 0;
  species PPi in default = 0;
  species PO4 in default = 0;
  species RNAPa_bound_GDP_PO4 in default = 0;
  species RNAPa_bound_mRNA0000 in default = 0;
  species RNAPa_bound_mRNA0000_CTP in default = 0;
  species RNAPa_bound_mRNA0001_PPi in default = 0;
  species RNAPa_bound_mRNA0001 in default = 0;
  species RNAPa_bound_mRNA0001_CTP in default = 0;
  species RNAPa_bound_mRNA0002_PPi in default = 0;
  species RNAPa_bound_mRNA0002 in default = 0;
  species RNAPa_bound_mRNA0002_UTP in default = 0;
  species RNAPa_bound_mRNA0003_PPi in default = 0;
  species RNAPa_bound_mRNA0003 in default = 0;
  species RNAPa_bound_mRNA0003_ATP in default = 0;
  species RNAPa_bound_mRNA0004_PPi in default = 0;
  species RNAPa_bound_mRNA0004 in default = 0;
  species RNAPa_bound_mRNA0004_GTP in default = 0;
  species RNAPa_bound_mRNA0005_PPi in default = 0;
  species RNAPa_bound_mRNA0005 in default = 0;
  species RNAPa_bound_mRNA0005_GTP in default = 0;
  species RNAPa_bound_mRNA0006_PPi in default = 0;
  species RNAPa_bound_mRNA0006 in default = 0;
  species RNAPa_bound_mRNA0006_GTP in default = 0;
  species RNAPa_bound_mRNA0007_PPi in default = 0;
  species RNAPa_bound_mRNA0007 in default = 0;
  species RNAPa_bound_mRNA0007_CTP in default = 0;
  species RNAPa_bound_mRNA0008_PPi in default = 0;
  species RNAPa_bound_mRNA0008 in default = 0;
  species RNAPa_bound_mRNA0008_UTP in default = 0;
  species RNAPa_bound_mRNA0009_PPi in default = 0;
  species RNAPa_bound_mRNA0009 in default = 0;
  species RNAPa_bound_mRNA0009_GTP in default = 0;
  species RNAPa_bound_mRNA0010_PPi in default = 0;
  species RNAPa_bound_mRNA0010 in default = 0;
  species RNAPa_bound_mRNA0010_ATP in default = 0;
  species RNAPa_bound_mRNA0011_PPi in default = 0;
  species RNAPa_bound_mRNA0011 in default = 0;
  species RNAPa_bound_mRNA0011_CTP in default = 0;
  species RNAPa_bound_mRNA0012_PPi in default = 0;
  species RNAPa_bound_mRNA0012 in default = 0;
  species RNAPa_bound_mRNA0012_CTP in default = 0;
  species RNAPa_bound_mRNA0013_PPi in default = 0;
  species RNAPa_bound_mRNA0013 in default = 0;
  species RNAPa_bound_mRNA0013_GTP in default = 0;
  species RNAPa_bound_mRNA0014_PPi in default = 0;
  species RNAPa_bound_mRNA0014 in default = 0;
  species RNAPa_bound_mRNA0014_CTP in default = 0;
  species RNAPa_bound_mRNA0015_PPi in default = 0;
  species RNAPa_bound_mRNA0015 in default = 0;
  species RNAPa_bound_mRNA0015_UTP in default = 0;
  species RNAPa_bound_mRNA0016_PPi in default = 0;
  species RNAPa_bound_mRNA0016 in default = 0;
  species RNAPa_bound_mRNA0016_CTP in default = 0;
  species RNAPa_bound_mRNA0017_PPi in default = 0;
  species RNAPa_bound_mRNA0017 in default = 0;
  species RNAPa_bound_mRNA0017_UTP in default = 0;
  species RNAPa_bound_mRNA0018_PPi in default = 0;
  species RNAPa_bound_mRNA0018 in default = 0;
  species RNAPa_bound_mRNA0018_CTP in default = 0;
  species RNAPa_bound_mRNA0019_PPi in default = 0;
  species RNAPa_bound_mRNA0019 in default = 0;
  species RNAPa_bound_mRNA0019_GTP in default = 0;
  species RNAPa_bound_mRNA0020_PPi in default = 0;
  species RNAPa_bound_mRNA0020 in default = 0;
  species RNAPa_bound_mRNA0020_GTP in default = 0;
  species RNAPa_bound_mRNA0021_PPi in default = 0;
  species RNAPa_bound_mRNA0021 in default = 0;
  species RNAPa_bound_mRNA0021_UTP in default = 0;
  species RNAPa_bound_mRNA0022_PPi in default = 0;
  species RNAPa_bound_mRNA0022 in default = 0;
  species RNAPa_bound_mRNA0022_CTP in default = 0;
  species RNAPa_bound_mRNA0023_PPi in default = 0;
  species RNAPa_bound_mRNA0023 in default = 0;
  species RNAPa_bound_mRNA0023_CTP in default = 0;
  species RNAPa_bound_mRNA0024_PPi in default = 0;
  species RNAPa_bound_mRNA0024 in default = 0;
  species RNAPa_bound_mRNA0024_ATP in default = 0;
  species RNAPa_bound_mRNA0025_PPi in default = 0;
  species RNAPa_bound_mRNA0025 in default = 0;
  species RNAPa_bound_mRNA0025_UTP in default = 0;
  species RNAPa_bound_mRNA0026_PPi in default = 0;
  species RNAPa_bound_mRNA0026 in default = 0;
  species RNAPa_bound_mRNA0026_UTP in default = 0;
  species RNAPa_bound_mRNA0027_PPi in default = 0;
  species RNAPa_bound_mRNA0027 in default = 0;
  species RNAPa_bound_mRNA0027_GTP in default = 0;
  species RNAPa_bound_mRNA0028_PPi in default = 0;
  species RNAPa_bound_mRNA0028 in default = 0;
  species RNAPa_bound_mRNA0028_CTP in default = 0;
  species RNAPa_bound_mRNA0029_PPi in default = 0;
  species RNAPa_bound_mRNA0029 in default = 0;
  species RNAPa_bound_mRNA0029_UTP in default = 0;
  species RNAPa_bound_mRNA0030_PPi in default = 0;
  species RNAPa_bound_mRNA0030 in default = 0;
  species RNAPa_bound_mRNA0030_UTP in default = 0;
  species RNAPa_bound_mRNA0031_PPi in default = 0;
  species RNAPa_bound_mRNA0031 in default = 0;
  species RNAPa_bound_mRNA0031_ATP in default = 0;
  species RNAPa_bound_mRNA0032_PPi in default = 0;
  species RNAPa_bound_mRNA0032 in default = 0;
  species RNAPa_bound_mRNA0032_CTP in default = 0;
  species RNAPa_bound_mRNA0033_PPi in default = 0;
  species RNAPa_bound_mRNA0033 in default = 0;
  species RNAPa_bound_mRNA0033_CTP in default = 0;
  species RNAPa_bound_mRNA0034_PPi in default = 0;
  species RNAPa_bound_mRNA0034 in default = 0;
  species RNAPa_bound_mRNA0034_UTP in default = 0;
  species RNAPa_bound_mRNA0035_PPi in default = 0;
  species RNAPa_bound_mRNA0035 in default = 0;
  species RNAPa_bound_mRNA0035_ATP in default = 0;
  species RNAPa_bound_mRNA0036_PPi in default = 0;
  species RNAPa_bound_mRNA0036 in default = 0;
  species RNAPa_bound_mRNA0036_GTP in default = 0;
  species RNAPa_bound_mRNA0037_PPi in default = 0;
  species RNAPa_bound_mRNA0037 in default = 0;
  species RNAPa_bound_mRNA0037_ATP in default = 0;
  species RNAPa_bound_mRNA0038_PPi in default = 0;
  species RNAPa_bound_mRNA0038 in default = 0;
  species RNAPa_bound_mRNA0038_GTP in default = 0;
  species RNAPa_bound_mRNA0039_PPi in default = 0;
  species RNAPa_bound_mRNA0039 in default = 0;
  species RNAPa_bound_mRNA0039_CTP in default = 0;
  species RNAPa_bound_mRNA0040_PPi in default = 0;
  species RNAPa_bound_mRNA0040 in default = 0;
  species RNAPa_bound_mRNA0040_UTP in default = 0;
  species RNAPa_bound_mRNA0041_PPi in default = 0;
  species RNAPa_bound_mRNA0041 in default = 0;
  species RNAPa_bound_mRNA0041_CTP in default = 0;
  species RNAPa_bound_mRNA0042_PPi in default = 0;
  species RNAPa_bound_mRNA0042 in default = 0;
  species RNAPa_bound_mRNA0042_GTP in default = 0;
  species RNAPa_bound_mRNA0043_PPi in default = 0;
  species RNAPa_bound_mRNA0043 in default = 0;
  species RNAPa_bound_mRNA0043_GTP in default = 0;
  species RNAPa_bound_mRNA0044_PPi in default = 0;
  species RNAPa_bound_mRNA0044 in default = 0;
  species RNAPa_bound_mRNA0044_ATP in default = 0;
  species RNAPa_bound_mRNA0045_PPi in default = 0;
  species RNAPa_bound_mRNA0045 in default = 0;
  species RNAPa_bound_mRNA0045_ATP in default = 0;
  species RNAPa_bound_mRNA0046_PPi in default = 0;
  species RNAPa_bound_mRNA0046 in default = 0;
  species RNAPa_bound_mRNA0046_UTP in default = 0;
  species RNAPa_bound_mRNA0047_PPi in default = 0;
  species RNAPa_bound_mRNA0047 in default = 0;
  species RNAPa_bound_mRNA0047_CTP in default = 0;
  species RNAPa_bound_mRNA0048_PPi in default = 0;
  species RNAPa_bound_mRNA0048 in default = 0;
  species RNAPa_bound_mRNA0048_CTP in default = 0;
  species RNAPa_bound_mRNA0049_PPi in default = 0;
  species RNAPa_bound_mRNA0049 in default = 0;
  species RNAPa_bound_mRNA0049_UTP in default = 0;
  species RNAPa_bound_mRNA0050_PPi in default = 0;
  species RNAPa_bound_mRNA0050 in default = 0;
  species RNAPa_bound_mRNA0050_CTP in default = 0;
  species RNAPa_bound_mRNA0051_PPi in default = 0;
  species RNAPa_bound_mRNA0051 in default = 0;
  species RNAPa_bound_mRNA0051_UTP in default = 0;
  species RNAPa_bound_mRNA0052_PPi in default = 0;
  species RNAPa_bound_mRNA0052 in default = 0;
  species RNAPa_bound_mRNA0052_ATP in default = 0;
  species RNAPa_bound_mRNA0053_PPi in default = 0;
  species RNAPa_bound_mRNA0053 in default = 0;
  species RNAPa_bound_mRNA0053_GTP in default = 0;
  species RNAPa_bound_mRNA0054_PPi in default = 0;
  species RNAPa_bound_mRNA0054 in default = 0;
  species RNAPa_bound_mRNA0054_GTP in default = 0;
  species RNAPa_bound_mRNA0055_PPi in default = 0;
  species RNAPa_bound_mRNA0055 in default = 0;
  species RNAPa_bound_mRNA0055_CTP in default = 0;
  species RNAPa_bound_mRNA0056_PPi in default = 0;
  species RNAPa_bound_mRNA0056 in default = 0;
  species RNAPa_bound_mRNA0056_CTP in default = 0;
  species RNAPa_bound_mRNA0057_PPi in default = 0;
  species RNAPa_bound_mRNA0057 in default = 0;
  species RNAPa_bound_mRNA0057_GTP in default = 0;
  species RNAPa_bound_mRNA0058_PPi in default = 0;
  species RNAPa_bound_mRNA0058 in default = 0;
  species RNAPa_bound_mRNA0058_ATP in default = 0;
  species RNAPa_bound_mRNA0059_PPi in default = 0;
  species RNAPa_bound_mRNA0059 in default = 0;
  species RNAPa_bound_mRNA0059_CTP in default = 0;
  species RNAPa_bound_mRNA0060_PPi in default = 0;
  species RNAPa_bound_mRNA0060 in default = 0;
  species RNAPa_bound_mRNA0060_GTP in default = 0;
  species RNAPa_bound_mRNA0061_PPi in default = 0;
  species RNAPa_bound_mRNA0061 in default = 0;
  species RNAPa_bound_mRNA0061_ATP in default = 0;
  species RNAPa_bound_mRNA0062_PPi in default = 0;
  species RNAPa_bound_mRNA0062 in default = 0;
  species RNAPa_bound_mRNA0062_UTP in default = 0;
  species RNAPa_bound_mRNA0063_PPi in default = 0;
  species RNAPa_bound_mRNA0063 in default = 0;
  species RNAPa_bound_mRNA0063_UTP in default = 0;
  species RNAPa_bound_mRNA0064_PPi in default = 0;
  species RNAPa_bound_mRNA0064 in default = 0;
  species RNAPa_bound_mRNA0064_GTP in default = 0;
  species RNAPa_bound_mRNA0065_PPi in default = 0;
  species RNAPa_bound_mRNA0065 in default = 0;
  species RNAPa_bound_mRNA0065_UTP in default = 0;
  species RNAPa_bound_mRNA0066_PPi in default = 0;
  species RNAPa_bound_mRNA0066 in default = 0;
  species RNAPa_bound_mRNA0066_UTP in default = 0;
  species RNAPa_bound_mRNA0067_PPi in default = 0;
  species RNAPa_bound_mRNA0067 in default = 0;
  species RNAPa_bound_mRNA0067_UTP in default = 0;
  species RNAPa_bound_mRNA0068_PPi in default = 0;
  species RNAPa_bound_mRNA0068 in default = 0;
  species RNAPa_bound_mRNA0068_CTP in default = 0;
  species RNAPa_bound_mRNA0069_PPi in default = 0;
  species RNAPa_bound_mRNA0069 in default = 0;
  species RNAPa_bound_mRNA0069_GTP in default = 0;
  species RNAPa_bound_mRNA0070_PPi in default = 0;
  species RNAPa_bound_mRNA0070 in default = 0;
  species RNAPa_bound_mRNA0070_GTP in default = 0;
  species RNAPa_bound_mRNA0071_PPi in default = 0;
  species RNAPa_bound_mRNA0071 in default = 0;
  species RNAPa_bound_mRNA0071_GTP in default = 0;
  species RNAPa_bound_mRNA0072_PPi in default = 0;
  species RNAPa_bound_mRNA0072 in default = 0;
  species RNAPa_bound_mRNA0072_CTP in default = 0;
  species RNAPa_bound_mRNA0073_PPi in default = 0;
  species RNAPa_bound_mRNA0073 in default = 0;
  species RNAPa_bound_mRNA0073_UTP in default = 0;
  species RNAPa_bound_mRNA0074_PPi in default = 0;
  species RNAPa_bound_mRNA0074 in default = 0;
  species RNAPa_bound_mRNA0074_UTP in default = 0;
  species RNAPa_bound_mRNA0075_PPi in default = 0;
  species RNAPa_bound_mRNA0075 in default = 0;
  species RNAPa_bound_mRNA0075_UTP in default = 0;
  species RNAPa_bound_mRNA0076_PPi in default = 0;
  species RNAPa_bound_mRNA0076 in default = 0;
  species RNAPa_bound_mRNA0076_CTP in default = 0;
  species RNAPa_bound_mRNA0077_PPi in default = 0;
  species RNAPa_bound_mRNA0077 in default = 0;
  species RNAPa_bound_mRNA0077_CTP in default = 0;
  species RNAPa_bound_mRNA0078_PPi in default = 0;
  species RNAPa_bound_mRNA0078 in default = 0;
  species RNAPa_bound_mRNA0078_UTP in default = 0;
  species RNAPa_bound_mRNA0079_PPi in default = 0;
  species RNAPa_bound_mRNA0079 in default = 0;
  species RNAPa_bound_mRNA0079_UTP in default = 0;
  species RNAPa_bound_mRNA0080_PPi in default = 0;
  species RNAPa_bound_mRNA0080 in default = 0;
  species RNAPa_bound_mRNA0080_CTP in default = 0;
  species RNAPa_bound_mRNA0081_PPi in default = 0;
  species RNAPa_bound_mRNA0081 in default = 0;
  species RNAPa_bound_mRNA0081_GTP in default = 0;
  species RNAPa_bound_mRNA0082_PPi in default = 0;
  species RNAPa_bound_mRNA0082 in default = 0;
  species RNAPa_bound_mRNA0082_ATP in default = 0;
  species RNAPa_bound_mRNA0083_PPi in default = 0;
  species RNAPa_bound_mRNA0083 in default = 0;
  species RNAPa_bound_mRNA0083_CTP in default = 0;
  species RNAPa_bound_mRNA0084_PPi in default = 0;
  species RNAPa_bound_mRNA0084 in default = 0;
  species RNAPa_bound_mRNA0084_UTP in default = 0;
  species RNAPa_bound_mRNA0085_PPi in default = 0;
  species RNAPa_bound_mRNA0085 in default = 0;
  species RNAPa_bound_mRNA0085_CTP in default = 0;
  species RNAPa_bound_mRNA0086_PPi in default = 0;
  species RNAPa_bound_mRNA0086 in default = 0;
  species RNAPa_bound_mRNA0086_ATP in default = 0;
  species RNAPa_bound_mRNA0087_PPi in default = 0;
  species RNAPa_bound_mRNA0087 in default = 0;
  species RNAPa_bound_mRNA0087_ATP in default = 0;
  species RNAPa_bound_mRNA0088_PPi in default = 0;
  species RNAPa_bound_mRNA0088 in default = 0;
  species RNAPa_bound_mRNA0088_CTP in default = 0;
  species RNAPa_bound_mRNA0089_PPi in default = 0;
  species RNAPa_bound_mRNA0089 in default = 0;

  // Parameters:
  k_forward = 0.000175;
  k_forward1 = 0.29;
  k_forward2 = 0.08;
  k_forward3 = 0.42;
  k_forward4 = 0.06;
  k_forward5 = 0.73;
  k_forward6 = 35;
  k_forward7 = 948.25;
  k_forward8 = 2.6;

  // Reactions:
  r0: ATP => ; k_forward*ATP;
  r1: GTP => ; k_forward*GTP;
  r2: CTP => ; k_forward*CTP;
  r3: UTP => ; k_forward*UTP;
  r4: RNAPa + DNA + GTP => RNAPa_bound_GTP; k_forward1*RNAPa*DNA*GTP;
  r5: RNAPa_bound_GTP => RNAPa_bound_GDP_PO4; k_forward2*RNAPa_bound_GTP;
  r6: RNAPa_bound_GDP_PO4 => RNAPa_bound + GDP + PO4; k_forward3*RNAPa_bound_GDP_PO4;
  r7: RNAPa_bound => RNAPa_bound_mRNA0000; k_forward4*RNAPa_bound;
  r8: RNAPa_bound_mRNA0000 + CTP => RNAPa_bound_mRNA0000_CTP; k_forward5*RNAPa_bound_mRNA0000*CTP;
  r9: RNAPa_bound_mRNA0000_CTP => RNAPa_bound_mRNA0001_PPi; k_forward6*RNAPa_bound_mRNA0000_CTP;
  r10: RNAPa_bound_mRNA0001_PPi => RNAPa_bound_mRNA0001 + PPi; k_forward7*RNAPa_bound_mRNA0001_PPi;
  r11: RNAPa_bound_mRNA0001 + CTP => RNAPa_bound_mRNA0001_CTP; k_forward5*RNAPa_bound_mRNA0001*CTP;
  r12: RNAPa_bound_mRNA0001_CTP => RNAPa_bound_mRNA0002_PPi; k_forward6*RNAPa_bound_mRNA0001_CTP;
  r13: RNAPa_bound_mRNA0002_PPi => RNAPa_bound_mRNA0002 + PPi; k_forward7*RNAPa_bound_mRNA0002_PPi;
  r14: RNAPa_bound_mRNA0002 + UTP => RNAPa_bound_mRNA0002_UTP; k_forward5*RNAPa_bound_mRNA0002*UTP;
  r15: RNAPa_bound_mRNA0002_UTP => RNAPa_bound_mRNA0003_PPi; k_forward6*RNAPa_bound_mRNA0002_UTP;
  r16: RNAPa_bound_mRNA0003_PPi => RNAPa_bound_mRNA0003 + PPi; k_forward7*RNAPa_bound_mRNA0003_PPi;
  r17: RNAPa_bound_mRNA0003 + ATP => RNAPa_bound_mRNA0003_ATP; k_forward5*RNAPa_bound_mRNA0003*ATP;
  r18: RNAPa_bound_mRNA0003_ATP => RNAPa_bound_mRNA0004_PPi; k_forward6*RNAPa_bound_mRNA0003_ATP;
  r19: RNAPa_bound_mRNA0004_PPi => RNAPa_bound_mRNA0004 + PPi; k_forward7*RNAPa_bound_mRNA0004_PPi;
  r20: RNAPa_bound_mRNA0004 + GTP => RNAPa_bound_mRNA0004_GTP; k_forward5*RNAPa_bound_mRNA0004*GTP;
  r21: RNAPa_bound_mRNA0004_GTP => RNAPa_bound_mRNA0005_PPi; k_forward6*RNAPa_bound_mRNA0004_GTP;
  r22: RNAPa_bound_mRNA0005_PPi => RNAPa_bound_mRNA0005 + PPi; k_forward7*RNAPa_bound_mRNA0005_PPi;
  r23: RNAPa_bound_mRNA0005 + GTP => RNAPa_bound_mRNA0005_GTP; k_forward5*RNAPa_bound_mRNA0005*GTP;
  r24: RNAPa_bound_mRNA0005_GTP => RNAPa_bound_mRNA0006_PPi; k_forward6*RNAPa_bound_mRNA0005_GTP;
  r25: RNAPa_bound_mRNA0006_PPi => RNAPa_bound_mRNA0006 + PPi; k_forward7*RNAPa_bound_mRNA0006_PPi;
  r26: RNAPa_bound_mRNA0006 + GTP => RNAPa_bound_mRNA0006_GTP; k_forward5*RNAPa_bound_mRNA0006*GTP;
  r27: RNAPa_bound_mRNA0006_GTP => RNAPa_bound_mRNA0007_PPi; k_forward6*RNAPa_bound_mRNA0006_GTP;
  r28: RNAPa_bound_mRNA0007_PPi => RNAPa_bound_mRNA0007 + PPi; k_forward7*RNAPa_bound_mRNA0007_PPi;
  r29: RNAPa_bound_mRNA0007 + CTP => RNAPa_bound_mRNA0007_CTP; k_forward5*RNAPa_bound_mRNA0007*CTP;
  r30: RNAPa_bound_mRNA0007_CTP => RNAPa_bound_mRNA0008_PPi; k_forward6*RNAPa_bound_mRNA0007_CTP;
  r31: RNAPa_bound_mRNA0008_PPi => RNAPa_bound_mRNA0008 + PPi; k_forward7*RNAPa_bound_mRNA0008_PPi;
  r32: RNAPa_bound_mRNA0008 + UTP => RNAPa_bound_mRNA0008_UTP; k_forward5*RNAPa_bound_mRNA0008*UTP;
  r33: RNAPa_bound_mRNA0008_UTP => RNAPa_bound_mRNA0009_PPi; k_forward6*RNAPa_bound_mRNA0008_UTP;
  r34: RNAPa_bound_mRNA0009_PPi => RNAPa_bound_mRNA0009 + PPi; k_forward7*RNAPa_bound_mRNA0009_PPi;
  r35: RNAPa_bound_mRNA0009 + GTP => RNAPa_bound_mRNA0009_GTP; k_forward5*RNAPa_bound_mRNA0009*GTP;
  r36: RNAPa_bound_mRNA0009_GTP => RNAPa_bound_mRNA0010_PPi; k_forward6*RNAPa_bound_mRNA0009_GTP;
  r37: RNAPa_bound_mRNA0010_PPi => RNAPa_bound_mRNA0010 + PPi; k_forward7*RNAPa_bound_mRNA0010_PPi;
  r38: RNAPa_bound_mRNA0010 + ATP => RNAPa_bound_mRNA0010_ATP; k_forward5*RNAPa_bound_mRNA0010*ATP;
  r39: RNAPa_bound_mRNA0010_ATP => RNAPa_bound_mRNA0011_PPi; k_forward6*RNAPa_bound_mRNA0010_ATP;
  r40: RNAPa_bound_mRNA0011_PPi => RNAPa_bound_mRNA0011 + PPi; k_forward7*RNAPa_bound_mRNA0011_PPi;
  r41: RNAPa_bound_mRNA0011 + CTP => RNAPa_bound_mRNA0011_CTP; k_forward5*RNAPa_bound_mRNA0011*CTP;
  r42: RNAPa_bound_mRNA0011_CTP => RNAPa_bound_mRNA0012_PPi; k_forward6*RNAPa_bound_mRNA0011_CTP;
  r43: RNAPa_bound_mRNA0012_PPi => RNAPa_bound_mRNA0012 + PPi; k_forward7*RNAPa_bound_mRNA0012_PPi;
  r44: RNAPa_bound_mRNA0012 + CTP => RNAPa_bound_mRNA0012_CTP; k_forward5*RNAPa_bound_mRNA0012*CTP;
  r45: RNAPa_bound_mRNA0012_CTP => RNAPa_bound_mRNA0013_PPi; k_forward6*RNAPa_bound_mRNA0012_CTP;
  r46: RNAPa_bound_mRNA0013_PPi => RNAPa_bound_mRNA0013 + PPi; k_forward7*RNAPa_bound_mRNA0013_PPi;
  r47: RNAPa_bound_mRNA0013 + GTP => RNAPa_bound_mRNA0013_GTP; k_forward5*RNAPa_bound_mRNA0013*GTP;
  r48: RNAPa_bound_mRNA0013_GTP => RNAPa_bound_mRNA0014_PPi; k_forward6*RNAPa_bound_mRNA0013_GTP;
  r49: RNAPa_bound_mRNA0014_PPi => RNAPa_bound_mRNA0014 + PPi; k_forward7*RNAPa_bound_mRNA0014_PPi;
  r50: RNAPa_bound_mRNA0014 + CTP => RNAPa_bound_mRNA0014_CTP; k_forward5*RNAPa_bound_mRNA0014*CTP;
  r51: RNAPa_bound_mRNA0014_CTP => RNAPa_bound_mRNA0015_PPi; k_forward6*RNAPa_bound_mRNA0014_CTP;
  r52: RNAPa_bound_mRNA0015_PPi => RNAPa_bound_mRNA0015 + PPi; k_forward7*RNAPa_bound_mRNA0015_PPi;
  r53: RNAPa_bound_mRNA0015 + UTP => RNAPa_bound_mRNA0015_UTP; k_forward5*RNAPa_bound_mRNA0015*UTP;
  r54: RNAPa_bound_mRNA0015_UTP => RNAPa_bound_mRNA0016_PPi; k_forward6*RNAPa_bound_mRNA0015_UTP;
  r55: RNAPa_bound_mRNA0016_PPi => RNAPa_bound_mRNA0016 + PPi; k_forward7*RNAPa_bound_mRNA0016_PPi;
  r56: RNAPa_bound_mRNA0016 + CTP => RNAPa_bound_mRNA0016_CTP; k_forward5*RNAPa_bound_mRNA0016*CTP;
  r57: RNAPa_bound_mRNA0016_CTP => RNAPa_bound_mRNA0017_PPi; k_forward6*RNAPa_bound_mRNA0016_CTP;
  r58: RNAPa_bound_mRNA0017_PPi => RNAPa_bound_mRNA0017 + PPi; k_forward7*RNAPa_bound_mRNA0017_PPi;
  r59: RNAPa_bound_mRNA0017 + UTP => RNAPa_bound_mRNA0017_UTP; k_forward5*RNAPa_bound_mRNA0017*UTP;
  r60: RNAPa_bound_mRNA0017_UTP => RNAPa_bound_mRNA0018_PPi; k_forward6*RNAPa_bound_mRNA0017_UTP;
  r61: RNAPa_bound_mRNA0018_PPi => RNAPa_bound_mRNA0018 + PPi; k_forward7*RNAPa_bound_mRNA0018_PPi;
  r62: RNAPa_bound_mRNA0018 + CTP => RNAPa_bound_mRNA0018_CTP; k_forward5*RNAPa_bound_mRNA0018*CTP;
  r63: RNAPa_bound_mRNA0018_CTP => RNAPa_bound_mRNA0019_PPi; k_forward6*RNAPa_bound_mRNA0018_CTP;
  r64: RNAPa_bound_mRNA0019_PPi => RNAPa_bound_mRNA0019 + PPi; k_forward7*RNAPa_bound_mRNA0019_PPi;
  r65: RNAPa_bound_mRNA0019 + GTP => RNAPa_bound_mRNA0019_GTP; k_forward5*RNAPa_bound_mRNA0019*GTP;
  r66: RNAPa_bound_mRNA0019_GTP => RNAPa_bound_mRNA0020_PPi; k_forward6*RNAPa_bound_mRNA0019_GTP;
  r67: RNAPa_bound_mRNA0020_PPi => RNAPa_bound_mRNA0020 + PPi; k_forward7*RNAPa_bound_mRNA0020_PPi;
  r68: RNAPa_bound_mRNA0020 + GTP => RNAPa_bound_mRNA0020_GTP; k_forward5*RNAPa_bound_mRNA0020*GTP;
  r69: RNAPa_bound_mRNA0020_GTP => RNAPa_bound_mRNA0021_PPi; k_forward6*RNAPa_bound_mRNA0020_GTP;
  r70: RNAPa_bound_mRNA0021_PPi => RNAPa_bound_mRNA0021 + PPi; k_forward7*RNAPa_bound_mRNA0021_PPi;
  r71: RNAPa_bound_mRNA0021 + UTP => RNAPa_bound_mRNA0021_UTP; k_forward5*RNAPa_bound_mRNA0021*UTP;
  r72: RNAPa_bound_mRNA0021_UTP => RNAPa_bound_mRNA0022_PPi; k_forward6*RNAPa_bound_mRNA0021_UTP;
  r73: RNAPa_bound_mRNA0022_PPi => RNAPa_bound_mRNA0022 + PPi; k_forward7*RNAPa_bound_mRNA0022_PPi;
  r74: RNAPa_bound_mRNA0022 + CTP => RNAPa_bound_mRNA0022_CTP; k_forward5*RNAPa_bound_mRNA0022*CTP;
  r75: RNAPa_bound_mRNA0022_CTP => RNAPa_bound_mRNA0023_PPi; k_forward6*RNAPa_bound_mRNA0022_CTP;
  r76: RNAPa_bound_mRNA0023_PPi => RNAPa_bound_mRNA0023 + PPi; k_forward7*RNAPa_bound_mRNA0023_PPi;
  r77: RNAPa_bound_mRNA0023 + CTP => RNAPa_bound_mRNA0023_CTP; k_forward5*RNAPa_bound_mRNA0023*CTP;
  r78: RNAPa_bound_mRNA0023_CTP => RNAPa_bound_mRNA0024_PPi; k_forward6*RNAPa_bound_mRNA0023_CTP;
  r79: RNAPa_bound_mRNA0024_PPi => RNAPa_bound_mRNA0024 + PPi; k_forward7*RNAPa_bound_mRNA0024_PPi;
  r80: RNAPa_bound_mRNA0024 + ATP => RNAPa_bound_mRNA0024_ATP; k_forward5*RNAPa_bound_mRNA0024*ATP;
  r81: RNAPa_bound_mRNA0024_ATP => RNAPa_bound_mRNA0025_PPi; k_forward6*RNAPa_bound_mRNA0024_ATP;
  r82: RNAPa_bound_mRNA0025_PPi => RNAPa_bound_mRNA0025 + PPi; k_forward7*RNAPa_bound_mRNA0025_PPi;
  r83: RNAPa_bound_mRNA0025 + UTP => RNAPa_bound_mRNA0025_UTP; k_forward5*RNAPa_bound_mRNA0025*UTP;
  r84: RNAPa_bound_mRNA0025_UTP => RNAPa_bound_mRNA0026_PPi; k_forward6*RNAPa_bound_mRNA0025_UTP;
  r85: RNAPa_bound_mRNA0026_PPi => RNAPa_bound_mRNA0026 + PPi; k_forward7*RNAPa_bound_mRNA0026_PPi;
  r86: RNAPa_bound_mRNA0026 + UTP => RNAPa_bound_mRNA0026_UTP; k_forward5*RNAPa_bound_mRNA0026*UTP;
  r87: RNAPa_bound_mRNA0026_UTP => RNAPa_bound_mRNA0027_PPi; k_forward6*RNAPa_bound_mRNA0026_UTP;
  r88: RNAPa_bound_mRNA0027_PPi => RNAPa_bound_mRNA0027 + PPi; k_forward7*RNAPa_bound_mRNA0027_PPi;
  r89: RNAPa_bound_mRNA0027 + GTP => RNAPa_bound_mRNA0027_GTP; k_forward5*RNAPa_bound_mRNA0027*GTP;
  r90: RNAPa_bound_mRNA0027_GTP => RNAPa_bound_mRNA0028_PPi; k_forward6*RNAPa_bound_mRNA0027_GTP;
  r91: RNAPa_bound_mRNA0028_PPi => RNAPa_bound_mRNA0028 + PPi; k_forward7*RNAPa_bound_mRNA0028_PPi;
  r92: RNAPa_bound_mRNA0028 + CTP => RNAPa_bound_mRNA0028_CTP; k_forward5*RNAPa_bound_mRNA0028*CTP;
  r93: RNAPa_bound_mRNA0028_CTP => RNAPa_bound_mRNA0029_PPi; k_forward6*RNAPa_bound_mRNA0028_CTP;
  r94: RNAPa_bound_mRNA0029_PPi => RNAPa_bound_mRNA0029 + PPi; k_forward7*RNAPa_bound_mRNA0029_PPi;
  r95: RNAPa_bound_mRNA0029 + UTP => RNAPa_bound_mRNA0029_UTP; k_forward5*RNAPa_bound_mRNA0029*UTP;
  r96: RNAPa_bound_mRNA0029_UTP => RNAPa_bound_mRNA0030_PPi; k_forward6*RNAPa_bound_mRNA0029_UTP;
  r97: RNAPa_bound_mRNA0030_PPi => RNAPa_bound_mRNA0030 + PPi; k_forward7*RNAPa_bound_mRNA0030_PPi;
  r98: RNAPa_bound_mRNA0030 + UTP => RNAPa_bound_mRNA0030_UTP; k_forward5*RNAPa_bound_mRNA0030*UTP;
  r99: RNAPa_bound_mRNA0030_UTP => RNAPa_bound_mRNA0031_PPi; k_forward6*RNAPa_bound_mRNA0030_UTP;
  r100: RNAPa_bound_mRNA0031_PPi => RNAPa_bound_mRNA0031 + PPi; k_forward7*RNAPa_bound_mRNA0031_PPi;
  r101: RNAPa_bound_mRNA0031 + ATP => RNAPa_bound_mRNA0031_ATP; k_forward5*RNAPa_bound_mRNA0031*ATP;
  r102: RNAPa_bound_mRNA0031_ATP => RNAPa_bound_mRNA0032_PPi; k_forward6*RNAPa_bound_mRNA0031_ATP;
  r103: RNAPa_bound_mRNA0032_PPi => RNAPa_bound_mRNA0032 + PPi; k_forward7*RNAPa_bound_mRNA0032_PPi;
  r104: RNAPa_bound_mRNA0032 + CTP => RNAPa_bound_mRNA0032_CTP; k_forward5*RNAPa_bound_mRNA0032*CTP;
  r105: RNAPa_bound_mRNA0032_CTP => RNAPa_bound_mRNA0033_PPi; k_forward6*RNAPa_bound_mRNA0032_CTP;
  r106: RNAPa_bound_mRNA0033_PPi => RNAPa_bound_mRNA0033 + PPi; k_forward7*RNAPa_bound_mRNA0033_PPi;
  r107: RNAPa_bound_mRNA0033 + CTP => RNAPa_bound_mRNA0033_CTP; k_forward5*RNAPa_bound_mRNA0033*CTP;
  r108: RNAPa_bound_mRNA0033_CTP => RNAPa_bound_mRNA0034_PPi; k_forward6*RNAPa_bound_mRNA0033_CTP;
  r109: RNAPa_bound_mRNA0034_PPi => RNAPa_bound_mRNA0034 + PPi; k_forward7*RNAPa_bound_mRNA0034_PPi;
  r110: RNAPa_bound_mRNA0034 + UTP => RNAPa_bound_mRNA0034_UTP; k_forward5*RNAPa_bound_mRNA0034*UTP;
  r111: RNAPa_bound_mRNA0034_UTP => RNAPa_bound_mRNA0035_PPi; k_forward6*RNAPa_bound_mRNA0034_UTP;
  r112: RNAPa_bound_mRNA0035_PPi => RNAPa_bound_mRNA0035 + PPi; k_forward7*RNAPa_bound_mRNA0035_PPi;
  r113: RNAPa_bound_mRNA0035 + ATP => RNAPa_bound_mRNA0035_ATP; k_forward5*RNAPa_bound_mRNA0035*ATP;
  r114: RNAPa_bound_mRNA0035_ATP => RNAPa_bound_mRNA0036_PPi; k_forward6*RNAPa_bound_mRNA0035_ATP;
  r115: RNAPa_bound_mRNA0036_PPi => RNAPa_bound_mRNA0036 + PPi; k_forward7*RNAPa_bound_mRNA0036_PPi;
  r116: RNAPa_bound_mRNA0036 + GTP => RNAPa_bound_mRNA0036_GTP; k_forward5*RNAPa_bound_mRNA0036*GTP;
  r117: RNAPa_bound_mRNA0036_GTP => RNAPa_bound_mRNA0037_PPi; k_forward6*RNAPa_bound_mRNA0036_GTP;
  r118: RNAPa_bound_mRNA0037_PPi => RNAPa_bound_mRNA0037 + PPi; k_forward7*RNAPa_bound_mRNA0037_PPi;
  r119: RNAPa_bound_mRNA0037 + ATP => RNAPa_bound_mRNA0037_ATP; k_forward5*RNAPa_bound_mRNA0037*ATP;
  r120: RNAPa_bound_mRNA0037_ATP => RNAPa_bound_mRNA0038_PPi; k_forward6*RNAPa_bound_mRNA0037_ATP;
  r121: RNAPa_bound_mRNA0038_PPi => RNAPa_bound_mRNA0038 + PPi; k_forward7*RNAPa_bound_mRNA0038_PPi;
  r122: RNAPa_bound_mRNA0038 + GTP => RNAPa_bound_mRNA0038_GTP; k_forward5*RNAPa_bound_mRNA0038*GTP;
  r123: RNAPa_bound_mRNA0038_GTP => RNAPa_bound_mRNA0039_PPi; k_forward6*RNAPa_bound_mRNA0038_GTP;
  r124: RNAPa_bound_mRNA0039_PPi => RNAPa_bound_mRNA0039 + PPi; k_forward7*RNAPa_bound_mRNA0039_PPi;
  r125: RNAPa_bound_mRNA0039 + CTP => RNAPa_bound_mRNA0039_CTP; k_forward5*RNAPa_bound_mRNA0039*CTP;
  r126: RNAPa_bound_mRNA0039_CTP => RNAPa_bound_mRNA0040_PPi; k_forward6*RNAPa_bound_mRNA0039_CTP;
  r127: RNAPa_bound_mRNA0040_PPi => RNAPa_bound_mRNA0040 + PPi; k_forward7*RNAPa_bound_mRNA0040_PPi;
  r128: RNAPa_bound_mRNA0040 + UTP => RNAPa_bound_mRNA0040_UTP; k_forward5*RNAPa_bound_mRNA0040*UTP;
  r129: RNAPa_bound_mRNA0040_UTP => RNAPa_bound_mRNA0041_PPi; k_forward6*RNAPa_bound_mRNA0040_UTP;
  r130: RNAPa_bound_mRNA0041_PPi => RNAPa_bound_mRNA0041 + PPi; k_forward7*RNAPa_bound_mRNA0041_PPi;
  r131: RNAPa_bound_mRNA0041 + CTP => RNAPa_bound_mRNA0041_CTP; k_forward5*RNAPa_bound_mRNA0041*CTP;
  r132: RNAPa_bound_mRNA0041_CTP => RNAPa_bound_mRNA0042_PPi; k_forward6*RNAPa_bound_mRNA0041_CTP;
  r133: RNAPa_bound_mRNA0042_PPi => RNAPa_bound_mRNA0042 + PPi; k_forward7*RNAPa_bound_mRNA0042_PPi;
  r134: RNAPa_bound_mRNA0042 + GTP => RNAPa_bound_mRNA0042_GTP; k_forward5*RNAPa_bound_mRNA0042*GTP;
  r135: RNAPa_bound_mRNA0042_GTP => RNAPa_bound_mRNA0043_PPi; k_forward6*RNAPa_bound_mRNA0042_GTP;
  r136: RNAPa_bound_mRNA0043_PPi => RNAPa_bound_mRNA0043 + PPi; k_forward7*RNAPa_bound_mRNA0043_PPi;
  r137: RNAPa_bound_mRNA0043 + GTP => RNAPa_bound_mRNA0043_GTP; k_forward5*RNAPa_bound_mRNA0043*GTP;
  r138: RNAPa_bound_mRNA0043_GTP => RNAPa_bound_mRNA0044_PPi; k_forward6*RNAPa_bound_mRNA0043_GTP;
  r139: RNAPa_bound_mRNA0044_PPi => RNAPa_bound_mRNA0044 + PPi; k_forward7*RNAPa_bound_mRNA0044_PPi;
  r140: RNAPa_bound_mRNA0044 + ATP => RNAPa_bound_mRNA0044_ATP; k_forward5*RNAPa_bound_mRNA0044*ATP;
  r141: RNAPa_bound_mRNA0044_ATP => RNAPa_bound_mRNA0045_PPi; k_forward6*RNAPa_bound_mRNA0044_ATP;
  r142: RNAPa_bound_mRNA0045_PPi => RNAPa_bound_mRNA0045 + PPi; k_forward7*RNAPa_bound_mRNA0045_PPi;
  r143: RNAPa_bound_mRNA0045 + ATP => RNAPa_bound_mRNA0045_ATP; k_forward5*RNAPa_bound_mRNA0045*ATP;
  r144: RNAPa_bound_mRNA0045_ATP => RNAPa_bound_mRNA0046_PPi; k_forward6*RNAPa_bound_mRNA0045_ATP;
  r145: RNAPa_bound_mRNA0046_PPi => RNAPa_bound_mRNA0046 + PPi; k_forward7*RNAPa_bound_mRNA0046_PPi;
  r146: RNAPa_bound_mRNA0046 + UTP => RNAPa_bound_mRNA0046_UTP; k_forward5*RNAPa_bound_mRNA0046*UTP;
  r147: RNAPa_bound_mRNA0046_UTP => RNAPa_bound_mRNA0047_PPi; k_forward6*RNAPa_bound_mRNA0046_UTP;
  r148: RNAPa_bound_mRNA0047_PPi => RNAPa_bound_mRNA0047 + PPi; k_forward7*RNAPa_bound_mRNA0047_PPi;
  r149: RNAPa_bound_mRNA0047 + CTP => RNAPa_bound_mRNA0047_CTP; k_forward5*RNAPa_bound_mRNA0047*CTP;
  r150: RNAPa_bound_mRNA0047_CTP => RNAPa_bound_mRNA0048_PPi; k_forward6*RNAPa_bound_mRNA0047_CTP;
  r151: RNAPa_bound_mRNA0048_PPi => RNAPa_bound_mRNA0048 + PPi; k_forward7*RNAPa_bound_mRNA0048_PPi;
  r152: RNAPa_bound_mRNA0048 + CTP => RNAPa_bound_mRNA0048_CTP; k_forward5*RNAPa_bound_mRNA0048*CTP;
  r153: RNAPa_bound_mRNA0048_CTP => RNAPa_bound_mRNA0049_PPi; k_forward6*RNAPa_bound_mRNA0048_CTP;
  r154: RNAPa_bound_mRNA0049_PPi => RNAPa_bound_mRNA0049 + PPi; k_forward7*RNAPa_bound_mRNA0049_PPi;
  r155: RNAPa_bound_mRNA0049 + UTP => RNAPa_bound_mRNA0049_UTP; k_forward5*RNAPa_bound_mRNA0049*UTP;
  r156: RNAPa_bound_mRNA0049_UTP => RNAPa_bound_mRNA0050_PPi; k_forward6*RNAPa_bound_mRNA0049_UTP;
  r157: RNAPa_bound_mRNA0050_PPi => RNAPa_bound_mRNA0050 + PPi; k_forward7*RNAPa_bound_mRNA0050_PPi;
  r158: RNAPa_bound_mRNA0050 + CTP => RNAPa_bound_mRNA0050_CTP; k_forward5*RNAPa_bound_mRNA0050*CTP;
  r159: RNAPa_bound_mRNA0050_CTP => RNAPa_bound_mRNA0051_PPi; k_forward6*RNAPa_bound_mRNA0050_CTP;
  r160: RNAPa_bound_mRNA0051_PPi => RNAPa_bound_mRNA0051 + PPi; k_forward7*RNAPa_bound_mRNA0051_PPi;
  r161: RNAPa_bound_mRNA0051 + UTP => RNAPa_bound_mRNA0051_UTP; k_forward5*RNAPa_bound_mRNA0051*UTP;
  r162: RNAPa_bound_mRNA0051_UTP => RNAPa_bound_mRNA0052_PPi; k_forward6*RNAPa_bound_mRNA0051_UTP;
  r163: RNAPa_bound_mRNA0052_PPi => RNAPa_bound_mRNA0052 + PPi; k_forward7*RNAPa_bound_mRNA0052_PPi;
  r164: RNAPa_bound_mRNA0052 + ATP => RNAPa_bound_mRNA0052_ATP; k_forward5*RNAPa_bound_mRNA0052*ATP;
  r165: RNAPa_bound_mRNA0052_ATP => RNAPa_bound_mRNA0053_PPi; k_forward6*RNAPa_bound_mRNA0052_ATP;
  r166: RNAPa_bound_mRNA0053_PPi => RNAPa_bound_mRNA0053 + PPi; k_forward7*RNAPa_bound_mRNA0053_PPi;
  r167: RNAPa_bound_mRNA0053 + GTP => RNAPa_bound_mRNA0053_GTP; k_forward5*RNAPa_bound_mRNA0053*GTP;
  r168: RNAPa_bound_mRNA0053_GTP => RNAPa_bound_mRNA0054_PPi; k_forward6*RNAPa_bound_mRNA0053_GTP;
  r169: RNAPa_bound_mRNA0054_PPi => RNAPa_bound_mRNA0054 + PPi; k_forward7*RNAPa_bound_mRNA0054_PPi;
  r170: RNAPa_bound_mRNA0054 + GTP => RNAPa_bound_mRNA0054_GTP; k_forward5*RNAPa_bound_mRNA0054*GTP;
  r171: RNAPa_bound_mRNA0054_GTP => RNAPa_bound_mRNA0055_PPi; k_forward6*RNAPa_bound_mRNA0054_GTP;
  r172: RNAPa_bound_mRNA0055_PPi => RNAPa_bound_mRNA0055 + PPi; k_forward7*RNAPa_bound_mRNA0055_PPi;
  r173: RNAPa_bound_mRNA0055 + CTP => RNAPa_bound_mRNA0055_CTP; k_forward5*RNAPa_bound_mRNA0055*CTP;
  r174: RNAPa_bound_mRNA0055_CTP => RNAPa_bound_mRNA0056_PPi; k_forward6*RNAPa_bound_mRNA0055_CTP;
  r175: RNAPa_bound_mRNA0056_PPi => RNAPa_bound_mRNA0056 + PPi; k_forward7*RNAPa_bound_mRNA0056_PPi;
  r176: RNAPa_bound_mRNA0056 + CTP => RNAPa_bound_mRNA0056_CTP; k_forward5*RNAPa_bound_mRNA0056*CTP;
  r177: RNAPa_bound_mRNA0056_CTP => RNAPa_bound_mRNA0057_PPi; k_forward6*RNAPa_bound_mRNA0056_CTP;
  r178: RNAPa_bound_mRNA0057_PPi => RNAPa_bound_mRNA0057 + PPi; k_forward7*RNAPa_bound_mRNA0057_PPi;
  r179: RNAPa_bound_mRNA0057 + GTP => RNAPa_bound_mRNA0057_GTP; k_forward5*RNAPa_bound_mRNA0057*GTP;
  r180: RNAPa_bound_mRNA0057_GTP => RNAPa_bound_mRNA0058_PPi; k_forward6*RNAPa_bound_mRNA0057_GTP;
  r181: RNAPa_bound_mRNA0058_PPi => RNAPa_bound_mRNA0058 + PPi; k_forward7*RNAPa_bound_mRNA0058_PPi;
  r182: RNAPa_bound_mRNA0058 + ATP => RNAPa_bound_mRNA0058_ATP; k_forward5*RNAPa_bound_mRNA0058*ATP;
  r183: RNAPa_bound_mRNA0058_ATP => RNAPa_bound_mRNA0059_PPi; k_forward6*RNAPa_bound_mRNA0058_ATP;
  r184: RNAPa_bound_mRNA0059_PPi => RNAPa_bound_mRNA0059 + PPi; k_forward7*RNAPa_bound_mRNA0059_PPi;
  r185: RNAPa_bound_mRNA0059 + CTP => RNAPa_bound_mRNA0059_CTP; k_forward5*RNAPa_bound_mRNA0059*CTP;
  r186: RNAPa_bound_mRNA0059_CTP => RNAPa_bound_mRNA0060_PPi; k_forward6*RNAPa_bound_mRNA0059_CTP;
  r187: RNAPa_bound_mRNA0060_PPi => RNAPa_bound_mRNA0060 + PPi; k_forward7*RNAPa_bound_mRNA0060_PPi;
  r188: RNAPa_bound_mRNA0060 + GTP => RNAPa_bound_mRNA0060_GTP; k_forward5*RNAPa_bound_mRNA0060*GTP;
  r189: RNAPa_bound_mRNA0060_GTP => RNAPa_bound_mRNA0061_PPi; k_forward6*RNAPa_bound_mRNA0060_GTP;
  r190: RNAPa_bound_mRNA0061_PPi => RNAPa_bound_mRNA0061 + PPi; k_forward7*RNAPa_bound_mRNA0061_PPi;
  r191: RNAPa_bound_mRNA0061 + ATP => RNAPa_bound_mRNA0061_ATP; k_forward5*RNAPa_bound_mRNA0061*ATP;
  r192: RNAPa_bound_mRNA0061_ATP => RNAPa_bound_mRNA0062_PPi; k_forward6*RNAPa_bound_mRNA0061_ATP;
  r193: RNAPa_bound_mRNA0062_PPi => RNAPa_bound_mRNA0062 + PPi; k_forward7*RNAPa_bound_mRNA0062_PPi;
  r194: RNAPa_bound_mRNA0062 + UTP => RNAPa_bound_mRNA0062_UTP; k_forward5*RNAPa_bound_mRNA0062*UTP;
  r195: RNAPa_bound_mRNA0062_UTP => RNAPa_bound_mRNA0063_PPi; k_forward6*RNAPa_bound_mRNA0062_UTP;
  r196: RNAPa_bound_mRNA0063_PPi => RNAPa_bound_mRNA0063 + PPi; k_forward7*RNAPa_bound_mRNA0063_PPi;
  r197: RNAPa_bound_mRNA0063 + UTP => RNAPa_bound_mRNA0063_UTP; k_forward5*RNAPa_bound_mRNA0063*UTP;
  r198: RNAPa_bound_mRNA0063_UTP => RNAPa_bound_mRNA0064_PPi; k_forward6*RNAPa_bound_mRNA0063_UTP;
  r199: RNAPa_bound_mRNA0064_PPi => RNAPa_bound_mRNA0064 + PPi; k_forward7*RNAPa_bound_mRNA0064_PPi;
  r200: RNAPa_bound_mRNA0064 + GTP => RNAPa_bound_mRNA0064_GTP; k_forward5*RNAPa_bound_mRNA0064*GTP;
  r201: RNAPa_bound_mRNA0064_GTP => RNAPa_bound_mRNA0065_PPi; k_forward6*RNAPa_bound_mRNA0064_GTP;
  r202: RNAPa_bound_mRNA0065_PPi => RNAPa_bound_mRNA0065 + PPi; k_forward7*RNAPa_bound_mRNA0065_PPi;
  r203: RNAPa_bound_mRNA0065 + UTP => RNAPa_bound_mRNA0065_UTP; k_forward5*RNAPa_bound_mRNA0065*UTP;
  r204: RNAPa_bound_mRNA0065_UTP => RNAPa_bound_mRNA0066_PPi; k_forward6*RNAPa_bound_mRNA0065_UTP;
  r205: RNAPa_bound_mRNA0066_PPi => RNAPa_bound_mRNA0066 + PPi; k_forward7*RNAPa_bound_mRNA0066_PPi;
  r206: RNAPa_bound_mRNA0066 + UTP => RNAPa_bound_mRNA0066_UTP; k_forward5*RNAPa_bound_mRNA0066*UTP;
  r207: RNAPa_bound_mRNA0066_UTP => RNAPa_bound_mRNA0067_PPi; k_forward6*RNAPa_bound_mRNA0066_UTP;
  r208: RNAPa_bound_mRNA0067_PPi => RNAPa_bound_mRNA0067 + PPi; k_forward7*RNAPa_bound_mRNA0067_PPi;
  r209: RNAPa_bound_mRNA0067 + UTP => RNAPa_bound_mRNA0067_UTP; k_forward5*RNAPa_bound_mRNA0067*UTP;
  r210: RNAPa_bound_mRNA0067_UTP => RNAPa_bound_mRNA0068_PPi; k_forward6*RNAPa_bound_mRNA0067_UTP;
  r211: RNAPa_bound_mRNA0068_PPi => RNAPa_bound_mRNA0068 + PPi; k_forward7*RNAPa_bound_mRNA0068_PPi;
  r212: RNAPa_bound_mRNA0068 + CTP => RNAPa_bound_mRNA0068_CTP; k_forward5*RNAPa_bound_mRNA0068*CTP;
  r213: RNAPa_bound_mRNA0068_CTP => RNAPa_bound_mRNA0069_PPi; k_forward6*RNAPa_bound_mRNA0068_CTP;
  r214: RNAPa_bound_mRNA0069_PPi => RNAPa_bound_mRNA0069 + PPi; k_forward7*RNAPa_bound_mRNA0069_PPi;
  r215: RNAPa_bound_mRNA0069 + GTP => RNAPa_bound_mRNA0069_GTP; k_forward5*RNAPa_bound_mRNA0069*GTP;
  r216: RNAPa_bound_mRNA0069_GTP => RNAPa_bound_mRNA0070_PPi; k_forward6*RNAPa_bound_mRNA0069_GTP;
  r217: RNAPa_bound_mRNA0070_PPi => RNAPa_bound_mRNA0070 + PPi; k_forward7*RNAPa_bound_mRNA0070_PPi;
  r218: RNAPa_bound_mRNA0070 + GTP => RNAPa_bound_mRNA0070_GTP; k_forward5*RNAPa_bound_mRNA0070*GTP;
  r219: RNAPa_bound_mRNA0070_GTP => RNAPa_bound_mRNA0071_PPi; k_forward6*RNAPa_bound_mRNA0070_GTP;
  r220: RNAPa_bound_mRNA0071_PPi => RNAPa_bound_mRNA0071 + PPi; k_forward7*RNAPa_bound_mRNA0071_PPi;
  r221: RNAPa_bound_mRNA0071 + GTP => RNAPa_bound_mRNA0071_GTP; k_forward5*RNAPa_bound_mRNA0071*GTP;
  r222: RNAPa_bound_mRNA0071_GTP => RNAPa_bound_mRNA0072_PPi; k_forward6*RNAPa_bound_mRNA0071_GTP;
  r223: RNAPa_bound_mRNA0072_PPi => RNAPa_bound_mRNA0072 + PPi; k_forward7*RNAPa_bound_mRNA0072_PPi;
  r224: RNAPa_bound_mRNA0072 + CTP => RNAPa_bound_mRNA0072_CTP; k_forward5*RNAPa_bound_mRNA0072*CTP;
  r225: RNAPa_bound_mRNA0072_CTP => RNAPa_bound_mRNA0073_PPi; k_forward6*RNAPa_bound_mRNA0072_CTP;
  r226: RNAPa_bound_mRNA0073_PPi => RNAPa_bound_mRNA0073 + PPi; k_forward7*RNAPa_bound_mRNA0073_PPi;
  r227: RNAPa_bound_mRNA0073 + UTP => RNAPa_bound_mRNA0073_UTP; k_forward5*RNAPa_bound_mRNA0073*UTP;
  r228: RNAPa_bound_mRNA0073_UTP => RNAPa_bound_mRNA0074_PPi; k_forward6*RNAPa_bound_mRNA0073_UTP;
  r229: RNAPa_bound_mRNA0074_PPi => RNAPa_bound_mRNA0074 + PPi; k_forward7*RNAPa_bound_mRNA0074_PPi;
  r230: RNAPa_bound_mRNA0074 + UTP => RNAPa_bound_mRNA0074_UTP; k_forward5*RNAPa_bound_mRNA0074*UTP;
  r231: RNAPa_bound_mRNA0074_UTP => RNAPa_bound_mRNA0075_PPi; k_forward6*RNAPa_bound_mRNA0074_UTP;
  r232: RNAPa_bound_mRNA0075_PPi => RNAPa_bound_mRNA0075 + PPi; k_forward7*RNAPa_bound_mRNA0075_PPi;
  r233: RNAPa_bound_mRNA0075 + UTP => RNAPa_bound_mRNA0075_UTP; k_forward5*RNAPa_bound_mRNA0075*UTP;
  r234: RNAPa_bound_mRNA0075_UTP => RNAPa_bound_mRNA0076_PPi; k_forward6*RNAPa_bound_mRNA0075_UTP;
  r235: RNAPa_bound_mRNA0076_PPi => RNAPa_bound_mRNA0076 + PPi; k_forward7*RNAPa_bound_mRNA0076_PPi;
  r236: RNAPa_bound_mRNA0076 + CTP => RNAPa_bound_mRNA0076_CTP; k_forward5*RNAPa_bound_mRNA0076*CTP;
  r237: RNAPa_bound_mRNA0076_CTP => RNAPa_bound_mRNA0077_PPi; k_forward6*RNAPa_bound_mRNA0076_CTP;
  r238: RNAPa_bound_mRNA0077_PPi => RNAPa_bound_mRNA0077 + PPi; k_forward7*RNAPa_bound_mRNA0077_PPi;
  r239: RNAPa_bound_mRNA0077 + CTP => RNAPa_bound_mRNA0077_CTP; k_forward5*RNAPa_bound_mRNA0077*CTP;
  r240: RNAPa_bound_mRNA0077_CTP => RNAPa_bound_mRNA0078_PPi; k_forward6*RNAPa_bound_mRNA0077_CTP;
  r241: RNAPa_bound_mRNA0078_PPi => RNAPa_bound_mRNA0078 + PPi; k_forward7*RNAPa_bound_mRNA0078_PPi;
  r242: RNAPa_bound_mRNA0078 + UTP => RNAPa_bound_mRNA0078_UTP; k_forward5*RNAPa_bound_mRNA0078*UTP;
  r243: RNAPa_bound_mRNA0078_UTP => RNAPa_bound_mRNA0079_PPi; k_forward6*RNAPa_bound_mRNA0078_UTP;
  r244: RNAPa_bound_mRNA0079_PPi => RNAPa_bound_mRNA0079 + PPi; k_forward7*RNAPa_bound_mRNA0079_PPi;
  r245: RNAPa_bound_mRNA0079 + UTP => RNAPa_bound_mRNA0079_UTP; k_forward5*RNAPa_bound_mRNA0079*UTP;
  r246: RNAPa_bound_mRNA0079_UTP => RNAPa_bound_mRNA0080_PPi; k_forward6*RNAPa_bound_mRNA0079_UTP;
  r247: RNAPa_bound_mRNA0080_PPi => RNAPa_bound_mRNA0080 + PPi; k_forward7*RNAPa_bound_mRNA0080_PPi;
  r248: RNAPa_bound_mRNA0080 + CTP => RNAPa_bound_mRNA0080_CTP; k_forward5*RNAPa_bound_mRNA0080*CTP;
  r249: RNAPa_bound_mRNA0080_CTP => RNAPa_bound_mRNA0081_PPi; k_forward6*RNAPa_bound_mRNA0080_CTP;
  r250: RNAPa_bound_mRNA0081_PPi => RNAPa_bound_mRNA0081 + PPi; k_forward7*RNAPa_bound_mRNA0081_PPi;
  r251: RNAPa_bound_mRNA0081 + GTP => RNAPa_bound_mRNA0081_GTP; k_forward5*RNAPa_bound_mRNA0081*GTP;
  r252: RNAPa_bound_mRNA0081_GTP => RNAPa_bound_mRNA0082_PPi; k_forward6*RNAPa_bound_mRNA0081_GTP;
  r253: RNAPa_bound_mRNA0082_PPi => RNAPa_bound_mRNA0082 + PPi; k_forward7*RNAPa_bound_mRNA0082_PPi;
  r254: RNAPa_bound_mRNA0082 + ATP => RNAPa_bound_mRNA0082_ATP; k_forward5*RNAPa_bound_mRNA0082*ATP;
  r255: RNAPa_bound_mRNA0082_ATP => RNAPa_bound_mRNA0083_PPi; k_forward6*RNAPa_bound_mRNA0082_ATP;
  r256: RNAPa_bound_mRNA0083_PPi => RNAPa_bound_mRNA0083 + PPi; k_forward7*RNAPa_bound_mRNA0083_PPi;
  r257: RNAPa_bound_mRNA0083 + CTP => RNAPa_bound_mRNA0083_CTP; k_forward5*RNAPa_bound_mRNA0083*CTP;
  r258: RNAPa_bound_mRNA0083_CTP => RNAPa_bound_mRNA0084_PPi; k_forward6*RNAPa_bound_mRNA0083_CTP;
  r259: RNAPa_bound_mRNA0084_PPi => RNAPa_bound_mRNA0084 + PPi; k_forward7*RNAPa_bound_mRNA0084_PPi;
  r260: RNAPa_bound_mRNA0084 + UTP => RNAPa_bound_mRNA0084_UTP; k_forward5*RNAPa_bound_mRNA0084*UTP;
  r261: RNAPa_bound_mRNA0084_UTP => RNAPa_bound_mRNA0085_PPi; k_forward6*RNAPa_bound_mRNA0084_UTP;
  r262: RNAPa_bound_mRNA0085_PPi => RNAPa_bound_mRNA0085 + PPi; k_forward7*RNAPa_bound_mRNA0085_PPi;
  r263: RNAPa_bound_mRNA0085 + CTP => RNAPa_bound_mRNA0085_CTP; k_forward5*RNAPa_bound_mRNA0085*CTP;
  r264: RNAPa_bound_mRNA0085_CTP => RNAPa_bound_mRNA0086_PPi; k_forward6*RNAPa_bound_mRNA0085_CTP;
  r265: RNAPa_bound_mRNA0086_PPi => RNAPa_bound_mRNA0086 + PPi; k_forward7*RNAPa_bound_mRNA0086_PPi;
  r266: RNAPa_bound_mRNA0086 + ATP => RNAPa_bound_mRNA0086_ATP; k_forward5*RNAPa_bound_mRNA0086*ATP;
  r267: RNAPa_bound_mRNA0086_ATP => RNAPa_bound_mRNA0087_PPi; k_forward6*RNAPa_bound_mRNA0086_ATP;
  r268: RNAPa_bound_mRNA0087_PPi => RNAPa_bound_mRNA0087 + PPi; k_forward7*RNAPa_bound_mRNA0087_PPi;
  r269: RNAPa_bound_mRNA0087 + ATP => RNAPa_bound_mRNA0087_ATP; k_forward5*RNAPa_bound_mRNA0087*ATP;
  r270: RNAPa_bound_mRNA0087_ATP => RNAPa_bound_mRNA0088_PPi; k_forward6*RNAPa_bound_mRNA0087_ATP;
  r271: RNAPa_bound_mRNA0088_PPi => RNAPa_bound_mRNA0088 + PPi; k_forward7*RNAPa_bound_mRNA0088_PPi;
  r272: RNAPa_bound_mRNA0088 + CTP => RNAPa_bound_mRNA0088_CTP; k_forward5*RNAPa_bound_mRNA0088*CTP;
  r273: RNAPa_bound_mRNA0088_CTP => RNAPa_bound_mRNA0089_PPi; k_forward6*RNAPa_bound_mRNA0088_CTP;
  r274: RNAPa_bound_mRNA0089_PPi => RNAPa_bound_mRNA0089 + PPi; k_forward7*RNAPa_bound_mRNA0089_PPi;
  r275: RNAPa_bound_mRNA0089 => RNAPa + DNA + mRNA; k_forward8*RNAPa_bound_mRNA0089;

  // Unit definitions:
  unit square_metre = metre^2;
end
